<?xml version="1.0" encoding="UTF-8"?>
<neuroml xmlns="http://www.neuroml.org/schema/neuroml2"
    xmlns:xsi="http://www.w3.org/2001/XMLSchema-instance"
    xsi:schemaLocation="http://www.neuroml.org/schema/neuroml2 https://raw.github.com/NeuroML/NeuroML2/development/Schemas/NeuroML2/NeuroML_v2beta4.xsd"
    id = "Test">

  <include href="325941643.cell.nml"/>
  <include href="324466858.cell.nml"/>
  <include href="324257146.cell.nml"/>
  <include href="471410185.cell.nml"/>

  <include href="471358165.cell.nml"/>
  <include href="471789504.cell.nml"/>

  <network id="network" type="networkWithTemperature" temperature="35 degC">
      	<population id="Pop_325941643" component="325941643" type="populationList" size="1">
	    <instance id="0">
		<location x="0" y="0" z="0"/>
	    </instance>
	</population>
    	<population id="Pop_324466858" component="324466858" type="populationList" size="1">
	    <instance id="0">
		<location x="0" y="0" z="0"/>
	    </instance>
	</population>
    	<population id="Pop_324257146" component="324257146" type="populationList" size="1">
	    <instance id="0">
		<location x="0" y="0" z="0"/>
	    </instance>
	</population>

    	<population id="Pop_471410185" component="471410185" type="populationList" size="1">
	    <instance id="0">
		<location x="0" y="0" z="0"/>
	    </instance>
	</population>

    	<population id="Pop_471789504" component="471789504" type="populationList" size="1">
	    <instance id="0">
		<location x="0" y="0" z="0"/>
	    </instance>
	</population>
  </network>

</neuroml>
