<?xml version="1.0" encoding="UTF-8"?>
<neuroml xmlns="http://www.neuroml.org/schema/neuroml2"
    xmlns:xsi="http://www.w3.org/2001/XMLSchema-instance"
    xsi:schemaLocation="http://www.neuroml.org/schema/neuroml2 https://raw.github.com/NeuroML/NeuroML2/development/Schemas/NeuroML2/NeuroML_v2beta4.xsd"
    id = "Test2">

  <include href="471358165.cell.nml"/>
  <include href="471789504.cell.nml"/>

  <network id="network" type="networkWithTemperature" temperature="35 degC">

    	<population id="Pop_471358165" component="471358165" type="populationList" size="1">
	    <instance id="0">
		<location x="8298.44" y="1572.5" z="8837.92"/>
	    </instance>
	</population>

    	<population id="Pop_471789504" component="471789504" type="populationList" size="1">
	    <instance id="0">
		<location x="8295.82" y="1505.7" z="8426.29"/>
	    </instance>
	</population>
  </network>

</neuroml>
