<Lems>

    <!--

        This LEMS file has been automatically generated using PyNeuroML v0.1.11 (libNeuroML v0.2.14)

     -->

    <!-- Specify which component to run -->
    <Target component="Sim_Test_472451425"/>

    <!-- Include core NeuroML2 ComponentType definitions -->
    <Include file="Cells.xml"/>
    <Include file="Networks.xml"/>
    <Include file="Simulation.xml"/>

    <Include file="GLIF_472451425.xml"/>
    <Include file="../GLIFs.xml"/>
    <Include file="Test_472451425.net.nml"/>

    <Simulation id="Sim_Test_472451425" length="1200ms" step="0.01ms" target="Test_472451425" seed="12345">  <!-- Note seed: ensures same random numbers used every run -->

        <Display id="DispPop__pop_472451425" title="Membrane potentials of cells in pop_472451425" timeScale="1ms" xmin="-120.0" xmax="1320.0" ymin="-90" ymax="50">
            <Line id="pop_472451425[0]: v" quantity="pop_472451425/0/GLIF_472451425/v" scale="1mV" color="#6aa799" timeScale="1ms"/>
        </Display>

        <Display id="Threshold" title="Plots of Threshold" timeScale="1ms" xmin="-120.0" xmax="1320.0" ymin="-90" ymax="50">
            <Line id="pop_472451425_0_GLIF_472451425_thresh" quantity="pop_472451425/0/GLIF_472451425/thresh" scale="1" color="#029a72" timeScale="1ms"/>
        </Display>

        <OutputFile id="Volts_file__pop_472451425" fileName="Sim_Test_472451425.pop_472451425.v.dat">
            <OutputColumn id="v_pop_472451425_0_GLIF_472451425_v" quantity="pop_472451425/0/GLIF_472451425/v"/>
        </OutputFile>

        <OutputFile id="thresh.dat" fileName="thresh.dat">
            <OutputColumn id="pop_472451425_0_GLIF_472451425_thresh" quantity="pop_472451425/0/GLIF_472451425/thresh"/>
        </OutputFile>

    </Simulation>

</Lems>
