<neuroml xmlns="http://www.neuroml.org/schema/neuroml2"  xmlns:xs="http://www.w3.org/2001/XMLSchema" xmlns:xsi="http://www.w3.org/2001/XMLSchema-instance" xsi:schemaLocation="http://www.neuroml.org/schema/neuroml2 https://raw.github.com/NeuroML/NeuroML2/development/Schemas/NeuroML2/NeuroML_v2beta5.xsd" id="Test_472455459">
    <notes>

This NeuroML 2 file was generated by OpenCortex v0.0.6 using:
    libNeuroML v0.2.23
    pyNeuroML v0.2.2

    </notes>
    <property tag="Python random seed" value="1234"/>
    <pulseGenerator id="pg0" delay="100ms" duration="1000ms" amplitude="120 pA"/>
    <network id="Test_472455459" type="networkWithTemperature" temperature="32degC">
        <population id="pop_472455459" component="GLIF_472455459" size="1" type="populationList">
            <instance id="0">
                <location x="0." y="0." z="0."/>
            </instance>
        </population>
        <inputList id="Stim0" population="pop_472455459" component="pg0">
            <input id="0" target="../pop_472455459/0/GLIF_472455459" destination="synapses"/>
        </inputList>
    </network>
</neuroml>
