<Lems>

    <!--

        This LEMS file has been automatically generated using PyNeuroML v0.1.11 (libNeuroML v0.2.14)

     -->

    <!-- Specify which component to run -->
    <Target component="Sim_Test_480629475"/>

    <!-- Include core NeuroML2 ComponentType definitions -->
    <Include file="Cells.xml"/>
    <Include file="Networks.xml"/>
    <Include file="Simulation.xml"/>

    <Include file="GLIF_480629475.xml"/>
    <Include file="../GLIFs.xml"/>
    <Include file="Test_480629475.net.nml"/>

    <Simulation id="Sim_Test_480629475" length="1200ms" step="0.01ms" target="Test_480629475" seed="12345">  <!-- Note seed: ensures same random numbers used every run -->

        <Display id="DispPop__pop_480629475" title="Membrane potentials of cells in pop_480629475" timeScale="1ms" xmin="-120.0" xmax="1320.0" ymin="-90" ymax="50">
            <Line id="pop_480629475[0]: v" quantity="pop_480629475/0/GLIF_480629475/v" scale="1mV" color="#6aa799" timeScale="1ms"/>
        </Display>

        <Display id="Threshold" title="Plots of Threshold" timeScale="1ms" xmin="-120.0" xmax="1320.0" ymin="-90" ymax="50">
            <Line id="pop_480629475_0_GLIF_480629475_thresh" quantity="pop_480629475/0/GLIF_480629475/thresh" scale="1" color="#029a72" timeScale="1ms"/>
        </Display>

        <OutputFile id="Volts_file__pop_480629475" fileName="Sim_Test_480629475.pop_480629475.v.dat">
            <OutputColumn id="v_pop_480629475_0_GLIF_480629475_v" quantity="pop_480629475/0/GLIF_480629475/v"/>
        </OutputFile>

        <OutputFile id="thresh.dat" fileName="thresh.dat">
            <OutputColumn id="pop_480629475_0_GLIF_480629475_thresh" quantity="pop_480629475/0/GLIF_480629475/thresh"/>
        </OutputFile>

    </Simulation>

</Lems>
