<Lems>

    <!--

        This LEMS file has been automatically generated using PyNeuroML v0.7.1 (libNeuroML v0.4.0)

     -->

    <!-- Specify which component to run -->
    <Target component="Sim_Test_485904755" reportFile="report.Sim_Test_485904755.txt"/>

    <!-- Include core NeuroML2 ComponentType definitions -->
    <Include file="Cells.xml"/>
    <Include file="Networks.xml"/>
    <Include file="Simulation.xml"/>

    <Include file="PyNN.xml"/>
    <Include file="Test_485904755.net.nml"/>
    <Include file="Test_485904755__lems.xml"/>

    <Simulation id="Sim_Test_485904755" length="1200.0ms" step="0.01ms" target="Test_485904755" seed="5678">  <!-- Note seed: ensures same random numbers used every run -->

        <Display id="pop_485904755_0_thresh" title="Plots of pop_485904755_0_thresh" timeScale="1ms" xmin="-120.0" xmax="1320.0" ymin="-1" ymax="1">
            <Line id="pop_485904755_0_GLIF_485904755_thresh" quantity="pop_485904755/0/GLIF_485904755/thresh" scale="1" color="#d54f33" timeScale="1ms"/>
        </Display>

        <Display id="pop_485904755_v" title="Plots of pop_485904755_v" timeScale="1ms" xmin="-120.0" xmax="1320.0" ymin="-80" ymax="40">
            <Line id="pop_485904755_0_GLIF_485904755_v" quantity="pop_485904755/0/GLIF_485904755/v" scale="1mV" color="#0534e4" timeScale="1ms"/>
        </Display>

        <OutputFile id="Sim_Test_485904755_pop_485904755_v_dat" fileName="Sim_Test_485904755.pop_485904755.v.dat">
            <OutputColumn id="pop_485904755_0_GLIF_485904755_v" quantity="pop_485904755/0/GLIF_485904755/v"/>
        </OutputFile>

        <OutputFile id="pop_485904755_0_thresh_dat" fileName="pop_485904755_0.thresh.dat">
            <OutputColumn id="pop_485904755_0_GLIF_485904755_thresh" quantity="pop_485904755/0/GLIF_485904755/thresh"/>
        </OutputFile>

    </Simulation>

</Lems>
