<Lems>
      <Include file="../GLIFs.xml"/>

      <glifRCell  id="GLIF_566282032"
            C="5.373192923338083e-11 F"
            leakReversal="0.0 V"
            reset="0.0 V"
            thresh="0.02397858480147979 V"
            leakConductance="3.8198163034913505e-09 S"
            bs="160.41379185954943 per_s"
            deltaThresh="0.0020603062525408277 V"
            fv="0.045714615646435634"
            deltaV="0.009518426672845188 V"/>

    </Lems>
