<Lems>
      <Include file="../GLIFs.xml"/>

      <glifRAscATCell  id="GLIF_566283540"
            C="7.780685989753313e-11 F"
            leakReversal="0.0 V"
            reset="0.0 V"
            thresh="0.022018432624756324 V"
            leakConductance="4.414944799667751e-09 S"
            tau1="0.03333333333333334 s"
            tau2="0.0033333333333333335 s"
            amp1="-5.1754992862776374e-11 A"
            amp2="1.306232191694733e-10 A"
            bs="33.11178918014402 per_s"
            deltaThresh="0.0012023468247352638 V"
            fv="0.9831052477150013"
            deltaV="-0.015394347765031346 V"
            bv="29.40596363524473 per_s"
            a="3.8798432251721056 per_s"/>

    </Lems>
