<neuroml xmlns="http://www.neuroml.org/schema/neuroml2"  xmlns:xs="http://www.w3.org/2001/XMLSchema" xmlns:xsi="http://www.w3.org/2001/XMLSchema-instance" xsi:schemaLocation="http://www.neuroml.org/schema/neuroml2 https://raw.github.com/NeuroML/NeuroML2/development/Schemas/NeuroML2/NeuroML_v2.3.xsd" id="Test_566320096">
    <notes>Generated by NeuroMLlite v0.5.1
    Generated network: Test_566320096
    Generation seed: 1234</notes>
    <include href="Test_566320096__lems.xml"/>
    <pulseGenerator id="pg0" delay="100ms" duration="1000ms" amplitude="110 pA"/>
    <network id="Test_566320096" type="networkWithTemperature" temperature="32.0degC">
        <notes>3 LIF + Afterspike Currents (LIF-ASC)_Slc17a6-IRES-Cre;Ai14-190263.04.01.01</notes>
        <property tag="recommended_dt_ms" value="0.01"/>
        <property tag="recommended_duration_ms" value="1200.0"/>
        <population id="pop_566320096" component="GLIF_566320096" size="1" type="populationList">
            <instance id="0">
                <location x="0." y="0." z="0."/>
            </instance>
        </population>
        <inputList id="Stim0" population="pop_566320096" component="pg0">
            <input id="0" target="../pop_566320096/0/GLIF_566320096" destination="synapses"/>
        </inputList>
    </network>
</neuroml>
