<Lems>
      <Include file="../GLIFs.xml"/>

      <glifRAscCell  id="GLIF_566357260"
            C="4.9495371313002126e-11 F"
            leakReversal="0.0 V"
            reset="0.0 V"
            thresh="0.023141857334814688 V"
            leakConductance="5.656388155792418e-09 S"
            tau1="0.01 s"
            tau2="0.0033333333333333335 s"
            amp1="-1.4007651021687604e-10 A"
            amp2="2.0432140481719042e-10 A"
            bs="267.31555314791933 per_s"
            deltaThresh="0.007320801257445475 V"
            fv="-0.03985484490444443"
            deltaV="0.009333755143217359 V"/>

    </Lems>
