<neuroml xmlns="http://www.neuroml.org/schema/neuroml2"  xmlns:xs="http://www.w3.org/2001/XMLSchema" xmlns:xsi="http://www.w3.org/2001/XMLSchema-instance" xsi:schemaLocation="http://www.neuroml.org/schema/neuroml2 https://raw.github.com/NeuroML/NeuroML2/development/Schemas/NeuroML2/NeuroML_v2.3.xsd" id="GLIF_net_large">
    <notes>Generated by NeuroMLlite v0.5.1
    Generated network: GLIF_net_large
    Generation seed: 1234
    NeuroMLlite parameters:
        N_scaling = 0.005
        depth = 100
        global_e_scaling = 1
        global_i_scaling = 1
        input_weight = 1
        layer_height = 400
        width = 100</notes>
    <include href="GLIF_net_large__lems.xml"/>
    <expCurrSynapse id="ampa" tau_syn="0.5"/>
    <expCurrSynapse id="gaba" tau_syn="0.5"/>
    <SpikeSourcePoisson id="InputCell" start="0.0ms" duration="10000000000.0ms" rate="150.0Hz"/>
    <network id="GLIF_net_large" type="networkWithTemperature" temperature="32.0degC">
        <notes>Network with GLIF cells</notes>
        <property tag="recommended_dt_ms" value="0.025"/>
        <property tag="recommended_duration_ms" value="100.0"/>
        <population id="L23_E" component="GLIF_566320096" size="103" type="populationList">
            <property tag="type" value="E"/>
            <property tag="region" value="L23"/>
            <instance id="0">
                <location x="96.645353569213881" y="1376.29303967014107" z="0.749147005858719"/>
            </instance>
            <instance id="1">
                <location x="91.09759624491241" y="1575.707598945505651" z="58.222757305894909"/>
            </instance>
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        </population>
        <population id="L23_E_input" component="InputCell" size="103" type="populationList">
            <property tag="region" value="L23"/>
            <instance id="0">
                <location x="98.537259747087177" y="1248.189412189195991" z="59.990558054600918"/>
            </instance>
            <instance id="1">
                <location x="86.507700546502818" y="1413.595475468303903" z="59.356522835349004"/>
            </instance>
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        </population>
        <population id="L23_I" component="GLIF_489931668" size="29" type="populationList">
            <property tag="type" value="I"/>
            <property tag="region" value="L23"/>
            <instance id="0">
                <location x="45.571244573274036" y="1287.239656086878085" z="34.842826908610625"/>
            </instance>
            <instance id="1">
                <location x="33.468536550386318" y="1355.302239522517084" z="69.545234810587004"/>
            </instance>
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        </population>
        <population id="L23_I_input" component="InputCell" size="29" type="populationList">
            <property tag="region" value="L23"/>
            <instance id="0">
                <location x="50.842713332154041" y="1574.613532017867783" z="18.307001190048666"/>
            </instance>
            <instance id="1">
                <location x="37.707002884139797" y="1381.692575174152125" z="91.839883947654528"/>
            </instance>
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        </population>
        <population id="L4_E" component="GLIF_486558431" size="109" type="populationList">
            <property tag="type" value="E"/>
            <property tag="region" value="L4"/>
            <instance id="0">
                <location x="45.467047959704246" y="849.203552118946504" z="8.101960836226441"/>
            </instance>
            <instance id="1">
                <location x="66.150223683429658" y="1054.094679407587591" z="51.946277778571762"/>
            </instance>
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        </population>
        <population id="L4_E_input" component="InputCell" size="109" type="populationList">
            <property tag="region" value="L4"/>
            <instance id="0">
                <location x="44.746408556660114" y="1042.919926444760677" z="76.441626012123521"/>
            </instance>
            <instance id="1">
                <location x="24.773955896848598" y="847.051187758602737" z="52.414646725210304"/>
            </instance>
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        </population>
        <population id="L4_I" component="GLIF_566382734" size="27" type="populationList">
            <property tag="type" value="I"/>
            <property tag="region" value="L4"/>
            <instance id="0">
                <location x="86.536839355320865" y="979.412610296928506" z="29.648806477593894"/>
            </instance>
            <instance id="1">
                <location x="57.866228162110488" y="1042.380138823627931" z="58.538386121856547"/>
            </instance>
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        </population>
        <population id="L4_I_input" component="InputCell" size="27" type="populationList">
            <property tag="region" value="L4"/>
            <instance id="0">
                <location x="47.388948065697875" y="1009.264386591167295" z="29.055058180120199"/>
            </instance>
            <instance id="1">
                <location x="39.839825093386807" y="860.841948680180508" z="56.889775074062086"/>
            </instance>
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        </population>
        <population id="L5_E" component="GLIF_486052403" size="24" type="populationList">
            <property tag="type" value="E"/>
            <property tag="region" value="L5"/>
            <instance id="0">
                <location x="97.920956385073126" y="481.221099457129071" z="38.560645456283517"/>
            </instance>
            <instance id="1">
                <location x="41.953236691284864" y="432.772821365681693" z="95.641335727610084"/>
            </instance>
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        </population>
        <population id="L5_E_input" component="InputCell" size="24" type="populationList">
            <property tag="region" value="L5"/>
            <instance id="0">
                <location x="45.727611055582443" y="497.998247756919" z="50.69419383850893"/>
            </instance>
            <instance id="1">
                <location x="1.050885881823049" y="540.582130745964378" z="90.881515352964499"/>
            </instance>
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        </population>
        <population id="L5_I" component="GLIF_485904755" size="5" type="populationList">
            <property tag="type" value="I"/>
            <property tag="region" value="L5"/>
            <instance id="0">
                <location x="58.92188226490471" y="588.656315611999275" z="1.582490725566676"/>
            </instance>
            <instance id="1">
                <location x="59.32510400036675" y="445.400347794148274" z="75.870657437176391"/>
            </instance>
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        </population>
        <population id="L5_I_input" component="InputCell" size="5" type="populationList">
            <property tag="region" value="L5"/>
            <instance id="0">
                <location x="21.48971680611066" y="523.55324637990077" z="52.09949031757656"/>
            </instance>
            <instance id="1">
                <location x="41.461281357673428" y="461.356750363209699" z="97.919436613538892"/>
            </instance>
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        </population>
        <population id="L6_E" component="GLIF_566303332" size="71" type="populationList">
            <property tag="type" value="E"/>
            <property tag="region" value="L6"/>
            <instance id="0">
                <location x="21.06971874767979" y="103.416637445224694" z="63.818125497343139"/>
            </instance>
            <instance id="1">
                <location x="72.786746195996869" y="303.430718308165353" z="4.821832326690378"/>
            </instance>
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        </population>
        <population id="L6_E_input" component="InputCell" size="71" type="populationList">
            <property tag="region" value="L6"/>
            <instance id="0">
                <location x="83.557662348634281" y="7.52760524718763" z="30.615454204094995"/>
            </instance>
            <instance id="1">
                <location x="53.837370465519861" y="165.841377394486329" z="61.550556919016053"/>
            </instance>
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        </population>
        <population id="L6_I" component="GLIF_566357260" size="14" type="populationList">
            <property tag="type" value="I"/>
            <property tag="region" value="L6"/>
            <instance id="0">
                <location x="25.289745698130282" y="60.365936760934602" z="52.409100895394403"/>
            </instance>
            <instance id="1">
                <location x="29.307089144603037" y="235.458567468289601" z="50.98003579620368"/>
            </instance>
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        </population>
        <population id="L6_I_input" component="InputCell" size="14" type="populationList">
            <property tag="region" value="L6"/>
            <instance id="0">
                <location x="67.900093619278891" y="78.043453832222909" z="4.003038669205871"/>
            </instance>
            <instance id="1">
                <location x="49.389058153737963" y="251.74502004465009" z="13.616323020307009"/>
            </instance>
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        </population>
        <projection id="proj_input_L23_E" presynapticPopulation="L23_E_input" postsynapticPopulation="L23_E" synapse="ampa">
            <connectionWD id="0" preCellId="../L23_E_input/0/InputCell" postCellId="../L23_E/0/GLIF_566320096" weight="1." delay="2ms"/>
            <connectionWD id="1" preCellId="../L23_E_input/1/InputCell" postCellId="../L23_E/1/GLIF_566320096" weight="1." delay="2ms"/>
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        </projection>
        <projection id="proj_input_L23_I" presynapticPopulation="L23_I_input" postsynapticPopulation="L23_I" synapse="ampa">
            <connectionWD id="0" preCellId="../L23_I_input/0/InputCell" postCellId="../L23_I/0/GLIF_489931668" weight="1." delay="2ms"/>
            <connectionWD id="1" preCellId="../L23_I_input/1/InputCell" postCellId="../L23_I/1/GLIF_489931668" weight="1." delay="2ms"/>
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        </projection>
        <projection id="proj_input_L4_E" presynapticPopulation="L4_E_input" postsynapticPopulation="L4_E" synapse="ampa">
            <connectionWD id="0" preCellId="../L4_E_input/0/InputCell" postCellId="../L4_E/0/GLIF_486558431" weight="1." delay="2ms"/>
            <connectionWD id="1" preCellId="../L4_E_input/1/InputCell" postCellId="../L4_E/1/GLIF_486558431" weight="1." delay="2ms"/>
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        </projection>
        <projection id="proj_input_L4_I" presynapticPopulation="L4_I_input" postsynapticPopulation="L4_I" synapse="ampa">
            <connectionWD id="0" preCellId="../L4_I_input/0/InputCell" postCellId="../L4_I/0/GLIF_566382734" weight="1." delay="2ms"/>
            <connectionWD id="1" preCellId="../L4_I_input/1/InputCell" postCellId="../L4_I/1/GLIF_566382734" weight="1." delay="2ms"/>
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        </projection>
        <projection id="proj_input_L5_E" presynapticPopulation="L5_E_input" postsynapticPopulation="L5_E" synapse="ampa">
            <connectionWD id="0" preCellId="../L5_E_input/0/InputCell" postCellId="../L5_E/0/GLIF_486052403" weight="1." delay="2ms"/>
            <connectionWD id="1" preCellId="../L5_E_input/1/InputCell" postCellId="../L5_E/1/GLIF_486052403" weight="1." delay="2ms"/>
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        </projection>
        <projection id="proj_input_L5_I" presynapticPopulation="L5_I_input" postsynapticPopulation="L5_I" synapse="ampa">
            <connectionWD id="0" preCellId="../L5_I_input/0/InputCell" postCellId="../L5_I/0/GLIF_485904755" weight="1." delay="2ms"/>
            <connectionWD id="1" preCellId="../L5_I_input/1/InputCell" postCellId="../L5_I/1/GLIF_485904755" weight="1." delay="2ms"/>
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        </projection>
        <projection id="proj_input_L6_E" presynapticPopulation="L6_E_input" postsynapticPopulation="L6_E" synapse="ampa">
            <connectionWD id="0" preCellId="../L6_E_input/0/InputCell" postCellId="../L6_E/0/GLIF_566303332" weight="1." delay="2ms"/>
            <connectionWD id="1" preCellId="../L6_E_input/1/InputCell" postCellId="../L6_E/1/GLIF_566303332" weight="1." delay="2ms"/>
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        </projection>
        <projection id="proj_input_L6_I" presynapticPopulation="L6_I_input" postsynapticPopulation="L6_I" synapse="ampa">
            <connectionWD id="0" preCellId="../L6_I_input/0/InputCell" postCellId="../L6_I/0/GLIF_566357260" weight="1." delay="2ms"/>
            <connectionWD id="1" preCellId="../L6_I_input/1/InputCell" postCellId="../L6_I/1/GLIF_566357260" weight="1." delay="2ms"/>
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        </projection>
        <projection id="proj_L23_E_L23_E" presynapticPopulation="L23_E" postsynapticPopulation="L23_E" synapse="ampa">
            <connectionWD id="0" preCellId="../L23_E/0/GLIF_566320096" postCellId="../L23_E/1/GLIF_566320096" weight="1." delay="1ms"/>
            <connectionWD id="1" preCellId="../L23_E/0/GLIF_566320096" postCellId="../L23_E/4/GLIF_566320096" weight="1." delay="1ms"/>
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        </projection>
        <projection id="proj_L23_E_L23_I" presynapticPopulation="L23_E" postsynapticPopulation="L23_I" synapse="ampa">
            <connectionWD id="0" preCellId="../L23_E/0/GLIF_566320096" postCellId="../L23_I/0/GLIF_489931668" weight="1." delay="1ms"/>
            <connectionWD id="1" preCellId="../L23_E/0/GLIF_566320096" postCellId="../L23_I/9/GLIF_489931668" weight="1." delay="1ms"/>
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        </projection>
        <projection id="proj_L23_E_L4_E" presynapticPopulation="L23_E" postsynapticPopulation="L4_E" synapse="ampa">
            <connectionWD id="0" preCellId="../L23_E/0/GLIF_566320096" postCellId="../L4_E/0/GLIF_486558431" weight="1." delay="1ms"/>
            <connectionWD id="1" preCellId="../L23_E/2/GLIF_566320096" postCellId="../L4_E/106/GLIF_486558431" weight="1." delay="1ms"/>
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        </projection>
        <projection id="proj_L23_E_L4_I" presynapticPopulation="L23_E" postsynapticPopulation="L4_I" synapse="ampa">
            <connectionWD id="0" preCellId="../L23_E/0/GLIF_566320096" postCellId="../L4_I/0/GLIF_566382734" weight="1." delay="1ms"/>
            <connectionWD id="1" preCellId="../L23_E/0/GLIF_566320096" postCellId="../L4_I/3/GLIF_566382734" weight="1." delay="1ms"/>
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        </projection>
        <projection id="proj_L23_E_L5_E" presynapticPopulation="L23_E" postsynapticPopulation="L5_E" synapse="ampa">
            <connectionWD id="0" preCellId="../L23_E/0/GLIF_566320096" postCellId="../L5_E/3/GLIF_486052403" weight="1." delay="1ms"/>
            <connectionWD id="1" preCellId="../L23_E/0/GLIF_566320096" postCellId="../L5_E/19/GLIF_486052403" weight="1." delay="1ms"/>
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        </projection>
        <projection id="proj_L23_E_L5_I" presynapticPopulation="L23_E" postsynapticPopulation="L5_I" synapse="ampa">
            <connectionWD id="0" preCellId="../L23_E/10/GLIF_566320096" postCellId="../L5_I/3/GLIF_485904755" weight="1." delay="1ms"/>
            <connectionWD id="1" preCellId="../L23_E/11/GLIF_566320096" postCellId="../L5_I/2/GLIF_485904755" weight="1." delay="1ms"/>
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        </projection>
        <projection id="proj_L23_E_L6_E" presynapticPopulation="L23_E" postsynapticPopulation="L6_E" synapse="ampa">
            <connectionWD id="0" preCellId="../L23_E/0/GLIF_566320096" postCellId="../L6_E/41/GLIF_566303332" weight="1." delay="1ms"/>
            <connectionWD id="1" preCellId="../L23_E/1/GLIF_566320096" postCellId="../L6_E/50/GLIF_566303332" weight="1." delay="1ms"/>
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        </projection>
        <projection id="proj_L23_E_L6_I" presynapticPopulation="L23_E" postsynapticPopulation="L6_I" synapse="ampa">
            <connectionWD id="0" preCellId="../L23_E/1/GLIF_566320096" postCellId="../L6_I/2/GLIF_566357260" weight="1." delay="1ms"/>
            <connectionWD id="1" preCellId="../L23_E/3/GLIF_566320096" postCellId="../L6_I/8/GLIF_566357260" weight="1." delay="1ms"/>
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        </projection>
        <projection id="proj_L23_I_L23_E" presynapticPopulation="L23_I" postsynapticPopulation="L23_E" synapse="gaba">
            <connectionWD id="0" preCellId="../L23_I/0/GLIF_489931668" postCellId="../L23_E/5/GLIF_566320096" weight="-1." delay="1ms"/>
            <connectionWD id="1" preCellId="../L23_I/0/GLIF_489931668" postCellId="../L23_E/7/GLIF_566320096" weight="-1." delay="1ms"/>
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        </projection>
        <projection id="proj_L23_I_L23_I" presynapticPopulation="L23_I" postsynapticPopulation="L23_I" synapse="gaba">
            <connectionWD id="0" preCellId="../L23_I/0/GLIF_489931668" postCellId="../L23_I/7/GLIF_489931668" weight="-1." delay="1ms"/>
            <connectionWD id="1" preCellId="../L23_I/0/GLIF_489931668" postCellId="../L23_I/9/GLIF_489931668" weight="-1." delay="1ms"/>
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        </projection>
        <projection id="proj_L23_I_L4_E" presynapticPopulation="L23_I" postsynapticPopulation="L4_E" synapse="gaba">
            <connectionWD id="0" preCellId="../L23_I/0/GLIF_489931668" postCellId="../L4_E/1/GLIF_486558431" weight="-1." delay="1ms"/>
            <connectionWD id="1" preCellId="../L23_I/4/GLIF_489931668" postCellId="../L4_E/81/GLIF_486558431" weight="-1." delay="1ms"/>
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        </projection>
        <projection id="proj_L23_I_L4_I" presynapticPopulation="L23_I" postsynapticPopulation="L4_I" synapse="gaba">
            <connectionWD id="0" preCellId="../L23_I/15/GLIF_489931668" postCellId="../L4_I/19/GLIF_566382734" weight="-1." delay="1ms"/>
            <connectionWD id="1" preCellId="../L23_I/18/GLIF_489931668" postCellId="../L4_I/1/GLIF_566382734" weight="-1." delay="1ms"/>
        </projection>
        <projection id="proj_L23_I_L5_E" presynapticPopulation="L23_I" postsynapticPopulation="L5_E" synapse="gaba">
            <connectionWD id="0" preCellId="../L23_I/0/GLIF_489931668" postCellId="../L5_E/2/GLIF_486052403" weight="-1." delay="1ms"/>
            <connectionWD id="1" preCellId="../L23_I/1/GLIF_489931668" postCellId="../L5_E/0/GLIF_486052403" weight="-1." delay="1ms"/>
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        </projection>
        <projection id="proj_L23_I_L5_I" presynapticPopulation="L23_I" postsynapticPopulation="L5_I" synapse="gaba">
            <connectionWD id="0" preCellId="../L23_I/12/GLIF_489931668" postCellId="../L5_I/1/GLIF_485904755" weight="-1." delay="1ms"/>
            <connectionWD id="1" preCellId="../L23_I/20/GLIF_489931668" postCellId="../L5_I/3/GLIF_485904755" weight="-1." delay="1ms"/>
            <connectionWD id="2" preCellId="../L23_I/21/GLIF_489931668" postCellId="../L5_I/3/GLIF_485904755" weight="-1." delay="1ms"/>
            <connectionWD id="3" preCellId="../L23_I/22/GLIF_489931668" postCellId="../L5_I/3/GLIF_485904755" weight="-1." delay="1ms"/>
        </projection>
        <projection id="proj_L23_I_L6_E" presynapticPopulation="L23_I" postsynapticPopulation="L6_E" synapse="gaba">
            <connectionWD id="0" preCellId="../L23_I/3/GLIF_489931668" postCellId="../L6_E/14/GLIF_566303332" weight="-1." delay="1ms"/>
            <connectionWD id="1" preCellId="../L23_I/15/GLIF_489931668" postCellId="../L6_E/1/GLIF_566303332" weight="-1." delay="1ms"/>
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        </projection>
        <projection id="proj_L23_I_L6_I" presynapticPopulation="L23_I" postsynapticPopulation="L6_I" synapse="gaba"/>
        <projection id="proj_L4_E_L23_E" presynapticPopulation="L4_E" postsynapticPopulation="L23_E" synapse="ampa">
            <connectionWD id="0" preCellId="../L4_E/0/GLIF_486558431" postCellId="../L23_E/14/GLIF_566320096" weight="1." delay="1ms"/>
            <connectionWD id="1" preCellId="../L4_E/0/GLIF_486558431" postCellId="../L23_E/28/GLIF_566320096" weight="1." delay="1ms"/>
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        </projection>
        <projection id="proj_L4_E_L23_I" presynapticPopulation="L4_E" postsynapticPopulation="L23_I" synapse="ampa">
            <connectionWD id="0" preCellId="../L4_E/0/GLIF_486558431" postCellId="../L23_I/7/GLIF_489931668" weight="1." delay="1ms"/>
            <connectionWD id="1" preCellId="../L4_E/1/GLIF_486558431" postCellId="../L23_I/6/GLIF_489931668" weight="1." delay="1ms"/>
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        </projection>
        <projection id="proj_L4_E_L4_E" presynapticPopulation="L4_E" postsynapticPopulation="L4_E" synapse="ampa">
            <connectionWD id="0" preCellId="../L4_E/0/GLIF_486558431" postCellId="../L4_E/2/GLIF_486558431" weight="1." delay="1ms"/>
            <connectionWD id="1" preCellId="../L4_E/0/GLIF_486558431" postCellId="../L4_E/5/GLIF_486558431" weight="1." delay="1ms"/>
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        </projection>
        <projection id="proj_L4_E_L4_I" presynapticPopulation="L4_E" postsynapticPopulation="L4_I" synapse="ampa">
            <connectionWD id="0" preCellId="../L4_E/0/GLIF_486558431" postCellId="../L4_I/9/GLIF_566382734" weight="1." delay="1ms"/>
            <connectionWD id="1" preCellId="../L4_E/0/GLIF_486558431" postCellId="../L4_I/22/GLIF_566382734" weight="1." delay="1ms"/>
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        </projection>
        <projection id="proj_L4_E_L5_E" presynapticPopulation="L4_E" postsynapticPopulation="L5_E" synapse="ampa">
            <connectionWD id="0" preCellId="../L4_E/0/GLIF_486558431" postCellId="../L5_E/0/GLIF_486052403" weight="1." delay="1ms"/>
            <connectionWD id="1" preCellId="../L4_E/0/GLIF_486558431" postCellId="../L5_E/18/GLIF_486052403" weight="1." delay="1ms"/>
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        </projection>
        <projection id="proj_L4_E_L5_I" presynapticPopulation="L4_E" postsynapticPopulation="L5_I" synapse="ampa">
            <connectionWD id="0" preCellId="../L4_E/23/GLIF_486558431" postCellId="../L5_I/3/GLIF_485904755" weight="1." delay="1ms"/>
            <connectionWD id="1" preCellId="../L4_E/31/GLIF_486558431" postCellId="../L5_I/0/GLIF_485904755" weight="1." delay="1ms"/>
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        </projection>
        <projection id="proj_L4_E_L6_E" presynapticPopulation="L4_E" postsynapticPopulation="L6_E" synapse="ampa">
            <connectionWD id="0" preCellId="../L4_E/0/GLIF_486558431" postCellId="../L6_E/7/GLIF_566303332" weight="1." delay="1ms"/>
            <connectionWD id="1" preCellId="../L4_E/1/GLIF_486558431" postCellId="../L6_E/16/GLIF_566303332" weight="1." delay="1ms"/>
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        </projection>
        <projection id="proj_L4_E_L6_I" presynapticPopulation="L4_E" postsynapticPopulation="L6_I" synapse="ampa">
            <connectionWD id="0" preCellId="../L4_E/30/GLIF_486558431" postCellId="../L6_I/2/GLIF_566357260" weight="1." delay="1ms"/>
            <connectionWD id="1" preCellId="../L4_E/35/GLIF_486558431" postCellId="../L6_I/2/GLIF_566357260" weight="1." delay="1ms"/>
            <connectionWD id="2" preCellId="../L4_E/59/GLIF_486558431" postCellId="../L6_I/10/GLIF_566357260" weight="1." delay="1ms"/>
            <connectionWD id="3" preCellId="../L4_E/96/GLIF_486558431" postCellId="../L6_I/5/GLIF_566357260" weight="1." delay="1ms"/>
        </projection>
        <projection id="proj_L4_I_L23_E" presynapticPopulation="L4_I" postsynapticPopulation="L23_E" synapse="gaba">
            <connectionWD id="0" preCellId="../L4_I/0/GLIF_566382734" postCellId="../L23_E/0/GLIF_566320096" weight="-1." delay="1ms"/>
            <connectionWD id="1" preCellId="../L4_I/0/GLIF_566382734" postCellId="../L23_E/2/GLIF_566320096" weight="-1." delay="1ms"/>
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        </projection>
        <projection id="proj_L4_I_L23_I" presynapticPopulation="L4_I" postsynapticPopulation="L23_I" synapse="gaba">
            <connectionWD id="0" preCellId="../L4_I/0/GLIF_566382734" postCellId="../L23_I/16/GLIF_489931668" weight="-1." delay="1ms"/>
            <connectionWD id="1" preCellId="../L4_I/0/GLIF_566382734" postCellId="../L23_I/20/GLIF_489931668" weight="-1." delay="1ms"/>
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        </projection>
        <projection id="proj_L4_I_L4_E" presynapticPopulation="L4_I" postsynapticPopulation="L4_E" synapse="gaba">
            <connectionWD id="0" preCellId="../L4_I/0/GLIF_566382734" postCellId="../L4_E/8/GLIF_486558431" weight="-1." delay="1ms"/>
            <connectionWD id="1" preCellId="../L4_I/0/GLIF_566382734" postCellId="../L4_E/13/GLIF_486558431" weight="-1." delay="1ms"/>
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        </projection>
        <projection id="proj_L4_I_L4_I" presynapticPopulation="L4_I" postsynapticPopulation="L4_I" synapse="gaba">
            <connectionWD id="0" preCellId="../L4_I/0/GLIF_566382734" postCellId="../L4_I/0/GLIF_566382734" weight="-1." delay="1ms"/>
            <connectionWD id="1" preCellId="../L4_I/0/GLIF_566382734" postCellId="../L4_I/6/GLIF_566382734" weight="-1." delay="1ms"/>
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        </projection>
        <projection id="proj_L4_I_L5_E" presynapticPopulation="L4_I" postsynapticPopulation="L5_E" synapse="gaba">
            <connectionWD id="0" preCellId="../L4_I/17/GLIF_566382734" postCellId="../L5_E/19/GLIF_486052403" weight="-1." delay="1ms"/>
            <connectionWD id="1" preCellId="../L4_I/20/GLIF_566382734" postCellId="../L5_E/18/GLIF_486052403" weight="-1." delay="1ms"/>
            <connectionWD id="2" preCellId="../L4_I/24/GLIF_566382734" postCellId="../L5_E/23/GLIF_486052403" weight="-1." delay="1ms"/>
        </projection>
        <projection id="proj_L4_I_L5_I" presynapticPopulation="L4_I" postsynapticPopulation="L5_I" synapse="gaba"/>
        <projection id="proj_L4_I_L6_E" presynapticPopulation="L4_I" postsynapticPopulation="L6_E" synapse="gaba">
            <connectionWD id="0" preCellId="../L4_I/0/GLIF_566382734" postCellId="../L6_E/5/GLIF_566303332" weight="-1." delay="1ms"/>
            <connectionWD id="1" preCellId="../L4_I/0/GLIF_566382734" postCellId="../L6_E/9/GLIF_566303332" weight="-1." delay="1ms"/>
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        </projection>
        <projection id="proj_L4_I_L6_I" presynapticPopulation="L4_I" postsynapticPopulation="L6_I" synapse="gaba">
            <connectionWD id="0" preCellId="../L4_I/12/GLIF_566382734" postCellId="../L6_I/12/GLIF_566357260" weight="-1." delay="1ms"/>
        </projection>
        <projection id="proj_L5_E_L23_E" presynapticPopulation="L5_E" postsynapticPopulation="L23_E" synapse="ampa">
            <connectionWD id="0" preCellId="../L5_E/0/GLIF_486052403" postCellId="../L23_E/29/GLIF_566320096" weight="1." delay="1ms"/>
            <connectionWD id="1" preCellId="../L5_E/0/GLIF_486052403" postCellId="../L23_E/38/GLIF_566320096" weight="1." delay="1ms"/>
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        </projection>
        <projection id="proj_L5_E_L23_I" presynapticPopulation="L5_E" postsynapticPopulation="L23_I" synapse="ampa">
            <connectionWD id="0" preCellId="../L5_E/0/GLIF_486052403" postCellId="../L23_I/0/GLIF_489931668" weight="1." delay="1ms"/>
            <connectionWD id="1" preCellId="../L5_E/0/GLIF_486052403" postCellId="../L23_I/4/GLIF_489931668" weight="1." delay="1ms"/>
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        </projection>
        <projection id="proj_L5_E_L4_E" presynapticPopulation="L5_E" postsynapticPopulation="L4_E" synapse="ampa">
            <connectionWD id="0" preCellId="../L5_E/0/GLIF_486052403" postCellId="../L4_E/32/GLIF_486558431" weight="1." delay="1ms"/>
            <connectionWD id="1" preCellId="../L5_E/0/GLIF_486052403" postCellId="../L4_E/86/GLIF_486558431" weight="1." delay="1ms"/>
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        </projection>
        <projection id="proj_L5_E_L4_I" presynapticPopulation="L5_E" postsynapticPopulation="L4_I" synapse="ampa">
            <connectionWD id="0" preCellId="../L5_E/2/GLIF_486052403" postCellId="../L4_I/7/GLIF_566382734" weight="1." delay="1ms"/>
            <connectionWD id="1" preCellId="../L5_E/14/GLIF_486052403" postCellId="../L4_I/8/GLIF_566382734" weight="1." delay="1ms"/>
        </projection>
        <projection id="proj_L5_E_L5_E" presynapticPopulation="L5_E" postsynapticPopulation="L5_E" synapse="ampa">
            <connectionWD id="0" preCellId="../L5_E/2/GLIF_486052403" postCellId="../L5_E/9/GLIF_486052403" weight="1." delay="1ms"/>
            <connectionWD id="1" preCellId="../L5_E/4/GLIF_486052403" postCellId="../L5_E/6/GLIF_486052403" weight="1." delay="1ms"/>
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        </projection>
        <projection id="proj_L5_E_L5_I" presynapticPopulation="L5_E" postsynapticPopulation="L5_I" synapse="ampa">
            <connectionWD id="0" preCellId="../L5_E/2/GLIF_486052403" postCellId="../L5_I/0/GLIF_485904755" weight="1." delay="1ms"/>
            <connectionWD id="1" preCellId="../L5_E/7/GLIF_486052403" postCellId="../L5_I/1/GLIF_485904755" weight="1." delay="1ms"/>
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        </projection>
        <projection id="proj_L5_E_L6_E" presynapticPopulation="L5_E" postsynapticPopulation="L6_E" synapse="ampa">
            <connectionWD id="0" preCellId="../L5_E/0/GLIF_486052403" postCellId="../L6_E/8/GLIF_566303332" weight="1." delay="1ms"/>
            <connectionWD id="1" preCellId="../L5_E/0/GLIF_486052403" postCellId="../L6_E/14/GLIF_566303332" weight="1." delay="1ms"/>
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        </projection>
        <projection id="proj_L5_E_L6_I" presynapticPopulation="L5_E" postsynapticPopulation="L6_I" synapse="ampa">
            <connectionWD id="0" preCellId="../L5_E/0/GLIF_486052403" postCellId="../L6_I/2/GLIF_566357260" weight="1." delay="1ms"/>
            <connectionWD id="1" preCellId="../L5_E/1/GLIF_486052403" postCellId="../L6_I/3/GLIF_566357260" weight="1." delay="1ms"/>
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        </projection>
        <projection id="proj_L5_I_L4_E" presynapticPopulation="L5_I" postsynapticPopulation="L4_E" synapse="gaba"/>
        <projection id="proj_L5_I_L5_E" presynapticPopulation="L5_I" postsynapticPopulation="L5_E" synapse="gaba">
            <connectionWD id="0" preCellId="../L5_I/0/GLIF_485904755" postCellId="../L5_E/0/GLIF_486052403" weight="-1." delay="1ms"/>
            <connectionWD id="1" preCellId="../L5_I/0/GLIF_485904755" postCellId="../L5_E/1/GLIF_486052403" weight="-1." delay="1ms"/>
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        </projection>
        <projection id="proj_L5_I_L5_I" presynapticPopulation="L5_I" postsynapticPopulation="L5_I" synapse="gaba">
            <connectionWD id="0" preCellId="../L5_I/1/GLIF_485904755" postCellId="../L5_I/1/GLIF_485904755" weight="-1." delay="1ms"/>
            <connectionWD id="1" preCellId="../L5_I/1/GLIF_485904755" postCellId="../L5_I/3/GLIF_485904755" weight="-1." delay="1ms"/>
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        </projection>
        <projection id="proj_L5_I_L6_E" presynapticPopulation="L5_I" postsynapticPopulation="L6_E" synapse="gaba">
            <connectionWD id="0" preCellId="../L5_I/0/GLIF_485904755" postCellId="../L6_E/18/GLIF_566303332" weight="-1." delay="1ms"/>
            <connectionWD id="1" preCellId="../L5_I/2/GLIF_485904755" postCellId="../L6_E/22/GLIF_566303332" weight="-1." delay="1ms"/>
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        </projection>
        <projection id="proj_L5_I_L6_I" presynapticPopulation="L5_I" postsynapticPopulation="L6_I" synapse="gaba"/>
        <projection id="proj_L6_E_L23_E" presynapticPopulation="L6_E" postsynapticPopulation="L23_E" synapse="ampa">
            <connectionWD id="0" preCellId="../L6_E/2/GLIF_566303332" postCellId="../L23_E/74/GLIF_566320096" weight="1." delay="1ms"/>
            <connectionWD id="1" preCellId="../L6_E/2/GLIF_566303332" postCellId="../L23_E/95/GLIF_566320096" weight="1." delay="1ms"/>
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        </projection>
        <projection id="proj_L6_E_L23_I" presynapticPopulation="L6_E" postsynapticPopulation="L23_I" synapse="ampa">
            <connectionWD id="0" preCellId="../L6_E/41/GLIF_566303332" postCellId="../L23_I/25/GLIF_489931668" weight="1." delay="1ms"/>
            <connectionWD id="1" preCellId="../L6_E/61/GLIF_566303332" postCellId="../L23_I/27/GLIF_489931668" weight="1." delay="1ms"/>
            <connectionWD id="2" preCellId="../L6_E/70/GLIF_566303332" postCellId="../L23_I/17/GLIF_489931668" weight="1." delay="1ms"/>
        </projection>
        <projection id="proj_L6_E_L4_E" presynapticPopulation="L6_E" postsynapticPopulation="L4_E" synapse="ampa">
            <connectionWD id="0" preCellId="../L6_E/0/GLIF_566303332" postCellId="../L4_E/28/GLIF_486558431" weight="1." delay="1ms"/>
            <connectionWD id="1" preCellId="../L6_E/0/GLIF_566303332" postCellId="../L4_E/41/GLIF_486558431" weight="1." delay="1ms"/>
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        </projection>
        <projection id="proj_L6_E_L4_I" presynapticPopulation="L6_E" postsynapticPopulation="L4_I" synapse="ampa">
            <connectionWD id="0" preCellId="../L6_E/0/GLIF_566303332" postCellId="../L4_I/22/GLIF_566382734" weight="1." delay="1ms"/>
            <connectionWD id="1" preCellId="../L6_E/1/GLIF_566303332" postCellId="../L4_I/0/GLIF_566382734" weight="1." delay="1ms"/>
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        </projection>
        <projection id="proj_L6_E_L5_E" presynapticPopulation="L6_E" postsynapticPopulation="L5_E" synapse="ampa">
            <connectionWD id="0" preCellId="../L6_E/4/GLIF_566303332" postCellId="../L5_E/16/GLIF_486052403" weight="1." delay="1ms"/>
            <connectionWD id="1" preCellId="../L6_E/7/GLIF_566303332" postCellId="../L5_E/6/GLIF_486052403" weight="1." delay="1ms"/>
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        </projection>
        <projection id="proj_L6_E_L5_I" presynapticPopulation="L6_E" postsynapticPopulation="L5_I" synapse="ampa">
            <connectionWD id="0" preCellId="../L6_E/9/GLIF_566303332" postCellId="../L5_I/0/GLIF_485904755" weight="1." delay="1ms"/>
            <connectionWD id="1" preCellId="../L6_E/31/GLIF_566303332" postCellId="../L5_I/2/GLIF_485904755" weight="1." delay="1ms"/>
            <connectionWD id="2" preCellId="../L6_E/62/GLIF_566303332" postCellId="../L5_I/1/GLIF_485904755" weight="1." delay="1ms"/>
        </projection>
        <projection id="proj_L6_E_L6_E" presynapticPopulation="L6_E" postsynapticPopulation="L6_E" synapse="ampa">
            <connectionWD id="0" preCellId="../L6_E/0/GLIF_566303332" postCellId="../L6_E/44/GLIF_566303332" weight="1." delay="1ms"/>
            <connectionWD id="1" preCellId="../L6_E/0/GLIF_566303332" postCellId="../L6_E/49/GLIF_566303332" weight="1." delay="1ms"/>
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        </projection>
        <projection id="proj_L6_E_L6_I" presynapticPopulation="L6_E" postsynapticPopulation="L6_I" synapse="ampa">
            <connectionWD id="0" preCellId="../L6_E/0/GLIF_566303332" postCellId="../L6_I/5/GLIF_566357260" weight="1." delay="1ms"/>
            <connectionWD id="1" preCellId="../L6_E/1/GLIF_566303332" postCellId="../L6_I/8/GLIF_566357260" weight="1." delay="1ms"/>
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        </projection>
        <projection id="proj_L6_I_L6_E" presynapticPopulation="L6_I" postsynapticPopulation="L6_E" synapse="gaba">
            <connectionWD id="0" preCellId="../L6_I/0/GLIF_566357260" postCellId="../L6_E/2/GLIF_566303332" weight="-1." delay="1ms"/>
            <connectionWD id="1" preCellId="../L6_I/0/GLIF_566357260" postCellId="../L6_E/3/GLIF_566303332" weight="-1." delay="1ms"/>
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        </projection>
        <projection id="proj_L6_I_L6_I" presynapticPopulation="L6_I" postsynapticPopulation="L6_I" synapse="gaba">
            <connectionWD id="0" preCellId="../L6_I/0/GLIF_566357260" postCellId="../L6_I/5/GLIF_566357260" weight="-1." delay="1ms"/>
            <connectionWD id="1" preCellId="../L6_I/0/GLIF_566357260" postCellId="../L6_I/8/GLIF_566357260" weight="-1." delay="1ms"/>
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        </projection>
    </network>
</neuroml>
