<neuroml xmlns="http://www.neuroml.org/schema/neuroml2"  xmlns:xs="http://www.w3.org/2001/XMLSchema" xmlns:xsi="http://www.w3.org/2001/XMLSchema-instance" xsi:schemaLocation="http://www.neuroml.org/schema/neuroml2 https://raw.github.com/NeuroML/NeuroML2/development/Schemas/NeuroML2/NeuroML_v2.3.xsd" id="GLIF_net_small">
    <notes>Generated by NeuroMLlite v0.5.1
    Generated network: GLIF_net_small
    Generation seed: 1234
    NeuroMLlite parameters:
        N_scaling = 0.005
        depth = 100
        global_e_scaling = 1
        global_i_scaling = 1
        input_weight = 1
        layer_height = 400
        width = 100</notes>
    <include href="GLIF_net_small__lems.xml"/>
    <expCurrSynapse id="ampa" tau_syn="0.5"/>
    <expCurrSynapse id="gaba" tau_syn="0.5"/>
    <SpikeSourcePoisson id="InputCell" start="0.0ms" duration="10000000000.0ms" rate="150.0Hz"/>
    <network id="GLIF_net_small" type="networkWithTemperature" temperature="32.0degC">
        <notes>Network with GLIF cells</notes>
        <property tag="recommended_dt_ms" value="0.025"/>
        <property tag="recommended_duration_ms" value="100.0"/>
        <population id="L23_E" component="GLIF_566320096" size="103" type="populationList">
            <property tag="type" value="E"/>
            <property tag="region" value="L23"/>
            <instance id="0">
                <location x="96.645353569213881" y="1376.29303967014107" z="0.749147005858719"/>
            </instance>
            <instance id="1">
                <location x="91.09759624491241" y="1575.707598945505651" z="58.222757305894909"/>
            </instance>
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        </population>
        <population id="L23_E_input" component="InputCell" size="103" type="populationList">
            <property tag="region" value="L23"/>
            <instance id="0">
                <location x="98.537259747087177" y="1248.189412189195991" z="59.990558054600918"/>
            </instance>
            <instance id="1">
                <location x="86.507700546502818" y="1413.595475468303903" z="59.356522835349004"/>
            </instance>
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        </population>
        <population id="L23_I" component="GLIF_489931668" size="29" type="populationList">
            <property tag="type" value="I"/>
            <property tag="region" value="L23"/>
            <instance id="0">
                <location x="45.571244573274036" y="1287.239656086878085" z="34.842826908610625"/>
            </instance>
            <instance id="1">
                <location x="33.468536550386318" y="1355.302239522517084" z="69.545234810587004"/>
            </instance>
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        </population>
        <population id="L23_I_input" component="InputCell" size="29" type="populationList">
            <property tag="region" value="L23"/>
            <instance id="0">
                <location x="50.842713332154041" y="1574.613532017867783" z="18.307001190048666"/>
            </instance>
            <instance id="1">
                <location x="37.707002884139797" y="1381.692575174152125" z="91.839883947654528"/>
            </instance>
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        </population>
        <projection id="proj_input_L23_E" presynapticPopulation="L23_E_input" postsynapticPopulation="L23_E" synapse="ampa">
            <connectionWD id="0" preCellId="../L23_E_input/0/InputCell" postCellId="../L23_E/0/GLIF_566320096" weight="1." delay="2ms"/>
            <connectionWD id="1" preCellId="../L23_E_input/1/InputCell" postCellId="../L23_E/1/GLIF_566320096" weight="1." delay="2ms"/>
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        </projection>
        <projection id="proj_input_L23_I" presynapticPopulation="L23_I_input" postsynapticPopulation="L23_I" synapse="ampa">
            <connectionWD id="0" preCellId="../L23_I_input/0/InputCell" postCellId="../L23_I/0/GLIF_489931668" weight="1." delay="2ms"/>
            <connectionWD id="1" preCellId="../L23_I_input/1/InputCell" postCellId="../L23_I/1/GLIF_489931668" weight="1." delay="2ms"/>
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        </projection>
        <projection id="proj_L23_E_L23_E" presynapticPopulation="L23_E" postsynapticPopulation="L23_E" synapse="ampa">
            <connectionWD id="0" preCellId="../L23_E/0/GLIF_566320096" postCellId="../L23_E/2/GLIF_566320096" weight="1." delay="1ms"/>
            <connectionWD id="1" preCellId="../L23_E/0/GLIF_566320096" postCellId="../L23_E/13/GLIF_566320096" weight="1." delay="1ms"/>
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        </projection>
        <projection id="proj_L23_E_L23_I" presynapticPopulation="L23_E" postsynapticPopulation="L23_I" synapse="ampa">
            <connectionWD id="0" preCellId="../L23_E/0/GLIF_566320096" postCellId="../L23_I/8/GLIF_489931668" weight="1." delay="1ms"/>
            <connectionWD id="1" preCellId="../L23_E/0/GLIF_566320096" postCellId="../L23_I/12/GLIF_489931668" weight="1." delay="1ms"/>
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        </projection>
        <projection id="proj_L23_I_L23_E" presynapticPopulation="L23_I" postsynapticPopulation="L23_E" synapse="gaba">
            <connectionWD id="0" preCellId="../L23_I/0/GLIF_489931668" postCellId="../L23_E/6/GLIF_566320096" weight="-1." delay="1ms"/>
            <connectionWD id="1" preCellId="../L23_I/0/GLIF_489931668" postCellId="../L23_E/8/GLIF_566320096" weight="-1." delay="1ms"/>
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        </projection>
        <projection id="proj_L23_I_L23_I" presynapticPopulation="L23_I" postsynapticPopulation="L23_I" synapse="gaba">
            <connectionWD id="0" preCellId="../L23_I/0/GLIF_489931668" postCellId="../L23_I/21/GLIF_489931668" weight="-1." delay="1ms"/>
            <connectionWD id="1" preCellId="../L23_I/0/GLIF_489931668" postCellId="../L23_I/28/GLIF_489931668" weight="-1." delay="1ms"/>
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        </projection>
    </network>
</neuroml>
