<neuroml xmlns="http://www.neuroml.org/schema/neuroml2"  xmlns:xs="http://www.w3.org/2001/XMLSchema" xmlns:xsi="http://www.w3.org/2001/XMLSchema-instance" xsi:schemaLocation="http://www.neuroml.org/schema/neuroml2 https://raw.github.com/NeuroML/NeuroML2/development/Schemas/NeuroML2/NeuroML_v2beta4.xsd" id="NeuroML2_file_exported_from_NEURON">
    <cell id="Cell0">
        <notes>Cell: Cell0 exported from NEURON ModelView</notes>
        <morphology id="morphology">
            <segment id="0" name="Seg0_soma_0">
                <proximal y="4.047470e+02" x="4.458890e+02" z="2.744000e+01" diameter="9.923000e+00"/>
                <distal y="4.047470e+02" x="4.508500e+02" z="2.744000e+01" diameter="9.923000e+00"/>
            </segment>
            <segment id="2" name="Seg1_soma_0">
                <parent fractionAlong="1" segment="0"/>
                <distal y="4.047470e+02" x="4.558120e+02" z="2.744000e+01" diameter="9.923000e+00"/>
            </segment>
            <segment id="1936" name="Seg0_axon_0">
                <parent fractionAlong="1" segment="0"/>
                <proximal y="4.047470e+02" x="4.508510e+02" z="2.744000e+01" diameter="1.000000e+00"/>
                <distal y="4.185630e+02" x="4.566920e+02" z="2.744000e+01" diameter="1.000000e+00"/>
            </segment>
            <segment id="1937" name="Seg1_axon_0">
                <parent fractionAlong="1" segment="1936"/>
                <distal y="4.323790e+02" x="4.625330e+02" z="2.744000e+01" diameter="1.000000e+00"/>
            </segment>
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            <segmentGroup neuroLexId="sao864921383" id="soma_0">
                <notes>This group contains an unbranched set of segments, and all of the segmentGroups marked with
             neuroLexId = sao864921383 form a non-overlapping set of all of the segments.
             These segmentGroups correspond to the 'cables' of NeuroML v1.8.1, and map to/from NEURON sections.</notes>
                <member segment="0"/>
                <member segment="2"/>
            </segmentGroup>
            <segmentGroup neuroLexId="sao864921383" id="axon_0">
                <notes>This group contains an unbranched set of segments, and all of the segmentGroups marked with
             neuroLexId = sao864921383 form a non-overlapping set of all of the segments.
             These segmentGroups correspond to the 'cables' of NeuroML v1.8.1, and map to/from NEURON sections.</notes>
                <member segment="1936"/>
                <member segment="1937"/>
            </segmentGroup>
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            <segmentGroup id="all">
                <include segmentGroup="soma_0"/>
                <include segmentGroup="axon_0"/>
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            </segmentGroup>
            <segmentGroup id="soma">
                <include segmentGroup="soma_0"/>
            </segmentGroup>
            <segmentGroup id="ModelViewParmSubset_2">
                <include segmentGroup="soma_0"/>
                <include segmentGroup="axon_0"/>
                <include segmentGroup="axon_1"/>
            </segmentGroup>
            <segmentGroup id="ModelViewParmSubset_3">
                <include segmentGroup="dend_13"/>
                <include segmentGroup="dend_12"/>
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            </segmentGroup>
            <segmentGroup id="dend">
                <include segmentGroup="dend_13"/>
                <include segmentGroup="dend_12"/>
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            </segmentGroup>
            <segmentGroup id="apic">
                <include segmentGroup="apic_0"/>
                <include segmentGroup="apic_22"/>
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            </segmentGroup>
            <segmentGroup id="axon">
                <include segmentGroup="axon_0"/>
                <include segmentGroup="axon_1"/>
            </segmentGroup>
            <segmentGroup id="OneSecGrp_SectionRef_1">
                <include segmentGroup="soma_0"/>
            </segmentGroup>
        </morphology>
        <biophysicalProperties id="biophys">
            <membraneProperties>
                <channelDensity id="Im_soma" segmentGroup="all" ionChannel="Im" erev="0.0000000000000000000000000000000000mV" condDensity="0.00792310209389 S_per_cm2"/>
                <channelDensity id="Ih_soma" segmentGroup="all" ionChannel="Ih" erev="0.0000000000000000000000000000000000mV" condDensity="8.6126687168e-06 S_per_cm2"/>
                <channelDensity id="NaTs_soma" segmentGroup="all" ionChannel="NaTs" erev="0.0000000000000000000000000000000000mV" condDensity="0.831809300175 S_per_cm2"/>
                <channelDensity id="Nap_soma" segmentGroup="all" ionChannel="Nap" erev="0.0000000000000000000000000000000000mV" condDensity="0.000115827807023 S_per_cm2"/>
                <channelDensity id="K_P_soma" segmentGroup="all" ionChannel="K_P" erev="0.0000000000000000000000000000000000mV" condDensity="0.0198867561396 S_per_cm2"/>
                <channelDensity id="K_T_soma" segmentGroup="all" ionChannel="K_T" erev="0.0000000000000000000000000000000000mV" condDensity="6.50880190316e-05 S_per_cm2"/>
                <channelDensity id="SK_soma" segmentGroup="all" ionChannel="SK" erev="0.0000000000000000000000000000000000mV" condDensity="0.000797995682054 S_per_cm2"/>
                <channelDensity id="Kv3_1_soma" segmentGroup="all" ionChannel="Kv3_1" erev="0.0000000000000000000000000000000000mV" condDensity="0.0281647540563 S_per_cm2"/>
                <channelDensity id="Ca_HVA_soma" segmentGroup="all" ionChannel="Ca_HVA" erev="0.0000000000000000000000000000000000mV" condDensity="2.69146019018e-05 S_per_cm2"/>
                <channelDensity id="Ca_LVA_soma" segmentGroup="all" ionChannel="Ca_LVA" erev="0.0000000000000000000000000000000000mV" condDensity="0.000783164846371 S_per_cm2"/>
                <channelDensity id="pas_soma" segmentGroup="all" ionChannel="pas" erev="0.0000000000000000000000000000000000mV" condDensity="0.000153169097844 S_per_cm2"/>
                <channelDensity id="pas_axon" segmentGroup="all" ionChannel="pas" erev="0.0000000000000000000000000000000000mV" condDensity="0.000323547761688 S_per_cm2"/>
                <channelDensity id="pas_dend" segmentGroup="all" ionChannel="pas" erev="0.0000000000000000000000000000000000mV" condDensity="6.04961563626e-06 S_per_cm2"/>
                <channelDensity id="pas_apic" segmentGroup="all" ionChannel="pas" erev="0.0000000000000000000000000000000000mV" condDensity="1.53841275591e-05 S_per_cm2"/>
                <specificCapacitance segmentGroup="soma" value="1.0 uF_per_cm2"/>
                <specificCapacitance segmentGroup="axon" value="1.0 uF_per_cm2"/>
                <specificCapacitance segmentGroup="apic" value="7.54 uF_per_cm2"/>
                <specificCapacitance segmentGroup="dend" value="7.54 uF_per_cm2"/>
            </membraneProperties>
            <intracellularProperties>
                <species segmentGroup="soma" ion="ca" initialExtConcentration="2 mM" concentrationModel="CaDynamics" id="ca" initialConcentration="0.0001 mM"/>
                <resistivity segmentGroup="all" value="63.36 ohm_cm"/>
            </intracellularProperties>
        </biophysicalProperties>
    </cell>
</neuroml>
