<neuroml xmlns="http://www.neuroml.org/schema/neuroml2"  xmlns:xs="http://www.w3.org/2001/XMLSchema" xmlns:xsi="http://www.w3.org/2001/XMLSchema-instance" xsi:schemaLocation="http://www.neuroml.org/schema/neuroml2 https://raw.github.com/NeuroML/NeuroML2/development/Schemas/NeuroML2/NeuroML_v2beta4.xsd" id="NeuroML2_file_exported_from_NEURON">
    <cell id="Cell_471087975">
        <notes>Cell: Cell0 exported from NEURON ModelView</notes>
        <morphology id="morphology">
            <segment id="0" name="Seg0_soma_0">
                <proximal y="3.466320e+02" x="4.964420e+02" z="5.992000e+01" diameter="1.749620e+01"/>
                <distal y="3.466320e+02" x="5.051900e+02" z="5.992000e+01" diameter="1.749620e+01"/>
            </segment>
            <segment id="2" name="Seg1_soma_0">
                <parent fractionAlong="1" segment="0"/>
                <distal y="3.466320e+02" x="5.139380e+02" z="5.992000e+01" diameter="1.749620e+01"/>
            </segment>
            <segment id="4227" name="Seg0_axon_0">
                <parent fractionAlong="1" segment="0"/>
                <proximal y="3.466320e+02" x="5.051900e+02" z="5.992000e+01" diameter="1.000000e+00"/>
                <distal y="3.604480e+02" x="5.110310e+02" z="5.992000e+01" diameter="1.000000e+00"/>
            </segment>
            <segment id="4228" name="Seg1_axon_0">
                <parent fractionAlong="1" segment="4227"/>
                <distal y="3.742640e+02" x="5.168730e+02" z="5.992000e+01" diameter="1.000000e+00"/>
            </segment>
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            <segmentGroup neuroLexId="sao864921383" id="soma_0">
                <notes>This group contains an unbranched set of segments, and all of the segmentGroups marked with
             neuroLexId = sao864921383 form a non-overlapping set of all of the segments.
             These segmentGroups correspond to the 'cables' of NeuroML v1.8.1, and map to/from NEURON sections.</notes>
                <member segment="0"/>
                <member segment="2"/>
            </segmentGroup>
            <segmentGroup neuroLexId="sao864921383" id="axon_0">
                <notes>This group contains an unbranched set of segments, and all of the segmentGroups marked with
             neuroLexId = sao864921383 form a non-overlapping set of all of the segments.
             These segmentGroups correspond to the 'cables' of NeuroML v1.8.1, and map to/from NEURON sections.</notes>
                <member segment="4227"/>
                <member segment="4228"/>
            </segmentGroup>
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            <segmentGroup id="all">
                <include segmentGroup="soma_0"/>
                <include segmentGroup="axon_0"/>
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            </segmentGroup>
            <segmentGroup id="soma">
                <include segmentGroup="soma_0"/>
            </segmentGroup>
            <segmentGroup id="ModelViewParmSubset_302">
                <include segmentGroup="soma_0"/>
                <include segmentGroup="axon_0"/>
                <include segmentGroup="axon_1"/>
            </segmentGroup>
            <segmentGroup id="ModelViewParmSubset_303">
                <include segmentGroup="dend_44"/>
                <include segmentGroup="dend_43"/>
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            </segmentGroup>
            <segmentGroup id="dend">
                <include segmentGroup="dend_44"/>
                <include segmentGroup="dend_43"/>
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            </segmentGroup>
            <segmentGroup id="apic">
                <include segmentGroup="apic_0"/>
                <include segmentGroup="apic_59"/>
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            </segmentGroup>
            <segmentGroup id="axon">
                <include segmentGroup="axon_0"/>
                <include segmentGroup="axon_1"/>
            </segmentGroup>
            <segmentGroup id="OneSecGrp_SectionRef_13489">
                <include segmentGroup="soma_0"/>
            </segmentGroup>
        </morphology>
        <biophysicalProperties id="biophys">
            <membraneProperties>
                <channelDensity id="Im_soma" segmentGroup="soma" ionChannel="Im" erev="-45 mV" condDensity="5.39250711831e-05 S_per_cm2"/>
                <channelDensity id="Ih_soma" segmentGroup="soma" ionChannel="Ih" erev="-45 mV" condDensity="4.82595208194e-05 S_per_cm2"/>
                <channelDensity id="NaTs_soma" segmentGroup="soma" ionChannel="NaTs" erev="53.0 mV" condDensity="0.408145039435 S_per_cm2"/>
                <channelDensity id="Nap_soma" segmentGroup="soma" ionChannel="Nap" erev="53.0 mV" condDensity="0.000375779858934 S_per_cm2"/>
                <channelDensity id="K_P_soma" segmentGroup="soma" ionChannel="K_P" erev="-107.0 mV" condDensity="0.0322044783378 S_per_cm2"/>
                <channelDensity id="K_T_soma" segmentGroup="soma" ionChannel="K_T" erev="-107.0 mV" condDensity="0.0016342605777 S_per_cm2"/>
                <channelDensity id="SK_soma" segmentGroup="soma" ionChannel="SK" erev="-107.0 mV" condDensity="0.00474434812714 S_per_cm2"/>
                <channelDensity id="Kv3_1_soma" segmentGroup="soma" ionChannel="Kv3_1" erev="-107.0 mV" condDensity="0.183086679305 S_per_cm2"/>
                <channelDensity id="pas_soma" segmentGroup="soma" ionChannel="pas" erev="-90.7508341471 mV" condDensity="0.00010884697518 S_per_cm2"/>
                <channelDensity id="pas_axon" segmentGroup="axon" ionChannel="pas" erev="-90.7508341471 mV" condDensity="0.000485186159326 S_per_cm2"/>
                <channelDensity id="pas_dend" segmentGroup="dend" ionChannel="pas" erev="-90.7508341471 mV" condDensity="1.21841366769e-05 S_per_cm2"/>
                <channelDensity id="pas_apic" segmentGroup="apic" ionChannel="pas" erev="-90.7508341471 mV" condDensity="0.000159058118123 S_per_cm2"/>
                <channelDensityNernst id="Ca_HVA_soma" ionChannel="Ca_HVA" condDensity="0.000889088730003 S_per_cm2" segmentGroup="soma"/>
                <channelDensityNernst id="Ca_LVA_soma" ionChannel="Ca_LVA" condDensity="0.000315764832557 S_per_cm2" segmentGroup="soma"/>
                <specificCapacitance segmentGroup="soma" value="1.0 uF_per_cm2"/>
                <specificCapacitance segmentGroup="axon" value="1.0 uF_per_cm2"/>
                <specificCapacitance segmentGroup="apic" value="2.46 uF_per_cm2"/>
                <specificCapacitance segmentGroup="dend" value="2.46 uF_per_cm2"/>
            </membraneProperties>
            <intracellularProperties>
                <species segmentGroup="soma" ion="ca" initialExtConcentration="2 mM" concentrationModel="CaDynamics" id="ca" initialConcentration="0.0001 mM"/>
                <resistivity segmentGroup="all" value="40.56 ohm_cm"/>
            </intracellularProperties>
        </biophysicalProperties>
    </cell>
</neuroml>
