<neuroml xmlns="http://www.neuroml.org/schema/neuroml2"  xmlns:xs="http://www.w3.org/2001/XMLSchema" xmlns:xsi="http://www.w3.org/2001/XMLSchema-instance" xsi:schemaLocation="http://www.neuroml.org/schema/neuroml2 https://raw.github.com/NeuroML/NeuroML2/development/Schemas/NeuroML2/NeuroML_v2beta5.xsd" id="NeuroML2_file_exported_from_NEURON">
    <include href="Im.channel.nml"></include>
    <include href="Ih.channel.nml"></include>
    <include href="NaTs.channel.nml"></include>
    <include href="Nap.channel.nml"></include>
    <include href="K_P.channel.nml"></include>
    <include href="K_T.channel.nml"></include>
    <include href="SK.channel.nml"></include>
    <include href="Kv3_1.channel.nml"></include>
    <include href="pas.channel.nml"></include>
    <include href="Ca_HVA.channel.nml"></include>
    <include href="Ca_LVA.channel.nml"></include>
    <include href="CaDynamics_all.nml"></include>
    <cell id="Cell_472352327">
        <notes>

Export of a cell model (472352327) obtained from the Allen Institute Cell Types Database into NeuroML2

Electrophysiology on which this model is based: http://celltypes.brain-map.org/mouse/experiment/electrophysiology/327962063

******************************************************
*  This export to NeuroML2 has not yet been fully validated!!
*  Use with caution!!
******************************************************

        </notes>
        <property tag="AIBS:subject:description" value="Mus musculus In Vitro"/>
        <property tag="AIBS:aibs_specimen_id" value="327962063"/>
        <property tag="AIBS:intracellular_ephys:Electrode 1:location" value="Primary visual area, layer 2/3"/>
        <property tag="AIBS:subject:genotype" value="Ai14; Htr3a-Cre_NO152"/>
        <property tag="AIBS:subject:species" value="Mus musculus"/>
        <property tag="AIBS:session_id" value="327962061"/>
        <property tag="AIBS:subject:sex" value="F"/>
        <property tag="AIBS:aibs_dendrite_type" value="aspiny"/>
        <property tag="AIBS:aibs_cre_line" value="Htr3a-Cre_NO152"/>
        <property tag="AIBS:subject:age" value="P48"/>
        <property tag="AIBS:aibs_specimen_name" value="Htr3a-Cre_NO152;Ai14-175482.03.02.01"/>
        <morphology id="morphology">
            <segment id="0" name="Seg0_soma_0">
                <proximal x="3.471630e+02" y="2.714710e+02" z="2.744000e+01" diameter="10.1496"/>
                <distal x="3.522380e+02" y="2.714710e+02" z="2.744000e+01" diameter="10.1496"/>
            </segment>
            <segment id="2" name="Seg1_soma_0">
                <parent segment="0" fractionAlong="1"/>
                <distal x="3.573120e+02" y="2.714710e+02" z="2.744000e+01" diameter="10.1496"/>
            </segment>
            <segment id="1787" name="Seg0_axon_0">
                <parent segment="0" fractionAlong="1"/>
                <proximal x="3.522370e+02" y="2.714710e+02" z="2.744000e+01" diameter="1.0"/>
                <distal x="3.580790e+02" y="2.852870e+02" z="2.744000e+01" diameter="1.0"/>
            </segment>
            <segment id="1788" name="Seg1_axon_0">
                <parent segment="1787" fractionAlong="1"/>
                <distal x="3.639200e+02" y="2.991030e+02" z="2.744000e+01" diameter="1.0"/>
            </segment>
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            <segmentGroup neuroLexId="sao864921383" id="soma_0">
                <notes>This group contains an unbranched set of segments, and all of the segmentGroups marked with
             neuroLexId = sao864921383 form a non-overlapping set of all of the segments.
             These segmentGroups correspond to the 'cables' of NeuroML v1.8.1, and map to/from NEURON sections.</notes>
                <member segment="0"/>
                <member segment="2"/>
            </segmentGroup>
            <segmentGroup neuroLexId="sao864921383" id="axon_0">
                <notes>This group contains an unbranched set of segments, and all of the segmentGroups marked with
             neuroLexId = sao864921383 form a non-overlapping set of all of the segments.
             These segmentGroups correspond to the 'cables' of NeuroML v1.8.1, and map to/from NEURON sections.</notes>
                <member segment="1787"/>
                <member segment="1788"/>
            </segmentGroup>
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            <segmentGroup id="soma">
                <include segmentGroup="soma_0"/>
            </segmentGroup>
            <segmentGroup id="dend">
                <include segmentGroup="dend_32"/>
                <include segmentGroup="dend_7"/>
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            </segmentGroup>
            <segmentGroup id="axon">
                <include segmentGroup="axon_0"/>
                <include segmentGroup="axon_1"/>
            </segmentGroup>
            <segmentGroup id="OneSecGrp_SectionRef_14009">
                <include segmentGroup="soma_0"/>
            </segmentGroup>
            <segmentGroup id="soma_group">
                <include segmentGroup="soma"/>
            </segmentGroup>
            <segmentGroup id="axon_group">
                <include segmentGroup="axon"/>
            </segmentGroup>
            <segmentGroup id="dendrite_group">
                <include segmentGroup="dend"/>
            </segmentGroup>
        </morphology>
        <biophysicalProperties id="biophys">
            <membraneProperties>
                <channelDensity id="Im_soma" ionChannel="Im" condDensity="0.00234754499503 S_per_cm2" erev="-107.0 mV" segmentGroup="soma" ion="k"/>
                <channelDensity id="Ih_soma" ionChannel="Ih" condDensity="8.87044777326e-05 S_per_cm2" erev="-45 mV" segmentGroup="soma" ion="hcn"/>
                <channelDensity id="NaTs_soma" ionChannel="NaTs" condDensity="0.381410789624 S_per_cm2" erev="53.0 mV" segmentGroup="soma" ion="na"/>
                <channelDensity id="Nap_soma" ionChannel="Nap" condDensity="0.000577209476022 S_per_cm2" erev="53.0 mV" segmentGroup="soma" ion="na"/>
                <channelDensity id="K_P_soma" ionChannel="K_P" condDensity="0.000286942336098 S_per_cm2" erev="-107.0 mV" segmentGroup="soma" ion="k"/>
                <channelDensity id="K_T_soma" ionChannel="K_T" condDensity="0.000594379971664 S_per_cm2" erev="-107.0 mV" segmentGroup="soma" ion="k"/>
                <channelDensity id="SK_soma" ionChannel="SK" condDensity="0.000382436993319 S_per_cm2" erev="-107.0 mV" segmentGroup="soma" ion="k"/>
                <channelDensity id="Kv3_1_soma" ionChannel="Kv3_1" condDensity="0.215882249324 S_per_cm2" erev="-107.0 mV" segmentGroup="soma" ion="k"/>
                <channelDensity id="pas_soma" ionChannel="pas" condDensity="9.42914098359e-05 S_per_cm2" erev="-87.4209747314 mV" segmentGroup="soma" ion="non_specific"/>
                <channelDensity id="pas_axon" ionChannel="pas" condDensity="0.000715014834483 S_per_cm2" erev="-87.4209747314 mV" segmentGroup="axon" ion="non_specific"/>
                <channelDensity id="pas_dend" ionChannel="pas" condDensity="2.53387914306e-07 S_per_cm2" erev="-87.4209747314 mV" segmentGroup="dend" ion="non_specific"/>
                <channelDensityNernst id="Ca_HVA_soma" ionChannel="Ca_HVA" condDensity="0.00011909293668 S_per_cm2" segmentGroup="soma" ion="ca"/>
                <channelDensityNernst id="Ca_LVA_soma" ionChannel="Ca_LVA" condDensity="1.45051016667e-05 S_per_cm2" segmentGroup="soma" ion="ca"/>
                <specificCapacitance value="2.30078248791 uF_per_cm2" segmentGroup="soma"/>
                <specificCapacitance value="2.30078248791 uF_per_cm2" segmentGroup="axon"/>
                <specificCapacitance value="2.30078248791 uF_per_cm2" segmentGroup="dend"/>
            </membraneProperties>
            <intracellularProperties>
                <species segmentGroup="soma" id="ca" concentrationModel="CaDynamics_472352327" ion="ca" initialConcentration="0.0001 mM" initialExtConcentration="2 mM"/>
                <resistivity value="67.2992746444 ohm_cm"/>
            </intracellularProperties>
        </biophysicalProperties>
    </cell>
</neuroml>
