<neuroml xmlns="http://www.neuroml.org/schema/neuroml2"  xmlns:xs="http://www.w3.org/2001/XMLSchema" xmlns:xsi="http://www.w3.org/2001/XMLSchema-instance" xsi:schemaLocation="http://www.neuroml.org/schema/neuroml2 https://raw.github.com/NeuroML/NeuroML2/development/Schemas/NeuroML2/NeuroML_v2beta4.xsd" id="NeuroML2_file_exported_from_NEURON">
    <include href="Ih.channel.nml"></include>
    <include href="NaV.channel.nml"></include>
    <include href="Kd.channel.nml"></include>
    <include href="Kv2like.channel.nml"></include>
    <include href="Kv3_1.channel.nml"></include>
    <include href="K_T.channel.nml"></include>
    <include href="Im_v2.channel.nml"></include>
    <include href="SK.channel.nml"></include>
    <include href="pas.channel.nml"></include>
    <include href="Ca_HVA.channel.nml"></include>
    <include href="Ca_LVA.channel.nml"></include>
    <include href="CaDynamics.nml"></include>
    <cell id="Cell_472430904">
        <notes>

Export of a cell model (472430904) obtained from the Allen Institute Cell Types Database into NeuroML2

******************************************************
*  This export to NeuroML2 has not yet been fully validated!!
*  Use with caution!!
******************************************************

</notes>
        <morphology id="morphology">
            <segment id="0" name="Seg0_soma_0">
                <proximal y="9.972250e+02" x="2.914150e+02" z="2.632000e+01" diameter="1.205000e+01"/>
                <distal y="9.972250e+02" x="2.974400e+02" z="2.632000e+01" diameter="1.205000e+01"/>
            </segment>
            <segment id="2" name="Seg1_soma_0">
                <parent fractionAlong="1" segment="0"/>
                <distal y="9.972250e+02" x="3.034650e+02" z="2.632000e+01" diameter="1.205000e+01"/>
            </segment>
            <segment id="3061" name="Seg0_axon_0">
                <parent fractionAlong="1" segment="0"/>
                <proximal y="9.972250e+02" x="2.974400e+02" z="2.632000e+01" diameter="1.000000e+00"/>
                <distal y="1.011040e+03" x="3.032810e+02" z="2.632000e+01" diameter="1.000000e+00"/>
            </segment>
            <segment id="3062" name="Seg1_axon_0">
                <parent fractionAlong="1" segment="3061"/>
                <distal y="1.024860e+03" x="3.091230e+02" z="2.632000e+01" diameter="1.000000e+00"/>
            </segment>
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            <segmentGroup neuroLexId="sao864921383" id="soma_0">
                <notes>This group contains an unbranched set of segments, and all of the segmentGroups marked with
             neuroLexId = sao864921383 form a non-overlapping set of all of the segments.
             These segmentGroups correspond to the 'cables' of NeuroML v1.8.1, and map to/from NEURON sections.</notes>
                <member segment="0"/>
                <member segment="2"/>
            </segmentGroup>
            <segmentGroup neuroLexId="sao864921383" id="axon_0">
                <notes>This group contains an unbranched set of segments, and all of the segmentGroups marked with
             neuroLexId = sao864921383 form a non-overlapping set of all of the segments.
             These segmentGroups correspond to the 'cables' of NeuroML v1.8.1, and map to/from NEURON sections.</notes>
                <member segment="3061"/>
                <member segment="3062"/>
            </segmentGroup>
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            <segmentGroup id="all">
                <include segmentGroup="soma_0"/>
                <include segmentGroup="axon_0"/>
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            </segmentGroup>
            <segmentGroup id="soma">
                <include segmentGroup="soma_0"/>
            </segmentGroup>
            <segmentGroup id="ModelViewParmSubset_484">
                <include segmentGroup="soma_0"/>
                <include segmentGroup="axon_0"/>
                <include segmentGroup="axon_1"/>
            </segmentGroup>
            <segmentGroup id="ModelViewParmSubset_485">
                <include segmentGroup="dend_13"/>
                <include segmentGroup="dend_8"/>
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            </segmentGroup>
            <segmentGroup id="apic">
                <include segmentGroup="apic_0"/>
                <include segmentGroup="apic_4"/>
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            </segmentGroup>
            <segmentGroup id="dend">
                <include segmentGroup="dend_13"/>
                <include segmentGroup="dend_8"/>
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            </segmentGroup>
            <segmentGroup id="axon">
                <include segmentGroup="axon_0"/>
                <include segmentGroup="axon_1"/>
            </segmentGroup>
            <segmentGroup id="OneSecGrp_SectionRef_22777">
                <include segmentGroup="soma_0"/>
            </segmentGroup>
        </morphology>
        <biophysicalProperties id="biophys">
            <membraneProperties>
                <channelDensity id="Ih_soma" segmentGroup="soma" ion="hcn" ionChannel="Ih" erev="-45 mV" condDensity="0.000810136071788 S_per_cm2"/>
                <channelDensity id="NaV_soma" segmentGroup="soma" ion="na" ionChannel="NaV" erev="53.0 mV" condDensity="0.127905055293 S_per_cm2"/>
                <channelDensity id="Kd_soma" segmentGroup="soma" ion="k" ionChannel="Kd" erev="-107.0 mV" condDensity="0.000209483752863 S_per_cm2"/>
                <channelDensity id="Kv2like_soma" segmentGroup="soma" ion="k" ionChannel="Kv2like" erev="-107.0 mV" condDensity="0.0447337904848 S_per_cm2"/>
                <channelDensity id="Kv3_1_soma" segmentGroup="soma" ion="k" ionChannel="Kv3_1" erev="-107.0 mV" condDensity="0.0700343690123 S_per_cm2"/>
                <channelDensity id="K_T_soma" segmentGroup="soma" ion="k" ionChannel="K_T" erev="-107.0 mV" condDensity="0.0352815418769 S_per_cm2"/>
                <channelDensity id="Im_v2_soma" segmentGroup="soma" ion="k" ionChannel="Im_v2" erev="-107.0 mV" condDensity="0.0041090391149 S_per_cm2"/>
                <channelDensity id="SK_soma" segmentGroup="soma" ion="k" ionChannel="SK" erev="-107.0 mV" condDensity="0.00216579346679 S_per_cm2"/>
                <channelDensity id="pas_soma" segmentGroup="soma" ion="non_specific" ionChannel="pas" erev="-85.2242126465 mV" condDensity="6.20497023391e-05 S_per_cm2"/>
                <channelDensity id="pas_axon" segmentGroup="axon" ion="non_specific" ionChannel="pas" erev="-85.2242126465 mV" condDensity="0.000760665712443 S_per_cm2"/>
                <channelDensity id="pas_dend" segmentGroup="dend" ion="non_specific" ionChannel="pas" erev="-85.2242126465 mV" condDensity="0.000518771779351 S_per_cm2"/>
                <channelDensity id="pas_apic" segmentGroup="apic" ion="non_specific" ionChannel="pas" erev="-85.2242126465 mV" condDensity="9.39768054181e-06 S_per_cm2"/>
                <channelDensityNernst id="Ca_HVA_soma" ionChannel="Ca_HVA" condDensity="0.000498631541093 S_per_cm2" segmentGroup="soma" ion="ca"/>
                <channelDensityNernst id="Ca_LVA_soma" ionChannel="Ca_LVA" condDensity="0.000656711414994 S_per_cm2" segmentGroup="soma" ion="ca"/>
                <specificCapacitance segmentGroup="soma" value="1.0 uF_per_cm2"/>
                <specificCapacitance segmentGroup="axon" value="1.0 uF_per_cm2"/>
                <specificCapacitance segmentGroup="apic" value="1.54 uF_per_cm2"/>
                <specificCapacitance segmentGroup="dend" value="1.54 uF_per_cm2"/>
            </membraneProperties>
            <intracellularProperties>
                <species segmentGroup="soma" ion="ca" initialExtConcentration="2 mM" concentrationModel="CaDynamics" id="ca" initialConcentration="0.0001 mM"/>
                <resistivity segmentGroup="all" value="10.0 ohm_cm"/>
            </intracellularProperties>
        </biophysicalProperties>
    </cell>
</neuroml>
