<neuroml xmlns="http://www.neuroml.org/schema/neuroml2"  xmlns:xs="http://www.w3.org/2001/XMLSchema" xmlns:xsi="http://www.w3.org/2001/XMLSchema-instance" xsi:schemaLocation="http://www.neuroml.org/schema/neuroml2 https://raw.github.com/NeuroML/NeuroML2/development/Schemas/NeuroML2/NeuroML_v2beta4.xsd" id="NeuroML2_file_exported_from_NEURON">
    <include href="Im.channel.nml"></include>
    <include href="Ih.channel.nml"></include>
    <include href="NaTs.channel.nml"></include>
    <include href="Nap.channel.nml"></include>
    <include href="K_P.channel.nml"></include>
    <include href="K_T.channel.nml"></include>
    <include href="SK.channel.nml"></include>
    <include href="Kv3_1.channel.nml"></include>
    <include href="pas.channel.nml"></include>
    <include href="Ca_HVA.channel.nml"></include>
    <include href="Ca_LVA.channel.nml"></include>
    <include href="CaDynamics.nml"></include>
    <cell id="Cell_472912107">
        <notes>

Export of a cell model (472912107) obtained from the Allen Institute Cell Types Database into NeuroML2

******************************************************
*  This export to NeuroML2 has not yet been fully validated!!
*  Use with caution!!
******************************************************

</notes>
        <morphology id="morphology">
            <segment id="0" name="Seg0_soma_0">
                <proximal y="5.233800e+02" x="3.105120e+02" z="5.656000e+01" diameter="1.481100e+01"/>
                <distal y="5.233800e+02" x="3.179180e+02" z="5.656000e+01" diameter="1.481100e+01"/>
            </segment>
            <segment id="2" name="Seg1_soma_0">
                <parent fractionAlong="1" segment="0"/>
                <distal y="5.233800e+02" x="3.253230e+02" z="5.656000e+01" diameter="1.481100e+01"/>
            </segment>
            <segment id="4605" name="Seg0_axon_0">
                <parent fractionAlong="1" segment="0"/>
                <proximal y="5.233800e+02" x="3.179170e+02" z="5.656000e+01" diameter="1.000000e+00"/>
                <distal y="5.371960e+02" x="3.237590e+02" z="5.656000e+01" diameter="1.000000e+00"/>
            </segment>
            <segment id="4606" name="Seg1_axon_0">
                <parent fractionAlong="1" segment="4605"/>
                <distal y="5.510120e+02" x="3.296000e+02" z="5.656000e+01" diameter="1.000000e+00"/>
            </segment>
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            <segmentGroup neuroLexId="sao864921383" id="soma_0">
                <notes>This group contains an unbranched set of segments, and all of the segmentGroups marked with
             neuroLexId = sao864921383 form a non-overlapping set of all of the segments.
             These segmentGroups correspond to the 'cables' of NeuroML v1.8.1, and map to/from NEURON sections.</notes>
                <member segment="0"/>
                <member segment="2"/>
            </segmentGroup>
            <segmentGroup neuroLexId="sao864921383" id="axon_0">
                <notes>This group contains an unbranched set of segments, and all of the segmentGroups marked with
             neuroLexId = sao864921383 form a non-overlapping set of all of the segments.
             These segmentGroups correspond to the 'cables' of NeuroML v1.8.1, and map to/from NEURON sections.</notes>
                <member segment="4605"/>
                <member segment="4606"/>
            </segmentGroup>
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            <segmentGroup id="all">
                <include segmentGroup="soma_0"/>
                <include segmentGroup="axon_0"/>
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            </segmentGroup>
            <segmentGroup id="soma">
                <include segmentGroup="soma_0"/>
            </segmentGroup>
            <segmentGroup id="ModelViewParmSubset_278">
                <include segmentGroup="soma_0"/>
                <include segmentGroup="axon_0"/>
                <include segmentGroup="axon_1"/>
            </segmentGroup>
            <segmentGroup id="ModelViewParmSubset_279">
                <include segmentGroup="dend_55"/>
                <include segmentGroup="dend_52"/>
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            </segmentGroup>
            <segmentGroup id="dend">
                <include segmentGroup="dend_55"/>
                <include segmentGroup="dend_52"/>
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            </segmentGroup>
            <segmentGroup id="axon">
                <include segmentGroup="axon_0"/>
                <include segmentGroup="axon_1"/>
            </segmentGroup>
            <segmentGroup id="apic">
                <include segmentGroup="apic_0"/>
                <include segmentGroup="apic_26"/>
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            </segmentGroup>
            <segmentGroup id="OneSecGrp_SectionRef_12945">
                <include segmentGroup="soma_0"/>
            </segmentGroup>
        </morphology>
        <biophysicalProperties id="biophys">
            <membraneProperties>
                <channelDensity id="Im_soma" segmentGroup="soma" ion="k" ionChannel="Im" erev="-107.0 mV" condDensity="0.000384505390317 S_per_cm2"/>
                <channelDensity id="Ih_soma" segmentGroup="soma" ion="hcn" ionChannel="Ih" erev="-45 mV" condDensity="0.00327920075366 S_per_cm2"/>
                <channelDensity id="NaTs_soma" segmentGroup="soma" ion="na" ionChannel="NaTs" erev="53.0 mV" condDensity="0.203068450595 S_per_cm2"/>
                <channelDensity id="Nap_soma" segmentGroup="soma" ion="na" ionChannel="Nap" erev="53.0 mV" condDensity="0.000550504604731 S_per_cm2"/>
                <channelDensity id="K_P_soma" segmentGroup="soma" ion="k" ionChannel="K_P" erev="-107.0 mV" condDensity="0.000461843906956 S_per_cm2"/>
                <channelDensity id="K_T_soma" segmentGroup="soma" ion="k" ionChannel="K_T" erev="-107.0 mV" condDensity="0.000770069637848 S_per_cm2"/>
                <channelDensity id="SK_soma" segmentGroup="soma" ion="k" ionChannel="SK" erev="-107.0 mV" condDensity="8.61022529954e-05 S_per_cm2"/>
                <channelDensity id="Kv3_1_soma" segmentGroup="soma" ion="k" ionChannel="Kv3_1" erev="-107.0 mV" condDensity="0.108700603825 S_per_cm2"/>
                <channelDensity id="pas_soma" segmentGroup="soma" ion="non_specific" ionChannel="pas" erev="-87.9998092651 mV" condDensity="0.000477148616412 S_per_cm2"/>
                <channelDensity id="pas_axon" segmentGroup="axon" ion="non_specific" ionChannel="pas" erev="-87.9998092651 mV" condDensity="0.000634157262691 S_per_cm2"/>
                <channelDensity id="pas_dend" segmentGroup="dend" ion="non_specific" ionChannel="pas" erev="-87.9998092651 mV" condDensity="5.13515410028e-05 S_per_cm2"/>
                <channelDensity id="pas_apic" segmentGroup="apic" ion="non_specific" ionChannel="pas" erev="-87.9998092651 mV" condDensity="0.000664174550377 S_per_cm2"/>
                <channelDensityNernst id="Ca_HVA_soma" ionChannel="Ca_HVA" condDensity="0.00084413827124 S_per_cm2" segmentGroup="soma" ion="ca"/>
                <channelDensityNernst id="Ca_LVA_soma" ionChannel="Ca_LVA" condDensity="0.00397388188808 S_per_cm2" segmentGroup="soma" ion="ca"/>
                <specificCapacitance segmentGroup="soma" value="1.0 uF_per_cm2"/>
                <specificCapacitance segmentGroup="axon" value="1.0 uF_per_cm2"/>
                <specificCapacitance segmentGroup="apic" value="2.93 uF_per_cm2"/>
                <specificCapacitance segmentGroup="dend" value="2.93 uF_per_cm2"/>
            </membraneProperties>
            <intracellularProperties>
                <species segmentGroup="soma" ion="ca" initialExtConcentration="2 mM" concentrationModel="CaDynamics" id="ca" initialConcentration="0.0001 mM"/>
                <resistivity segmentGroup="all" value="492.54 ohm_cm"/>
            </intracellularProperties>
        </biophysicalProperties>
    </cell>
</neuroml>
