<neuroml xmlns="http://www.neuroml.org/schema/neuroml2"  xmlns:xs="http://www.w3.org/2001/XMLSchema" xmlns:xsi="http://www.w3.org/2001/XMLSchema-instance" xsi:schemaLocation="http://www.neuroml.org/schema/neuroml2 https://raw.github.com/NeuroML/NeuroML2/development/Schemas/NeuroML2/NeuroML_v2beta5.xsd" id="NeuroML2_file_exported_from_NEURON">
    <include href="Im.channel.nml"></include>
    <include href="Ih.channel.nml"></include>
    <include href="NaTs.channel.nml"></include>
    <include href="Nap.channel.nml"></include>
    <include href="K_P.channel.nml"></include>
    <include href="K_T.channel.nml"></include>
    <include href="SK.channel.nml"></include>
    <include href="Kv3_1.channel.nml"></include>
    <include href="pas.channel.nml"></include>
    <include href="Ca_HVA.channel.nml"></include>
    <include href="Ca_LVA.channel.nml"></include>
    <include href="CaDynamics_all.nml"></include>
    <cell id="Cell_473835796">
        <notes>

Export of a cell model (473835796) obtained from the Allen Institute Cell Types Database into NeuroML2

Electrophysiology on which this model is based: http://celltypes.brain-map.org/mouse/experiment/electrophysiology/324466858

******************************************************
*  This export to NeuroML2 has not yet been fully validated!!
*  Use with caution!!
******************************************************

        </notes>
        <property tag="AIBS:subject:description" value="Mus musculus In Vitro"/>
        <property tag="AIBS:aibs_specimen_id" value="324466858"/>
        <property tag="AIBS:intracellular_ephys:Electrode 1:location" value="Primary visual area, layer 5"/>
        <property tag="AIBS:subject:genotype" value="Ai14; Sst-IRES-Cre"/>
        <property tag="AIBS:subject:species" value="Mus musculus"/>
        <property tag="AIBS:session_id" value="324466856"/>
        <property tag="AIBS:subject:sex" value="M"/>
        <property tag="AIBS:aibs_dendrite_type" value="sparsely spiny"/>
        <property tag="AIBS:aibs_cre_line" value="Sst-IRES-Cre"/>
        <property tag="AIBS:subject:age" value="P54"/>
        <property tag="AIBS:aibs_specimen_name" value="Sst-IRES-Cre;Ai14-173196.03.02.01"/>
        <morphology id="morphology">
            <segment id="0" name="Seg0_soma_0">
                <proximal x="3.396720e+02" y="3.747740e+02" z="5.208000e+01" diameter="15.7512"/>
                <distal x="3.475470e+02" y="3.747740e+02" z="5.208000e+01" diameter="15.7512"/>
            </segment>
            <segment id="2" name="Seg1_soma_0">
                <parent segment="0" fractionAlong="1"/>
                <distal x="3.554230e+02" y="3.747740e+02" z="5.208000e+01" diameter="15.7512"/>
            </segment>
            <segment id="3466" name="Seg0_axon_0">
                <parent segment="0" fractionAlong="1"/>
                <proximal x="3.475470e+02" y="3.747740e+02" z="5.208000e+01" diameter="1.0"/>
                <distal x="3.533890e+02" y="3.885900e+02" z="5.208000e+01" diameter="1.0"/>
            </segment>
            <segment id="3467" name="Seg1_axon_0">
                <parent segment="3466" fractionAlong="1"/>
                <distal x="3.592300e+02" y="4.024060e+02" z="5.208000e+01" diameter="1.0"/>
            </segment>
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            <segmentGroup neuroLexId="sao864921383" id="soma_0">
                <notes>This group contains an unbranched set of segments, and all of the segmentGroups marked with
             neuroLexId = sao864921383 form a non-overlapping set of all of the segments.
             These segmentGroups correspond to the 'cables' of NeuroML v1.8.1, and map to/from NEURON sections.</notes>
                <member segment="0"/>
                <member segment="2"/>
            </segmentGroup>
            <segmentGroup neuroLexId="sao864921383" id="axon_0">
                <notes>This group contains an unbranched set of segments, and all of the segmentGroups marked with
             neuroLexId = sao864921383 form a non-overlapping set of all of the segments.
             These segmentGroups correspond to the 'cables' of NeuroML v1.8.1, and map to/from NEURON sections.</notes>
                <member segment="3466"/>
                <member segment="3467"/>
            </segmentGroup>
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            <segmentGroup id="soma">
                <include segmentGroup="soma_0"/>
            </segmentGroup>
            <segmentGroup id="ModelViewParmSubset_182">
                <include segmentGroup="soma_0"/>
                <include segmentGroup="axon_0"/>
                <include segmentGroup="axon_1"/>
            </segmentGroup>
            <segmentGroup id="dend">
                <include segmentGroup="dend_38"/>
                <include segmentGroup="dend_37"/>
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            </segmentGroup>
            <segmentGroup id="axon">
                <include segmentGroup="axon_0"/>
                <include segmentGroup="axon_1"/>
            </segmentGroup>
            <segmentGroup id="OneSecGrp_SectionRef_6985">
                <include segmentGroup="soma_0"/>
            </segmentGroup>
            <segmentGroup id="soma_group">
                <include segmentGroup="soma"/>
            </segmentGroup>
            <segmentGroup id="axon_group">
                <include segmentGroup="axon"/>
            </segmentGroup>
            <segmentGroup id="dendrite_group">
                <include segmentGroup="dend"/>
            </segmentGroup>
        </morphology>
        <biophysicalProperties id="biophys">
            <membraneProperties>
                <channelDensity id="Im_soma" ionChannel="Im" condDensity="0.00350230756692 S_per_cm2" erev="-107.0 mV" segmentGroup="soma" ion="k"/>
                <channelDensity id="Ih_soma" ionChannel="Ih" condDensity="9.18464279453e-05 S_per_cm2" erev="-45 mV" segmentGroup="soma" ion="hcn"/>
                <channelDensity id="NaTs_soma" ionChannel="NaTs" condDensity="0.328886751652 S_per_cm2" erev="53.0 mV" segmentGroup="soma" ion="na"/>
                <channelDensity id="Nap_soma" ionChannel="Nap" condDensity="0.000722821454996 S_per_cm2" erev="53.0 mV" segmentGroup="soma" ion="na"/>
                <channelDensity id="K_P_soma" ionChannel="K_P" condDensity="0.00813962624501 S_per_cm2" erev="-107.0 mV" segmentGroup="soma" ion="k"/>
                <channelDensity id="K_T_soma" ionChannel="K_T" condDensity="3.76560326782e-05 S_per_cm2" erev="-107.0 mV" segmentGroup="soma" ion="k"/>
                <channelDensity id="SK_soma" ionChannel="SK" condDensity="0.0430644043007 S_per_cm2" erev="-107.0 mV" segmentGroup="soma" ion="k"/>
                <channelDensity id="Kv3_1_soma" ionChannel="Kv3_1" condDensity="0.213990303251 S_per_cm2" erev="-107.0 mV" segmentGroup="soma" ion="k"/>
                <channelDensity id="pas_soma" ionChannel="pas" condDensity="0.000237068567383 S_per_cm2" erev="-92.1516036987 mV" segmentGroup="soma" ion="non_specific"/>
                <channelDensity id="pas_axon" ionChannel="pas" condDensity="0.000955538958572 S_per_cm2" erev="-92.1516036987 mV" segmentGroup="axon" ion="non_specific"/>
                <channelDensity id="pas_dend" ionChannel="pas" condDensity="3.74904623733e-06 S_per_cm2" erev="-92.1516036987 mV" segmentGroup="dend" ion="non_specific"/>
                <channelDensityNernst id="Ca_HVA_soma" ionChannel="Ca_HVA" condDensity="0.000498915502517 S_per_cm2" segmentGroup="soma" ion="ca"/>
                <channelDensityNernst id="Ca_LVA_soma" ionChannel="Ca_LVA" condDensity="0.00505294676833 S_per_cm2" segmentGroup="soma" ion="ca"/>
                <specificCapacitance value="1.0 uF_per_cm2" segmentGroup="soma"/>
                <specificCapacitance value="1.0 uF_per_cm2" segmentGroup="axon"/>
                <specificCapacitance value="1.7914958081 uF_per_cm2" segmentGroup="dend"/>
            </membraneProperties>
            <intracellularProperties>
                <species segmentGroup="soma" id="ca" concentrationModel="CaDynamics_473835796" ion="ca" initialConcentration="0.0001 mM" initialExtConcentration="2 mM"/>
                <resistivity value="41.081213709 ohm_cm"/>
            </intracellularProperties>
        </biophysicalProperties>
    </cell>
</neuroml>
