<neuroml xmlns="http://www.neuroml.org/schema/neuroml2"  xmlns:xs="http://www.w3.org/2001/XMLSchema" xmlns:xsi="http://www.w3.org/2001/XMLSchema-instance" xsi:schemaLocation="http://www.neuroml.org/schema/neuroml2 https://raw.github.com/NeuroML/NeuroML2/development/Schemas/NeuroML2/NeuroML_v2beta5.xsd" id="NeuroML2_file_exported_from_NEURON">
    <include href="Ih.channel.nml"></include>
    <include href="NaV.channel.nml"></include>
    <include href="Kd.channel.nml"></include>
    <include href="Kv2like.channel.nml"></include>
    <include href="Kv3_1.channel.nml"></include>
    <include href="K_T.channel.nml"></include>
    <include href="Im_v2.channel.nml"></include>
    <include href="SK.channel.nml"></include>
    <include href="pas.channel.nml"></include>
    <include href="Ca_HVA.channel.nml"></include>
    <include href="Ca_LVA.channel.nml"></include>
    <include href="CaDynamics_all.nml"></include>
    <cell id="Cell_482525264">
        <notes>

Export of a cell model (482525264) obtained from the Allen Institute Cell Types Database into NeuroML2

Electrophysiology on which this model is based: http://celltypes.brain-map.org/mouse/experiment/electrophysiology/479770916

******************************************************
*  This export to NeuroML2 has not yet been fully validated!!
*  Use with caution!!
******************************************************

        </notes>
        <property tag="AIBS:subject:description" value="Mus musculus In Vitro"/>
        <property tag="AIBS:aibs_specimen_id" value="479770916"/>
        <property tag="AIBS:intracellular_ephys:Electrode 1:location" value="Anteromedial visual area, layer 5"/>
        <property tag="AIBS:subject:genotype" value="Ai14; Rorb-IRES2-Cre"/>
        <property tag="AIBS:subject:species" value="Mus musculus"/>
        <property tag="AIBS:session_id" value="479770914"/>
        <property tag="AIBS:subject:sex" value="F"/>
        <property tag="AIBS:aibs_dendrite_type" value="spiny"/>
        <property tag="AIBS:aibs_cre_line" value="Rorb-IRES2-Cre"/>
        <property tag="AIBS:subject:age" value="P49"/>
        <property tag="AIBS:aibs_specimen_name" value="Rorb-IRES2-Cre-D;Ai14-196664.06.02.01"/>
        <morphology id="morphology">
            <segment id="0" name="Seg0_soma_0">
                <proximal x="6.010880e+02" y="3.358780e+02" z="8.904000e+01" diameter="12.751"/>
                <distal x="6.074640e+02" y="3.358780e+02" z="8.904000e+01" diameter="12.751"/>
            </segment>
            <segment id="2" name="Seg1_soma_0">
                <parent segment="0" fractionAlong="1"/>
                <distal x="6.138390e+02" y="3.358780e+02" z="8.904000e+01" diameter="12.751"/>
            </segment>
            <segment id="4767" name="Seg0_axon_0">
                <parent segment="0" fractionAlong="1"/>
                <proximal x="6.074640e+02" y="3.358780e+02" z="8.904000e+01" diameter="1.0"/>
                <distal x="6.133050e+02" y="3.496940e+02" z="8.904000e+01" diameter="1.0"/>
            </segment>
            <segment id="4768" name="Seg1_axon_0">
                <parent segment="4767" fractionAlong="1"/>
                <distal x="6.191460e+02" y="3.635100e+02" z="8.904000e+01" diameter="1.0"/>
            </segment>
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            <segmentGroup neuroLexId="sao864921383" id="soma_0">
                <notes>This group contains an unbranched set of segments, and all of the segmentGroups marked with
             neuroLexId = sao864921383 form a non-overlapping set of all of the segments.
             These segmentGroups correspond to the 'cables' of NeuroML v1.8.1, and map to/from NEURON sections.</notes>
                <member segment="0"/>
                <member segment="2"/>
            </segmentGroup>
            <segmentGroup neuroLexId="sao864921383" id="axon_0">
                <notes>This group contains an unbranched set of segments, and all of the segmentGroups marked with
             neuroLexId = sao864921383 form a non-overlapping set of all of the segments.
             These segmentGroups correspond to the 'cables' of NeuroML v1.8.1, and map to/from NEURON sections.</notes>
                <member segment="4767"/>
                <member segment="4768"/>
            </segmentGroup>
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            <segmentGroup id="soma">
                <include segmentGroup="soma_0"/>
            </segmentGroup>
            <segmentGroup id="ModelViewParmSubset_654">
                <include segmentGroup="soma_0"/>
                <include segmentGroup="axon_0"/>
                <include segmentGroup="axon_1"/>
            </segmentGroup>
            <segmentGroup id="ModelViewParmSubset_655">
                <include segmentGroup="apic_0"/>
                <include segmentGroup="dend_40"/>
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            </segmentGroup>
            <segmentGroup id="apic">
                <include segmentGroup="apic_0"/>
                <include segmentGroup="apic_6"/>
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            </segmentGroup>
            <segmentGroup id="dend">
                <include segmentGroup="dend_40"/>
                <include segmentGroup="dend_39"/>
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            </segmentGroup>
            <segmentGroup id="axon">
                <include segmentGroup="axon_0"/>
                <include segmentGroup="axon_1"/>
            </segmentGroup>
            <segmentGroup id="OneSecGrp_SectionRef_27009">
                <include segmentGroup="soma_0"/>
            </segmentGroup>
            <segmentGroup id="soma_group">
                <include segmentGroup="soma"/>
            </segmentGroup>
            <segmentGroup id="axon_group">
                <include segmentGroup="axon"/>
            </segmentGroup>
            <segmentGroup id="dendrite_group">
                <include segmentGroup="dend"/>
            </segmentGroup>
        </morphology>
        <biophysicalProperties id="biophys">
            <membraneProperties>
                <channelDensity id="Ih_soma" ionChannel="Ih" condDensity="0.00020253410923 S_per_cm2" erev="-45 mV" segmentGroup="soma" ion="hcn"/>
                <channelDensity id="NaV_soma" ionChannel="NaV" condDensity="0.136240393148 S_per_cm2" erev="53.0 mV" segmentGroup="soma" ion="na"/>
                <channelDensity id="Kd_soma" ionChannel="Kd" condDensity="7.85631188937e-06 S_per_cm2" erev="-107.0 mV" segmentGroup="soma" ion="k"/>
                <channelDensity id="Kv2like_soma" ionChannel="Kv2like" condDensity="0.126431526506 S_per_cm2" erev="-107.0 mV" segmentGroup="soma" ion="k"/>
                <channelDensity id="Kv3_1_soma" ionChannel="Kv3_1" condDensity="0.130938786189 S_per_cm2" erev="-107.0 mV" segmentGroup="soma" ion="k"/>
                <channelDensity id="K_T_soma" ionChannel="K_T" condDensity="1.69457904753e-06 S_per_cm2" erev="-107.0 mV" segmentGroup="soma" ion="k"/>
                <channelDensity id="Im_v2_soma" ionChannel="Im_v2" condDensity="0.00178890502184 S_per_cm2" erev="-107.0 mV" segmentGroup="soma" ion="k"/>
                <channelDensity id="SK_soma" ionChannel="SK" condDensity="0.0165923745283 S_per_cm2" erev="-107.0 mV" segmentGroup="soma" ion="k"/>
                <channelDensity id="pas_soma" ionChannel="pas" condDensity="0.000102757973538 S_per_cm2" erev="-81.9213638306 mV" segmentGroup="soma" ion="non_specific"/>
                <channelDensity id="pas_axon" ionChannel="pas" condDensity="0.000847514199394 S_per_cm2" erev="-81.9213638306 mV" segmentGroup="axon" ion="non_specific"/>
                <channelDensity id="pas_dend" ionChannel="pas" condDensity="0.000701118944435 S_per_cm2" erev="-81.9213638306 mV" segmentGroup="dend" ion="non_specific"/>
                <channelDensity id="pas_apic" ionChannel="pas" condDensity="1.80610187398e-05 S_per_cm2" erev="-81.9213638306 mV" segmentGroup="apic" ion="non_specific"/>
                <channelDensityNernst id="Ca_HVA_soma" ionChannel="Ca_HVA" condDensity="0.000415653727758 S_per_cm2" segmentGroup="soma" ion="ca"/>
                <channelDensityNernst id="Ca_LVA_soma" ionChannel="Ca_LVA" condDensity="0.00196209802377 S_per_cm2" segmentGroup="soma" ion="ca"/>
                <specificCapacitance value="1.0 uF_per_cm2" segmentGroup="soma"/>
                <specificCapacitance value="1.0 uF_per_cm2" segmentGroup="axon"/>
                <specificCapacitance value="3.57467063413 uF_per_cm2" segmentGroup="dend"/>
                <specificCapacitance value="3.57467063413 uF_per_cm2" segmentGroup="apic"/>
            </membraneProperties>
            <intracellularProperties>
                <species segmentGroup="soma" id="ca" concentrationModel="CaDynamics_482525264" ion="ca" initialConcentration="0.0001 mM" initialExtConcentration="2 mM"/>
                <resistivity value="19.92726621 ohm_cm"/>
            </intracellularProperties>
        </biophysicalProperties>
    </cell>
</neuroml>
