<neuroml xmlns="http://www.neuroml.org/schema/neuroml2"  xmlns:xs="http://www.w3.org/2001/XMLSchema" xmlns:xsi="http://www.w3.org/2001/XMLSchema-instance" xsi:schemaLocation="http://www.neuroml.org/schema/neuroml2 https://raw.github.com/NeuroML/NeuroML2/development/Schemas/NeuroML2/NeuroML_v2.3.1.xsd" id="NeuroML2_file_exported_from_NEURON">
    <include href="Ih.channel.nml"/>
    <include href="NaV.channel.nml"/>
    <include href="Kd.channel.nml"/>
    <include href="Kv2like.channel.nml"/>
    <include href="Kv3_1.channel.nml"/>
    <include href="K_T.channel.nml"/>
    <include href="Im_v2.channel.nml"/>
    <include href="SK.channel.nml"/>
    <include href="pas.channel.nml"/>
    <include href="Ca_HVA.channel.nml"/>
    <include href="Ca_LVA.channel.nml"/>
    <include href="CaDynamics_all.nml"/>
    <cell id="Cell_486556597">
        <notes>

Export of a cell model (486556597) obtained from the Allen Institute Cell Types Database into NeuroML2

Electrophysiology on which this model is based: http://celltypes.brain-map.org/mouse/experiment/electrophysiology/486052980

******************************************************
*  This export to NeuroML2 has not yet been fully validated!!
*  Use with caution!!
******************************************************

        </notes>
        <property tag="AIBS:aibs_dendrite_type" value="spiny"/>
        <property tag="AIBS:aibs_cre_line" value="Rbp4-Cre_KL100"/>
        <property tag="AIBS:aibs_specimen_id" value="486052980"/>
        <property tag="AIBS:aibs_specimen_name" value="Rbp4-Cre_KL100;Ai14-205726.03.02.01"/>
        <property tag="AIBS:intracellular_ephys:Electrode 1:location" value="Primary visual area, layer 5"/>
        <property tag="AIBS:session_id" value="486052978"/>
        <property tag="AIBS:subject:age" value="9 wks"/>
        <property tag="AIBS:subject:description" value="Mus musculus In Vitro"/>
        <property tag="AIBS:subject:genotype" value="Ai14(RCL-tdT); Rbp4-Cre_KL100"/>
        <property tag="AIBS:subject:sex" value="F"/>
        <property tag="AIBS:subject:species" value="Mus musculus"/>
        <morphology id="morphology">
            <segment id="0" name="Seg0_soma_0">
                <proximal x="409.607" y="696.689" z="27.5223" diameter="16.9198"/>
                <distal x="418.067" y="696.689" z="27.5223" diameter="16.9198"/>
            </segment>
            <segment id="2" name="Seg1_soma_0">
                <parent segment="0"/>
                <distal x="426.527" y="696.689" z="27.5223" diameter="16.9198"/>
            </segment>
            <segment id="3501" name="Seg0_axon_0">
                <parent segment="0"/>
                <proximal x="418.067" y="696.689" z="27.5223" diameter="1.0"/>
                <distal x="423.908" y="710.505" z="27.5223" diameter="1.0"/>
            </segment>
            <segment id="3502" name="Seg1_axon_0">
                <parent segment="3501"/>
                <distal x="429.749" y="724.321" z="27.5223" diameter="1.0"/>
            </segment>
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            <segmentGroup id="soma_0" neuroLexId="sao864921383">
                <notes>This group contains an unbranched set of segments, and all of the segmentGroups marked with
             neuroLexId = sao864921383 form a non-overlapping set of all of the segments.
             These segmentGroups correspond to the 'cables' of NeuroML v1.8.1, and map to/from NEURON sections.</notes>
                <member segment="0"/>
                <member segment="2"/>
            </segmentGroup>
            <segmentGroup id="axon_0" neuroLexId="sao864921383">
                <notes>This group contains an unbranched set of segments, and all of the segmentGroups marked with
             neuroLexId = sao864921383 form a non-overlapping set of all of the segments.
             These segmentGroups correspond to the 'cables' of NeuroML v1.8.1, and map to/from NEURON sections.</notes>
                <member segment="3501"/>
                <member segment="3502"/>
            </segmentGroup>
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            <segmentGroup id="axon">
                <include segmentGroup="axon_0"/>
                <include segmentGroup="axon_1"/>
            </segmentGroup>
            <segmentGroup id="dend">
                <include segmentGroup="dend_0"/>
                <include segmentGroup="dend_1"/>
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            </segmentGroup>
            <segmentGroup id="apic">
                <include segmentGroup="apic_0"/>
                <include segmentGroup="apic_1"/>
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            </segmentGroup>
            <segmentGroup id="soma">
                <include segmentGroup="soma_0"/>
            </segmentGroup>
            <segmentGroup id="soma_group" neuroLexId="GO:0043025">
                <notes>Default soma segment group for the cell</notes>
                <include segmentGroup="soma"/>
            </segmentGroup>
            <segmentGroup id="axon_group" neuroLexId="GO:0030424">
                <notes>Default axon segment group for the cell</notes>
                <include segmentGroup="axon"/>
            </segmentGroup>
            <segmentGroup id="dendrite_group" neuroLexId="GO:0030425">
                <notes>Default dendrite segment group for the cell</notes>
                <include segmentGroup="apic"/>
                <include segmentGroup="dend"/>
            </segmentGroup>
            <segmentGroup id="all">
                <include segmentGroup="apic_0"/>
                <include segmentGroup="apic_1"/>
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            </segmentGroup>
        </morphology>
        <biophysicalProperties id="biophys">
            <membraneProperties>
                <channelDensity id="Ih_soma" ionChannel="Ih" condDensity="0.002795010900949638 S_per_cm2" erev="-45 mV" segmentGroup="soma" ion="hcn"/>
                <channelDensity id="NaV_soma" ionChannel="NaV" condDensity="0.1214543607598112 S_per_cm2" erev="53.0 mV" segmentGroup="soma" ion="na"/>
                <channelDensity id="Kd_soma" ionChannel="Kd" condDensity="3.630173538327064e-06 S_per_cm2" erev="-107.0 mV" segmentGroup="soma" ion="k"/>
                <channelDensity id="Kv2like_soma" ionChannel="Kv2like" condDensity="1.3504999444302612e-06 S_per_cm2" erev="-107.0 mV" segmentGroup="soma" ion="k"/>
                <channelDensity id="Kv3_1_soma" ionChannel="Kv3_1" condDensity="0.17413579576042193 S_per_cm2" erev="-107.0 mV" segmentGroup="soma" ion="k"/>
                <channelDensity id="K_T_soma" ionChannel="K_T" condDensity="0.00010705237247388144 S_per_cm2" erev="-107.0 mV" segmentGroup="soma" ion="k"/>
                <channelDensity id="Im_v2_soma" ionChannel="Im_v2" condDensity="0.0034573932203600167 S_per_cm2" erev="-107.0 mV" segmentGroup="soma" ion="k"/>
                <channelDensity id="SK_soma" ionChannel="SK" condDensity="6.474019331736969e-08 S_per_cm2" erev="-107.0 mV" segmentGroup="soma" ion="k"/>
                <channelDensity id="pas_soma" ionChannel="pas" condDensity="3.1184952452207235e-07 S_per_cm2" erev="-83.80094528198242 mV" segmentGroup="soma" ion="non_specific"/>
                <channelDensity id="pas_axon" ionChannel="pas" condDensity="0.00011584470371833207 S_per_cm2" erev="-83.80094528198242 mV" segmentGroup="axon" ion="non_specific"/>
                <channelDensity id="pas_dend" ionChannel="pas" condDensity="0.0003103899284979964 S_per_cm2" erev="-83.80094528198242 mV" segmentGroup="dend" ion="non_specific"/>
                <channelDensity id="pas_apic" ionChannel="pas" condDensity="0.0003161781573146167 S_per_cm2" erev="-83.80094528198242 mV" segmentGroup="apic" ion="non_specific"/>
                <channelDensityNernst id="Ca_HVA_soma" ionChannel="Ca_HVA" condDensity="0.0003793475959679695 S_per_cm2" segmentGroup="soma" ion="ca"/>
                <channelDensityNernst id="Ca_LVA_soma" ionChannel="Ca_LVA" condDensity="0.007366836657429051 S_per_cm2" segmentGroup="soma" ion="ca"/>
                <spikeThresh value="10mV"/>
                <specificCapacitance value="1.0 uF_per_cm2" segmentGroup="soma"/>
                <specificCapacitance value="1.0 uF_per_cm2" segmentGroup="axon"/>
                <specificCapacitance value="3.0310081225124685 uF_per_cm2" segmentGroup="dend"/>
                <specificCapacitance value="3.0310081225124685 uF_per_cm2" segmentGroup="apic"/>
                <initMembPotential value="-80mV"/>
            </membraneProperties>
            <intracellularProperties>
                <species id="ca" concentrationModel="CaDynamics_486556597" ion="ca" initialConcentration="0.0001 mM" initialExtConcentration="2 mM" segmentGroup="soma"/>
                <resistivity value="37.5175891904 ohm_cm"/>
            </intracellularProperties>
        </biophysicalProperties>
    </cell>
</neuroml>
