<neuroml xmlns="http://www.neuroml.org/schema/neuroml2"  xmlns:xs="http://www.w3.org/2001/XMLSchema" xmlns:xsi="http://www.w3.org/2001/XMLSchema-instance" xsi:schemaLocation="http://www.neuroml.org/schema/neuroml2 https://raw.github.com/NeuroML/NeuroML2/development/Schemas/NeuroML2/NeuroML_v2.3.1.xsd" id="NeuroML2_file_exported_from_NEURON">
    <include href="Ih.channel.nml"/>
    <include href="NaV.channel.nml"/>
    <include href="Kd.channel.nml"/>
    <include href="Kv2like.channel.nml"/>
    <include href="Kv3_1.channel.nml"/>
    <include href="K_T.channel.nml"/>
    <include href="Im_v2.channel.nml"/>
    <include href="SK.channel.nml"/>
    <include href="pas.channel.nml"/>
    <include href="Ca_HVA.channel.nml"/>
    <include href="Ca_LVA.channel.nml"/>
    <include href="CaDynamics_all.nml"/>
    <cell id="Cell_488462965">
        <notes>

Export of a cell model (488462965) obtained from the Allen Institute Cell Types Database into NeuroML2

Electrophysiology on which this model is based: http://celltypes.brain-map.org/mouse/experiment/electrophysiology/487667205

******************************************************
*  This export to NeuroML2 has not yet been fully validated!!
*  Use with caution!!
******************************************************

        </notes>
        <property tag="AIBS:aibs_dendrite_type" value="aspiny"/>
        <property tag="AIBS:aibs_cre_line" value="Pvalb-IRES-Cre"/>
        <property tag="AIBS:aibs_specimen_id" value="487667205"/>
        <property tag="AIBS:aibs_specimen_name" value="Pvalb-IRES-Cre;Ai14-212813.03.01.01"/>
        <property tag="AIBS:intracellular_ephys:Electrode 1:location" value="Primary visual area, layer 4"/>
        <property tag="AIBS:session_id" value="487667203"/>
        <property tag="AIBS:subject:age" value="P74"/>
        <property tag="AIBS:subject:description" value="Mus musculus In Vitro"/>
        <property tag="AIBS:subject:genotype" value="Ai14(RCL-tdT); Pvalb-IRES-Cre"/>
        <property tag="AIBS:subject:sex" value="M"/>
        <property tag="AIBS:subject:species" value="Mus musculus"/>
        <morphology id="morphology">
            <segment id="0" name="Seg0_soma_0">
                <proximal x="413.788" y="412.183" z="44.24" diameter="12.3484"/>
                <distal x="419.962" y="412.183" z="44.24" diameter="12.3484"/>
            </segment>
            <segment id="2" name="Seg1_soma_0">
                <parent segment="0"/>
                <distal x="426.137" y="412.183" z="44.24" diameter="12.3484"/>
            </segment>
            <segment id="1279" name="Seg0_axon_0">
                <parent segment="0"/>
                <proximal x="419.962" y="412.183" z="44.24" diameter="1.0"/>
                <distal x="425.804" y="425.999" z="44.24" diameter="1.0"/>
            </segment>
            <segment id="1280" name="Seg1_axon_0">
                <parent segment="1279"/>
                <distal x="431.645" y="439.815" z="44.24" diameter="1.0"/>
            </segment>
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            <segmentGroup id="soma_0" neuroLexId="sao864921383">
                <notes>This group contains an unbranched set of segments, and all of the segmentGroups marked with
             neuroLexId = sao864921383 form a non-overlapping set of all of the segments.
             These segmentGroups correspond to the 'cables' of NeuroML v1.8.1, and map to/from NEURON sections.</notes>
                <member segment="0"/>
                <member segment="2"/>
            </segmentGroup>
            <segmentGroup id="axon_0" neuroLexId="sao864921383">
                <notes>This group contains an unbranched set of segments, and all of the segmentGroups marked with
             neuroLexId = sao864921383 form a non-overlapping set of all of the segments.
             These segmentGroups correspond to the 'cables' of NeuroML v1.8.1, and map to/from NEURON sections.</notes>
                <member segment="1279"/>
                <member segment="1280"/>
            </segmentGroup>
            <segmentGroup id="dend_17" neuroLexId="sao864921383">
                <notes>This group contains an unbranched set of segments, and all of the segmentGroups marked with
             neuroLexId = sao864921383 form a non-overlapping set of all of the segments.
             These segmentGroups correspond to the 'cables' of NeuroML v1.8.1, and map to/from NEURON sections.</notes>
                <member segment="1265"/>
                <member segment="1266"/>
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            </segmentGroup>
            <segmentGroup id="dend_14" neuroLexId="sao864921383">
                <notes>This group contains an unbranched set of segments, and all of the segmentGroups marked with
             neuroLexId = sao864921383 form a non-overlapping set of all of the segments.
             These segmentGroups correspond to the 'cables' of NeuroML v1.8.1, and map to/from NEURON sections.</notes>
                <member segment="1081"/>
                <member segment="1082"/>
                <member segment="1083"/>
                <member segment="1084"/>
            </segmentGroup>
            <segmentGroup id="dend_11" neuroLexId="sao864921383">
                <notes>This group contains an unbranched set of segments, and all of the segmentGroups marked with
             neuroLexId = sao864921383 form a non-overlapping set of all of the segments.
             These segmentGroups correspond to the 'cables' of NeuroML v1.8.1, and map to/from NEURON sections.</notes>
                <member segment="906"/>
                <member segment="907"/>
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            </segmentGroup>
            <segmentGroup id="dend_8" neuroLexId="sao864921383">
                <notes>This group contains an unbranched set of segments, and all of the segmentGroups marked with
             neuroLexId = sao864921383 form a non-overlapping set of all of the segments.
             These segmentGroups correspond to the 'cables' of NeuroML v1.8.1, and map to/from NEURON sections.</notes>
                <member segment="654"/>
                <member segment="655"/>
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            </segmentGroup>
            <segmentGroup id="dend_7" neuroLexId="sao864921383">
                <notes>This group contains an unbranched set of segments, and all of the segmentGroups marked with
             neuroLexId = sao864921383 form a non-overlapping set of all of the segments.
             These segmentGroups correspond to the 'cables' of NeuroML v1.8.1, and map to/from NEURON sections.</notes>
                <property tag="numberInternalDivisions" value="3"/>
                <annotation>
                    <property xmlns="http://www.neuroml.org/schema/neuroml2" xmlns:xsi="http://www.w3.org/2001/XMLSchema-instance" tag="numberInternalDivisions" value="3"/>

                </annotation>
                <member segment="601"/>
                <member segment="602"/>
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            </segmentGroup>
            <segmentGroup id="dend_6" neuroLexId="sao864921383">
                <notes>This group contains an unbranched set of segments, and all of the segmentGroups marked with
             neuroLexId = sao864921383 form a non-overlapping set of all of the segments.
             These segmentGroups correspond to the 'cables' of NeuroML v1.8.1, and map to/from NEURON sections.</notes>
                <property tag="numberInternalDivisions" value="11"/>
                <annotation>
                    <property xmlns="http://www.neuroml.org/schema/neuroml2" xmlns:xsi="http://www.w3.org/2001/XMLSchema-instance" tag="numberInternalDivisions" value="11"/>

                </annotation>
                <member segment="424"/>
                <member segment="425"/>
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            </segmentGroup>
            <segmentGroup id="dend_3" neuroLexId="sao864921383">
                <notes>This group contains an unbranched set of segments, and all of the segmentGroups marked with
             neuroLexId = sao864921383 form a non-overlapping set of all of the segments.
             These segmentGroups correspond to the 'cables' of NeuroML v1.8.1, and map to/from NEURON sections.</notes>
                <property tag="numberInternalDivisions" value="3"/>
                <annotation>
                    <property xmlns="http://www.neuroml.org/schema/neuroml2" xmlns:xsi="http://www.w3.org/2001/XMLSchema-instance" tag="numberInternalDivisions" value="3"/>

                </annotation>
                <member segment="221"/>
                <member segment="222"/>
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            </segmentGroup>
            <segmentGroup id="dend_0" neuroLexId="sao864921383">
                <notes>This group contains an unbranched set of segments, and all of the segmentGroups marked with
             neuroLexId = sao864921383 form a non-overlapping set of all of the segments.
             These segmentGroups correspond to the 'cables' of NeuroML v1.8.1, and map to/from NEURON sections.</notes>
                <member segment="3"/>
                <member segment="4"/>
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            </segmentGroup>
            <segmentGroup id="axon_1" neuroLexId="sao864921383">
                <notes>This group contains an unbranched set of segments, and all of the segmentGroups marked with
             neuroLexId = sao864921383 form a non-overlapping set of all of the segments.
             These segmentGroups correspond to the 'cables' of NeuroML v1.8.1, and map to/from NEURON sections.</notes>
                <member segment="1281"/>
                <member segment="1282"/>
            </segmentGroup>
            <segmentGroup id="dend_16" neuroLexId="sao864921383">
                <notes>This group contains an unbranched set of segments, and all of the segmentGroups marked with
             neuroLexId = sao864921383 form a non-overlapping set of all of the segments.
             These segmentGroups correspond to the 'cables' of NeuroML v1.8.1, and map to/from NEURON sections.</notes>
                <property tag="numberInternalDivisions" value="9"/>
                <annotation>
                    <property xmlns="http://www.neuroml.org/schema/neuroml2" xmlns:xsi="http://www.w3.org/2001/XMLSchema-instance" tag="numberInternalDivisions" value="9"/>

                </annotation>
                <member segment="1101"/>
                <member segment="1102"/>
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            </segmentGroup>
            <segmentGroup id="dend_15" neuroLexId="sao864921383">
                <notes>This group contains an unbranched set of segments, and all of the segmentGroups marked with
             neuroLexId = sao864921383 form a non-overlapping set of all of the segments.
             These segmentGroups correspond to the 'cables' of NeuroML v1.8.1, and map to/from NEURON sections.</notes>
                <member segment="1085"/>
                <member segment="1086"/>
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            </segmentGroup>
            <segmentGroup id="dend_13" neuroLexId="sao864921383">
                <notes>This group contains an unbranched set of segments, and all of the segmentGroups marked with
             neuroLexId = sao864921383 form a non-overlapping set of all of the segments.
             These segmentGroups correspond to the 'cables' of NeuroML v1.8.1, and map to/from NEURON sections.</notes>
                <member segment="1060"/>
                <member segment="1061"/>
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            </segmentGroup>
            <segmentGroup id="dend_12" neuroLexId="sao864921383">
                <notes>This group contains an unbranched set of segments, and all of the segmentGroups marked with
             neuroLexId = sao864921383 form a non-overlapping set of all of the segments.
             These segmentGroups correspond to the 'cables' of NeuroML v1.8.1, and map to/from NEURON sections.</notes>
                <property tag="numberInternalDivisions" value="9"/>
                <annotation>
                    <property xmlns="http://www.neuroml.org/schema/neuroml2" xmlns:xsi="http://www.w3.org/2001/XMLSchema-instance" tag="numberInternalDivisions" value="9"/>

                </annotation>
                <member segment="912"/>
                <member segment="913"/>
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            </segmentGroup>
            <segmentGroup id="dend_10" neuroLexId="sao864921383">
                <notes>This group contains an unbranched set of segments, and all of the segmentGroups marked with
             neuroLexId = sao864921383 form a non-overlapping set of all of the segments.
             These segmentGroups correspond to the 'cables' of NeuroML v1.8.1, and map to/from NEURON sections.</notes>
                <property tag="numberInternalDivisions" value="9"/>
                <annotation>
                    <property xmlns="http://www.neuroml.org/schema/neuroml2" xmlns:xsi="http://www.w3.org/2001/XMLSchema-instance" tag="numberInternalDivisions" value="9"/>

                </annotation>
                <member segment="766"/>
                <member segment="767"/>
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            </segmentGroup>
            <segmentGroup id="dend_9" neuroLexId="sao864921383">
                <notes>This group contains an unbranched set of segments, and all of the segmentGroups marked with
             neuroLexId = sao864921383 form a non-overlapping set of all of the segments.
             These segmentGroups correspond to the 'cables' of NeuroML v1.8.1, and map to/from NEURON sections.</notes>
                <property tag="numberInternalDivisions" value="7"/>
                <annotation>
                    <property xmlns="http://www.neuroml.org/schema/neuroml2" xmlns:xsi="http://www.w3.org/2001/XMLSchema-instance" tag="numberInternalDivisions" value="7"/>

                </annotation>
                <member segment="660"/>
                <member segment="661"/>
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            </segmentGroup>
            <segmentGroup id="dend_5" neuroLexId="sao864921383">
                <notes>This group contains an unbranched set of segments, and all of the segmentGroups marked with
             neuroLexId = sao864921383 form a non-overlapping set of all of the segments.
             These segmentGroups correspond to the 'cables' of NeuroML v1.8.1, and map to/from NEURON sections.</notes>
                <property tag="numberInternalDivisions" value="7"/>
                <annotation>
                    <property xmlns="http://www.neuroml.org/schema/neuroml2" xmlns:xsi="http://www.w3.org/2001/XMLSchema-instance" tag="numberInternalDivisions" value="7"/>

                </annotation>
                <member segment="306"/>
                <member segment="307"/>
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            </segmentGroup>
            <segmentGroup id="dend_4" neuroLexId="sao864921383">
                <notes>This group contains an unbranched set of segments, and all of the segmentGroups marked with
             neuroLexId = sao864921383 form a non-overlapping set of all of the segments.
             These segmentGroups correspond to the 'cables' of NeuroML v1.8.1, and map to/from NEURON sections.</notes>
                <property tag="numberInternalDivisions" value="3"/>
                <annotation>
                    <property xmlns="http://www.neuroml.org/schema/neuroml2" xmlns:xsi="http://www.w3.org/2001/XMLSchema-instance" tag="numberInternalDivisions" value="3"/>

                </annotation>
                <member segment="269"/>
                <member segment="270"/>
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            </segmentGroup>
            <segmentGroup id="dend_2" neuroLexId="sao864921383">
                <notes>This group contains an unbranched set of segments, and all of the segmentGroups marked with
             neuroLexId = sao864921383 form a non-overlapping set of all of the segments.
             These segmentGroups correspond to the 'cables' of NeuroML v1.8.1, and map to/from NEURON sections.</notes>
                <property tag="numberInternalDivisions" value="7"/>
                <annotation>
                    <property xmlns="http://www.neuroml.org/schema/neuroml2" xmlns:xsi="http://www.w3.org/2001/XMLSchema-instance" tag="numberInternalDivisions" value="7"/>

                </annotation>
                <member segment="88"/>
                <member segment="89"/>
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            </segmentGroup>
            <segmentGroup id="dend_1" neuroLexId="sao864921383">
                <notes>This group contains an unbranched set of segments, and all of the segmentGroups marked with
             neuroLexId = sao864921383 form a non-overlapping set of all of the segments.
             These segmentGroups correspond to the 'cables' of NeuroML v1.8.1, and map to/from NEURON sections.</notes>
                <property tag="numberInternalDivisions" value="3"/>
                <annotation>
                    <property xmlns="http://www.neuroml.org/schema/neuroml2" xmlns:xsi="http://www.w3.org/2001/XMLSchema-instance" tag="numberInternalDivisions" value="3"/>

                </annotation>
                <member segment="32"/>
                <member segment="33"/>
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            </segmentGroup>
            <segmentGroup id="ModelViewParmSubset_1891">
                <include segmentGroup="soma_0"/>
            </segmentGroup>
            <segmentGroup id="dend">
                <include segmentGroup="dend_0"/>
                <include segmentGroup="dend_1"/>
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            </segmentGroup>
            <segmentGroup id="axon">
                <include segmentGroup="axon_0"/>
                <include segmentGroup="axon_1"/>
            </segmentGroup>
            <segmentGroup id="soma">
                <include segmentGroup="soma_0"/>
            </segmentGroup>
            <segmentGroup id="soma_group" neuroLexId="GO:0043025">
                <notes>Default soma segment group for the cell</notes>
                <include segmentGroup="soma"/>
            </segmentGroup>
            <segmentGroup id="axon_group" neuroLexId="GO:0030424">
                <notes>Default axon segment group for the cell</notes>
                <include segmentGroup="axon"/>
            </segmentGroup>
            <segmentGroup id="dendrite_group" neuroLexId="GO:0030425">
                <notes>Default dendrite segment group for the cell</notes>
                <include segmentGroup="dend"/>
            </segmentGroup>
            <segmentGroup id="all">
                <include segmentGroup="axon_0"/>
                <include segmentGroup="axon_1"/>
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            </segmentGroup>
        </morphology>
        <biophysicalProperties id="biophys">
            <membraneProperties>
                <channelDensity id="Ih_soma" ionChannel="Ih" condDensity="0.000909952102214762 S_per_cm2" erev="-45 mV" segmentGroup="soma" ion="hcn"/>
                <channelDensity id="NaV_soma" ionChannel="NaV" condDensity="0.08190694647870206 S_per_cm2" erev="53.0 mV" segmentGroup="soma" ion="na"/>
                <channelDensity id="Kd_soma" ionChannel="Kd" condDensity="2.4740872017758875e-08 S_per_cm2" erev="-107.0 mV" segmentGroup="soma" ion="k"/>
                <channelDensity id="Kv2like_soma" ionChannel="Kv2like" condDensity="0.00160565599090932 S_per_cm2" erev="-107.0 mV" segmentGroup="soma" ion="k"/>
                <channelDensity id="Kv3_1_soma" ionChannel="Kv3_1" condDensity="2.296430043469444 S_per_cm2" erev="-107.0 mV" segmentGroup="soma" ion="k"/>
                <channelDensity id="K_T_soma" ionChannel="K_T" condDensity="0.059053715441415355 S_per_cm2" erev="-107.0 mV" segmentGroup="soma" ion="k"/>
                <channelDensity id="Im_v2_soma" ionChannel="Im_v2" condDensity="3.995106112250624e-14 S_per_cm2" erev="-107.0 mV" segmentGroup="soma" ion="k"/>
                <channelDensity id="SK_soma" ionChannel="SK" condDensity="6.806782915091958e-10 S_per_cm2" erev="-107.0 mV" segmentGroup="soma" ion="k"/>
                <channelDensity id="pas_soma" ionChannel="pas" condDensity="5.224164538745248e-05 S_per_cm2" erev="-85.65570068359375 mV" segmentGroup="soma" ion="non_specific"/>
                <channelDensity id="pas_axon" ionChannel="pas" condDensity="2.2719709304318236e-05 S_per_cm2" erev="-85.65570068359375 mV" segmentGroup="axon" ion="non_specific"/>
                <channelDensity id="pas_dend" ionChannel="pas" condDensity="1.0099597920543875e-07 S_per_cm2" erev="-85.65570068359375 mV" segmentGroup="dend" ion="non_specific"/>
                <channelDensityNernst id="Ca_HVA_soma" ionChannel="Ca_HVA" condDensity="0.0001014254260681964 S_per_cm2" segmentGroup="soma" ion="ca"/>
                <channelDensityNernst id="Ca_LVA_soma" ionChannel="Ca_LVA" condDensity="0.00975842171021688 S_per_cm2" segmentGroup="soma" ion="ca"/>
                <spikeThresh value="10mV"/>
                <specificCapacitance value="3.31732779736 uF_per_cm2" segmentGroup="soma"/>
                <specificCapacitance value="3.31732779736 uF_per_cm2" segmentGroup="axon"/>
                <specificCapacitance value="3.31732779736 uF_per_cm2" segmentGroup="dend"/>
                <initMembPotential value="-80mV"/>
            </membraneProperties>
            <intracellularProperties>
                <species id="ca" concentrationModel="CaDynamics_488462965" ion="ca" initialConcentration="0.0001 mM" initialExtConcentration="2 mM" segmentGroup="soma"/>
                <resistivity value="29.0745151982 ohm_cm"/>
            </intracellularProperties>
        </biophysicalProperties>
    </cell>
</neuroml>
