<neuroml xmlns="http://www.neuroml.org/schema/neuroml2"  xmlns:xs="http://www.w3.org/2001/XMLSchema" xmlns:xsi="http://www.w3.org/2001/XMLSchema-instance" xsi:schemaLocation="http://www.neuroml.org/schema/neuroml2 https://raw.github.com/NeuroML/NeuroML2/development/Schemas/NeuroML2/NeuroML_v2.3.1.xsd" id="NeuroML2_file_exported_from_NEURON">
    <include href="pas.channel.nml"/>
    <include href="NaV.channel.nml"/>
    <include href="K_T.channel.nml"/>
    <include href="Kd.channel.nml"/>
    <include href="Kv2like.channel.nml"/>
    <include href="Kv3_1.channel.nml"/>
    <include href="SK.channel.nml"/>
    <include href="Ih.channel.nml"/>
    <include href="Im_v2.channel.nml"/>
    <include href="Ca_HVA.channel.nml"/>
    <include href="Ca_LVA.channel.nml"/>
    <include href="CaDynamics_all.nml"/>
    <cell id="Cell_497232312">
        <notes>

Export of a cell model (497232312) obtained from the Allen Institute Cell Types Database into NeuroML2

Electrophysiology on which this model is based: http://celltypes.brain-map.org/mouse/experiment/electrophysiology/497232312

******************************************************
*  This export to NeuroML2 has not yet been fully validated!!
*  Use with caution!!
******************************************************

        </notes>
        <property tag="AIBS:aibs_dendrite_type" value="spiny"/>
        <property tag="AIBS:aibs_cre_line" value="Rbp4-Cre_KL100"/>
        <property tag="AIBS:aibs_specimen_id" value="485574832"/>
        <property tag="AIBS:aibs_specimen_name" value="Rbp4-Cre_KL100;Ai14-203498.04.02.01"/>
        <property tag="AIBS:intracellular_ephys:Electrode 1:location" value="Primary visual area, layer 5"/>
        <property tag="AIBS:session_id" value="485574830"/>
        <property tag="AIBS:subject:age" value="unknown"/>
        <property tag="AIBS:subject:description" value="Mus musculus In Vitro"/>
        <property tag="AIBS:subject:genotype" value="Ai14(RCL-tdT); Rbp4-Cre_KL100"/>
        <property tag="AIBS:subject:sex" value="F"/>
        <property tag="AIBS:subject:species" value="Mus musculus"/>
        <morphology id="morphology">
            <segment id="0" name="Seg0_soma_0">
                <proximal x="491.511" y="630.931" z="41.6346" diameter="12.0352"/>
                <distal x="497.529" y="630.931" z="41.6346" diameter="12.0352"/>
            </segment>
            <segment id="2" name="Seg1_soma_0">
                <parent segment="0"/>
                <distal x="503.547" y="630.931" z="41.6346" diameter="12.0352"/>
            </segment>
            <segment id="3486" name="Seg0_axon_0">
                <parent segment="0"/>
                <proximal x="497.529" y="630.931" z="41.6346" diameter="1.0"/>
                <distal x="503.37" y="644.747" z="41.6346" diameter="1.0"/>
            </segment>
            <segment id="3487" name="Seg1_axon_0">
                <parent segment="3486"/>
                <distal x="509.212" y="658.563" z="41.6346" diameter="1.0"/>
            </segment>
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            <segmentGroup id="soma_0" neuroLexId="sao864921383">
                <notes>This group contains an unbranched set of segments, and all of the segmentGroups marked with
             neuroLexId = sao864921383 form a non-overlapping set of all of the segments.
             These segmentGroups correspond to the 'cables' of NeuroML v1.8.1, and map to/from NEURON sections.</notes>
                <member segment="0"/>
                <member segment="2"/>
            </segmentGroup>
            <segmentGroup id="axon_0" neuroLexId="sao864921383">
                <notes>This group contains an unbranched set of segments, and all of the segmentGroups marked with
             neuroLexId = sao864921383 form a non-overlapping set of all of the segments.
             These segmentGroups correspond to the 'cables' of NeuroML v1.8.1, and map to/from NEURON sections.</notes>
                <member segment="3486"/>
                <member segment="3487"/>
            </segmentGroup>
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            <segmentGroup id="axon">
                <include segmentGroup="axon_0"/>
                <include segmentGroup="axon_1"/>
            </segmentGroup>
            <segmentGroup id="apic">
                <include segmentGroup="apic_0"/>
                <include segmentGroup="apic_1"/>
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            </segmentGroup>
            <segmentGroup id="dend">
                <include segmentGroup="dend_0"/>
                <include segmentGroup="dend_1"/>
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            </segmentGroup>
            <segmentGroup id="soma">
                <include segmentGroup="soma_0"/>
            </segmentGroup>
            <segmentGroup id="soma_group" neuroLexId="GO:0043025">
                <notes>Default soma segment group for the cell</notes>
                <include segmentGroup="soma"/>
            </segmentGroup>
            <segmentGroup id="axon_group" neuroLexId="GO:0030424">
                <notes>Default axon segment group for the cell</notes>
                <include segmentGroup="axon"/>
            </segmentGroup>
            <segmentGroup id="dendrite_group" neuroLexId="GO:0030425">
                <notes>Default dendrite segment group for the cell</notes>
                <include segmentGroup="apic"/>
                <include segmentGroup="dend"/>
            </segmentGroup>
            <segmentGroup id="all">
                <include segmentGroup="apic_0"/>
                <include segmentGroup="apic_1"/>
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            </segmentGroup>
        </morphology>
        <biophysicalProperties id="biophys">
            <membraneProperties>
                <channelDensity id="pas_soma" ionChannel="pas" condDensity="2.22118e-06 S_per_cm2" erev="-85.7726 mV" segmentGroup="soma" ion="non_specific"/>
                <channelDensity id="pas_axon" ionChannel="pas" condDensity="0.000455986 S_per_cm2" erev="-94.5832 mV" segmentGroup="axon" ion="non_specific"/>
                <channelDensity id="pas_apic" ionChannel="pas" condDensity="0.00112349 S_per_cm2" erev="-71.5635 mV" segmentGroup="apic" ion="non_specific"/>
                <channelDensity id="pas_dend" ionChannel="pas" condDensity="8.21669e-05 S_per_cm2" erev="-102.345 mV" segmentGroup="dend" ion="non_specific"/>
                <channelDensity id="NaV_axon" ionChannel="NaV" condDensity="0.0499131 S_per_cm2" erev="53.0 mV" segmentGroup="axon" ion="na"/>
                <channelDensity id="K_T_axon" ionChannel="K_T" condDensity="7.46741e-05 S_per_cm2" erev="-107.0 mV" segmentGroup="axon" ion="k"/>
                <channelDensity id="Kd_axon" ionChannel="Kd" condDensity="0.00341906 S_per_cm2" erev="-107.0 mV" segmentGroup="axon" ion="k"/>
                <channelDensity id="Kv2like_axon" ionChannel="Kv2like" condDensity="0.0665392 S_per_cm2" erev="-107.0 mV" segmentGroup="axon" ion="k"/>
                <channelDensity id="Kv3_1_axon" ionChannel="Kv3_1" condDensity="0.881075 S_per_cm2" erev="-107.0 mV" segmentGroup="axon" ion="k"/>
                <channelDensity id="SK_axon" ionChannel="SK" condDensity="0.000201324 S_per_cm2" erev="-107.0 mV" segmentGroup="axon" ion="k"/>
                <channelDensity id="NaV_soma" ionChannel="NaV" condDensity="0.041708 S_per_cm2" erev="53.0 mV" segmentGroup="soma" ion="na"/>
                <channelDensity id="SK_soma" ionChannel="SK" condDensity="0.000508856 S_per_cm2" erev="-107.0 mV" segmentGroup="soma" ion="k"/>
                <channelDensity id="Kv3_1_soma" ionChannel="Kv3_1" condDensity="0.27692 S_per_cm2" erev="-107.0 mV" segmentGroup="soma" ion="k"/>
                <channelDensity id="Ih_soma" ionChannel="Ih" condDensity="7.78772e-06 S_per_cm2" erev="-45 mV" segmentGroup="soma" ion="hcn"/>
                <channelDensity id="NaV_apic" ionChannel="NaV" condDensity="0.0136794 S_per_cm2" erev="53.0 mV" segmentGroup="apic" ion="na"/>
                <channelDensity id="Kv3_1_apic" ionChannel="Kv3_1" condDensity="0.94416 S_per_cm2" erev="-107.0 mV" segmentGroup="apic" ion="k"/>
                <channelDensity id="Im_v2_apic" ionChannel="Im_v2" condDensity="0.00144139 S_per_cm2" erev="-107.0 mV" segmentGroup="apic" ion="k"/>
                <channelDensity id="Ih_apic" ionChannel="Ih" condDensity="2.69093e-06 S_per_cm2" erev="-45 mV" segmentGroup="apic" ion="hcn"/>
                <channelDensity id="NaV_dend" ionChannel="NaV" condDensity="0.0277557 S_per_cm2" erev="53.0 mV" segmentGroup="dend" ion="na"/>
                <channelDensity id="Kv3_1_dend" ionChannel="Kv3_1" condDensity="0.625419 S_per_cm2" erev="-107.0 mV" segmentGroup="dend" ion="k"/>
                <channelDensity id="Im_v2_dend" ionChannel="Im_v2" condDensity="0.000688196 S_per_cm2" erev="-107.0 mV" segmentGroup="dend" ion="k"/>
                <channelDensity id="Ih_dend" ionChannel="Ih" condDensity="1.56212e-06 S_per_cm2" erev="-45 mV" segmentGroup="dend" ion="hcn"/>
                <channelDensityNernst id="Ca_HVA_axon" ionChannel="Ca_HVA" condDensity="7.21005e-05 S_per_cm2" segmentGroup="axon" ion="ca"/>
                <channelDensityNernst id="Ca_LVA_axon" ionChannel="Ca_LVA" condDensity="0.00196838 S_per_cm2" segmentGroup="axon" ion="ca"/>
                <channelDensityNernst id="Ca_HVA_soma" ionChannel="Ca_HVA" condDensity="2.05006e-05 S_per_cm2" segmentGroup="soma" ion="ca"/>
                <channelDensityNernst id="Ca_LVA_soma" ionChannel="Ca_LVA" condDensity="0.00456603 S_per_cm2" segmentGroup="soma" ion="ca"/>
                <spikeThresh value="10mV"/>
                <specificCapacitance value="8.51603 uF_per_cm2" segmentGroup="soma"/>
                <specificCapacitance value="9.34469 uF_per_cm2" segmentGroup="axon"/>
                <specificCapacitance value="0.965264 uF_per_cm2" segmentGroup="apic"/>
                <specificCapacitance value="2.25291 uF_per_cm2" segmentGroup="dend"/>
                <initMembPotential value="-80mV"/>
            </membraneProperties>
            <intracellularProperties>
                <species id="ca" concentrationModel="CaDynamics_497232312_axon" ion="ca" initialConcentration="0.0001 mM" initialExtConcentration="2 mM" segmentGroup="axon"/>
                <species id="ca" concentrationModel="CaDynamics_497232312_soma" ion="ca" initialConcentration="0.0001 mM" initialExtConcentration="2 mM" segmentGroup="soma"/>
                <resistivity value="93.2936 ohm_cm" segmentGroup="soma"/>
                <resistivity value="64.1727 ohm_cm" segmentGroup="axon"/>
                <resistivity value="107.078 ohm_cm" segmentGroup="apic"/>
                <resistivity value="109.061 ohm_cm" segmentGroup="dend"/>
            </intracellularProperties>
        </biophysicalProperties>
    </cell>
</neuroml>
