<neuroml xmlns="http://www.neuroml.org/schema/neuroml2"  xmlns:xs="http://www.w3.org/2001/XMLSchema" xmlns:xsi="http://www.w3.org/2001/XMLSchema-instance" xsi:schemaLocation="http://www.neuroml.org/schema/neuroml2 https://raw.github.com/NeuroML/NeuroML2/development/Schemas/NeuroML2/NeuroML_v2.2.xsd" id="NeuroML2_file_exported_from_NEURON">
    <include href="pas.channel.nml"/>
    <include href="NaV.channel.nml"/>
    <include href="K_T.channel.nml"/>
    <include href="Kd.channel.nml"/>
    <include href="Kv2like.channel.nml"/>
    <include href="Kv3_1.channel.nml"/>
    <include href="SK.channel.nml"/>
    <include href="Ih.channel.nml"/>
    <include href="Im_v2.channel.nml"/>
    <include href="Ca_HVA.channel.nml"/>
    <include href="Ca_LVA.channel.nml"/>
    <include href="CaDynamics_all.nml"/>
    <cell id="Cell_497233223">
        <notes>

Export of a cell model (497233223) obtained from the Allen Institute Cell Types Database into NeuroML2

Electrophysiology on which this model is based: http://celltypes.brain-map.org/mouse/experiment/electrophysiology/464198958

******************************************************
*  This export to NeuroML2 has not yet been fully validated!!
*  Use with caution!!
******************************************************

        </notes>
        <property tag="AIBS:aibs_dendrite_type" value="aspiny"/>
        <property tag="AIBS:aibs_cre_line" value="Sst-IRES-Cre"/>
        <property tag="AIBS:aibs_specimen_id" value="464198958"/>
        <property tag="AIBS:aibs_specimen_name" value="Sst-IRES-Cre;Ai14-165865.03.01.01"/>
        <property tag="AIBS:intracellular_ephys:Electrode 1:location" value="Primary visual area, layer 5"/>
        <property tag="AIBS:session_id" value="464198956"/>
        <property tag="AIBS:subject:age" value="P53"/>
        <property tag="AIBS:subject:description" value="Mus musculus In Vitro"/>
        <property tag="AIBS:subject:genotype" value="Sst-IRES-Cre; Ai14(RCL-tdT)"/>
        <property tag="AIBS:subject:sex" value="M"/>
        <property tag="AIBS:subject:species" value="Mus musculus"/>
        <morphology id="morphology">
            <segment id="0" name="Seg0_soma_0">
                <proximal x="421.553" y="352.823" z="25.1663" diameter="12.094"/>
                <distal x="427.6" y="352.823" z="25.1663" diameter="12.094"/>
            </segment>
            <segment id="2" name="Seg1_soma_0">
                <parent segment="0"/>
                <distal x="433.647" y="352.823" z="25.1663" diameter="12.094"/>
            </segment>
            <segment id="1292" name="Seg0_axon_0">
                <parent segment="0"/>
                <proximal x="427.6" y="352.823" z="25.1663" diameter="1.0"/>
                <distal x="433.441" y="366.639" z="25.1663" diameter="1.0"/>
            </segment>
            <segment id="1293" name="Seg1_axon_0">
                <parent segment="1292"/>
                <distal x="439.282" y="380.455" z="25.1663" diameter="1.0"/>
            </segment>
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            <segmentGroup neuroLexId="sao864921383" id="soma_0">
                <notes>This group contains an unbranched set of segments, and all of the segmentGroups marked with
             neuroLexId = sao864921383 form a non-overlapping set of all of the segments.
             These segmentGroups correspond to the 'cables' of NeuroML v1.8.1, and map to/from NEURON sections.</notes>
                <member segment="0"/>
                <member segment="2"/>
            </segmentGroup>
            <segmentGroup neuroLexId="sao864921383" id="axon_0">
                <notes>This group contains an unbranched set of segments, and all of the segmentGroups marked with
             neuroLexId = sao864921383 form a non-overlapping set of all of the segments.
             These segmentGroups correspond to the 'cables' of NeuroML v1.8.1, and map to/from NEURON sections.</notes>
                <member segment="1292"/>
                <member segment="1293"/>
            </segmentGroup>
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            <segmentGroup id="dend">
                <include segmentGroup="dend_22"/>
                <include segmentGroup="dend_17"/>
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            </segmentGroup>
            <segmentGroup id="axon">
                <include segmentGroup="axon_0"/>
                <include segmentGroup="axon_1"/>
            </segmentGroup>
            <segmentGroup id="OneSecGrp_SectionRef_1">
                <include segmentGroup="soma_0"/>
            </segmentGroup>
            <segmentGroup id="soma_group">
                <include segmentGroup="soma"/>
            </segmentGroup>
            <segmentGroup id="axon_group">
                <include segmentGroup="axon"/>
            </segmentGroup>
            <segmentGroup id="dendrite_group">
                <include segmentGroup="dend"/>
            </segmentGroup>
        </morphology>
        <biophysicalProperties id="biophys">
            <membraneProperties>
                <channelDensity id="pas_soma" ionChannel="pas" condDensity="6.27657e-06 S_per_cm2" erev="6.27657e-06 mV" segmentGroup="soma" ion="non_specific"/>
                <channelDensity id="pas_soma" ionChannel="pas" condDensity="-60.7688 S_per_cm2" erev="-60.7688 mV" segmentGroup="soma" ion="non_specific"/>
                <channelDensity id="pas_axon" ionChannel="pas" condDensity="0.00750338 S_per_cm2" erev="0.00750338 mV" segmentGroup="axon" ion="non_specific"/>
                <channelDensity id="pas_axon" ionChannel="pas" condDensity="-60.741 S_per_cm2" erev="-60.741 mV" segmentGroup="axon" ion="non_specific"/>
                <channelDensity id="pas_apic" ionChannel="pas" condDensity="0.00964108 S_per_cm2" erev="0.00964108 mV" segmentGroup="apic" ion="non_specific"/>
                <channelDensity id="pas_apic" ionChannel="pas" condDensity="-87.0523 S_per_cm2" erev="-87.0523 mV" segmentGroup="apic" ion="non_specific"/>
                <channelDensity id="pas_dend" ionChannel="pas" condDensity="2.67078e-06 S_per_cm2" erev="2.67078e-06 mV" segmentGroup="dend" ion="non_specific"/>
                <channelDensity id="pas_dend" ionChannel="pas" condDensity="-100.207 S_per_cm2" erev="-100.207 mV" segmentGroup="dend" ion="non_specific"/>
                <channelDensity id="_soma" ionChannel="" condDensity="1.93028 S_per_cm2" erev="??" segmentGroup="soma" ion="??"/>
                <channelDensity id="_soma" ionChannel="" condDensity="102.781 S_per_cm2" erev="??" segmentGroup="soma" ion="??"/>
                <channelDensity id="_axon" ionChannel="" condDensity="8.77051 S_per_cm2" erev="??" segmentGroup="axon" ion="??"/>
                <channelDensity id="_axon" ionChannel="" condDensity="148.993 S_per_cm2" erev="??" segmentGroup="axon" ion="??"/>
                <channelDensity id="_apic" ionChannel="" condDensity="0.783503 S_per_cm2" erev="??" segmentGroup="apic" ion="??"/>
                <channelDensity id="_apic" ionChannel="" condDensity="101.51 S_per_cm2" erev="??" segmentGroup="apic" ion="??"/>
                <channelDensity id="_dend" ionChannel="" condDensity="0.631319 S_per_cm2" erev="??" segmentGroup="dend" ion="??"/>
                <channelDensity id="_dend" ionChannel="" condDensity="135.168 S_per_cm2" erev="??" segmentGroup="dend" ion="??"/>
                <channelDensity id="NaV_axon" ionChannel="NaV" condDensity="0.0381828 S_per_cm2" erev="53.0 mV" segmentGroup="axon" ion="na"/>
                <channelDensity id="K_T_axon" ionChannel="K_T" condDensity="0.000990945 S_per_cm2" erev="-107.0 mV" segmentGroup="axon" ion="k"/>
                <channelDensity id="Kd_axon" ionChannel="Kd" condDensity="0.00985064 S_per_cm2" erev="-107.0 mV" segmentGroup="axon" ion="k"/>
                <channelDensity id="Kv2like_axon" ionChannel="Kv2like" condDensity="0.0717306 S_per_cm2" erev="-107.0 mV" segmentGroup="axon" ion="k"/>
                <channelDensity id="Kv3_1_axon" ionChannel="Kv3_1" condDensity="0.701554 S_per_cm2" erev="-107.0 mV" segmentGroup="axon" ion="k"/>
                <channelDensity id="SK_axon" ionChannel="SK" condDensity="0.00154491 S_per_cm2" erev="-107.0 mV" segmentGroup="axon" ion="k"/>
                <channelDensity id="NaV_soma" ionChannel="NaV" condDensity="0.0495698 S_per_cm2" erev="53.0 mV" segmentGroup="soma" ion="na"/>
                <channelDensity id="SK_soma" ionChannel="SK" condDensity="0.0016439 S_per_cm2" erev="-107.0 mV" segmentGroup="soma" ion="k"/>
                <channelDensity id="Kv3_1_soma" ionChannel="Kv3_1" condDensity="0.0977998 S_per_cm2" erev="-107.0 mV" segmentGroup="soma" ion="k"/>
                <channelDensity id="Ih_soma" ionChannel="Ih" condDensity="9.98163e-06 S_per_cm2" erev="-45 mV" segmentGroup="soma" ion="hcn"/>
                <channelDensity id="NaV_apic" ionChannel="NaV" condDensity="0.0493482 S_per_cm2" erev="53.0 mV" segmentGroup="apic" ion="na"/>
                <channelDensity id="Kv3_1_apic" ionChannel="Kv3_1" condDensity="0.941261 S_per_cm2" erev="-107.0 mV" segmentGroup="apic" ion="k"/>
                <channelDensity id="Im_v2_apic" ionChannel="Im_v2" condDensity="0.00999538 S_per_cm2" erev="-107.0 mV" segmentGroup="apic" ion="k"/>
                <channelDensity id="Ih_apic" ionChannel="Ih" condDensity="1.56146e-06 S_per_cm2" erev="-45 mV" segmentGroup="apic" ion="hcn"/>
                <channelDensity id="NaV_dend" ionChannel="NaV" condDensity="0.0339078 S_per_cm2" erev="53.0 mV" segmentGroup="dend" ion="na"/>
                <channelDensity id="Kv3_1_dend" ionChannel="Kv3_1" condDensity="0.674616 S_per_cm2" erev="-107.0 mV" segmentGroup="dend" ion="k"/>
                <channelDensity id="Im_v2_dend" ionChannel="Im_v2" condDensity="0.00126544 S_per_cm2" erev="-107.0 mV" segmentGroup="dend" ion="k"/>
                <channelDensity id="Ih_dend" ionChannel="Ih" condDensity="9.54954e-06 S_per_cm2" erev="-45 mV" segmentGroup="dend" ion="hcn"/>
                <channelDensityNernst id="Ca_HVA_axon" ionChannel="Ca_HVA" condDensity="7.83207e-06 S_per_cm2" segmentGroup="axon" ion="ca"/>
                <channelDensityNernst id="Ca_LVA_axon" ionChannel="Ca_LVA" condDensity="1.40986e-05 S_per_cm2" segmentGroup="axon" ion="ca"/>
                <channelDensityNernst id="Ca_HVA_soma" ionChannel="Ca_HVA" condDensity="4.8783e-05 S_per_cm2" segmentGroup="soma" ion="ca"/>
                <channelDensityNernst id="Ca_LVA_soma" ionChannel="Ca_LVA" condDensity="0.000255508 S_per_cm2" segmentGroup="soma" ion="ca"/>
                <specificCapacitance value="1.93028 uF_per_cm2" segmentGroup="soma"/>
                <specificCapacitance value="8.77051 uF_per_cm2" segmentGroup="axon"/>
                <specificCapacitance value="0.783503 uF_per_cm2" segmentGroup="apic"/>
                <specificCapacitance value="0.631319 uF_per_cm2" segmentGroup="dend"/>
            </membraneProperties>
            <intracellularProperties>
                <species id="ca" concentrationModel="CaDynamics_497233223_axon" ion="ca" initialConcentration="0.0001 mM" initialExtConcentration="2 mM" segmentGroup="axon"/>
                <species id="ca" concentrationModel="CaDynamics_497233223_soma" ion="ca" initialConcentration="0.0001 mM" initialExtConcentration="2 mM" segmentGroup="soma"/>
                <resistivity value="102.781 ohm_cm" segmentGroup="soma"/>
                <resistivity value="148.993 ohm_cm" segmentGroup="axon"/>
                <resistivity value="101.51 ohm_cm" segmentGroup="apic"/>
                <resistivity value="135.168 ohm_cm" segmentGroup="dend"/>
            </intracellularProperties>
        </biophysicalProperties>
    </cell>
</neuroml>
