<?xml version="1.0" encoding="ISO-8859-1"?>
<neuroml xmlns="http://www.neuroml.org/schema/neuroml2" xmlns:xsi="http://www.w3.org/2001/XMLSchema-instance" xsi:schemaLocation="http://www.neuroml.org/schema/neuroml2 https://raw.github.com/NeuroML/NeuroML2/development/Schemas/NeuroML2/NeuroML_v2beta4.xsd" id="Kv2like">

    <notes>NeuroML file containing a single Channel description</notes>

    <ionChannel id="Kv2like" conductance="10pS" type="ionChannelHH" species="k">

        <notes>Kv2-like channel

Comment from original mod file:
: Kv2-like channel
: Adapted from model implemented in Keren et al. 2005
: Adjusted parameters to be similar to guangxitoxin-sensitive current in mouse CA1 pyramids from Liu and Bean 2014</notes>

        <annotation>
            <rdf:RDF xmlns:rdf="http://www.w3.org/1999/02/22-rdf-syntax-ns#">
                <rdf:Description rdf:about="Kv2like">

                    <bqmodel:isDerivedFrom xmlns:bqmodel="http://biomodels.net/biology-qualifiers/">
                        <rdf:Bag>
                            <rdf:li>Constraining compartmental models using multiple voltage recordings and genetic algorithms.
                            Keren N, Peled N, Korngreen A, J Neurophysiol. 2005 Dec;94(6):3730-42.</rdf:li>
                            <rdf:li rdf:resource="http://www.ncbi.nlm.nih.gov/pubmed/16093338"/>
                        </rdf:Bag>
                    </bqmodel:isDerivedFrom>
                    <bqmodel:isDerivedFrom xmlns:bqmodel="http://biomodels.net/biology-qualifiers/">
                        <rdf:Bag>
                            <rdf:li>Kv2 channel regulation of action potential repolarization and firing patterns
                                in superior cervical ganglion neurons and hippocampal CA1 pyramidal neurons.
                            Liu PW, Bean BP. J Neurosci. 2014 Apr 2;34(14):4991-5002.</rdf:li>
                            <rdf:li rdf:resource="http://www.ncbi.nlm.nih.gov/pubmed/24695716"/>
                        </rdf:Bag>
                    </bqmodel:isDerivedFrom>

                    <bqbiol:isVersionOf xmlns:bqbiol="http://biomodels.net/biology-qualifiers/">
                        <rdf:Bag>
                            <rdf:li>K channels</rdf:li>
                            <rdf:li rdf:resource="http://senselab.med.yale.edu/neurondb/channelGene2.aspx#table3"/>
                        </rdf:Bag>
                    </bqbiol:isVersionOf>

                </rdf:Description>
            </rdf:RDF>
        </annotation>

        <gateHHrates id="m" instances="2">
            <q10Settings type="q10ExpTemp" q10Factor="2.3" experimentalTemp="21 degC"/>
            <forwardRate type="HHExpLinearRate" rate="0.528per_ms" midpoint="43mV" scale="11mV"/>
            <reverseRate type="HHExpRate" rate="0.008per_ms" scale="-120mV" midpoint="-1.27mV"/>
        </gateHHrates>

        <gateFractional id="h" instances="1">
            <q10Settings type="q10ExpTemp" q10Factor="2.3" experimentalTemp="21 degC"/>

            <subGate id="h1" fractionalConductance="0.5">
                <steadyState type="HHSigmoidVariable" rate="1" midpoint="-58mV" scale="-11mV"/>
                <timeCourse type="h1_tau"/>
            </subGate>

            <subGate id="h2" fractionalConductance="0.5">
                <steadyState type="HHSigmoidVariable" rate="1" midpoint="-58mV" scale="-11mV"/>
                <timeCourse type="h2_tau"/>
            </subGate>
        </gateFractional>

    </ionChannel>

    <ComponentType name="h1_tau" extends="baseVoltageDepTime">
        <Constant name="TIME_SCALE" dimension="time" value="1 ms"/>
        <Constant name="VOLT_SCALE" dimension="voltage" value="1 mV"/>
        <Constant name="b0" dimension="none" value="360"/>
        <Constant name="b11" dimension="none" value="1010"/>
        <Constant name="b2" dimension="none" value="-75"/>
        <Constant name="b3" dimension="none" value="48"/>
        <Constant name="b4" dimension="none" value="23.7"/>
        <Constant name="b5" dimension="none" value="-54"/>
        <Requirement name="rateScale" dimension="none"/>

        <Dynamics>
            <DerivedVariable name="V" dimension="none" value="v / VOLT_SCALE"/>
            <DerivedVariable name="t" exposure="t" dimension="time" value="(b0+(b11+b4*(V-b5))*exp(-(V-b2)*(V-b2)/(b3*b3))) * TIME_SCALE "/>
        </Dynamics>

    </ComponentType>

    <ComponentType name="h2_tau" extends="baseVoltageDepTime">
        <Constant name="TIME_SCALE" dimension="time" value="1 ms"/>
        <Constant name="VOLT_SCALE" dimension="voltage" value="1 mV"/>
        <Constant name="bb0" dimension="none" value="2350"/>
        <Constant name="bb1" dimension="none" value="1380"/>
        <Constant name="bb2" dimension="none" value="0.011"/>
        <Constant name="bb3" dimension="none" value="-210"/>
        <Constant name="bb4" dimension="none" value="0.03"/>

        <Requirement name="rateScale" dimension="none"/>

        <Dynamics>
            <DerivedVariable name="V" dimension="none" value="v / VOLT_SCALE"/>
            <DerivedVariable name="t" exposure="t" dimension="time" value="(bb0+bb1*exp(-bb2*V)+bb3*exp(-bb4*V)) * TIME_SCALE "/>
        </Dynamics>

    </ComponentType>

</neuroml>
