<Lems xmlns="http://www.neuroml.org/lems/0.7.2" xmlns:xsi="http://www.w3.org/2001/XMLSchema-instance" xsi:schemaLocation="http://www.neuroml.org/lems/0.7.2  https://raw.github.com/LEMS/LEMS/development/Schemas/LEMS/LEMS_v0.7.2.xsd">

    <Target component="sim1" reportFile="simulator.props" timesFile="time.dat"/>

        <!--Include standard NeuroML 2 ComponentType definitions-->

    <Include file="Cells.xml"/>
    <Include file="Networks.xml"/>
    <Include file="Simulation.xml"/>

        <!--   Channel/synapse files-->

    <Include file="NaTs.channel.nml"/>
    <Include file="Nap.channel.nml"/>
    <Include file="NaV.channel.nml"/>

    <Include file="K_P.channel.nml"/>
    <Include file="K_T.channel.nml"/>
    <Include file="Kv3_1.channel.nml"/>
    <Include file="SK.channel.nml"/>

    <Include file="Ca_HVA.channel.nml"/>
    <Include file="Ca_LVA.channel.nml"/>

    <Include file="Im.channel.nml"/>
    <Include file="Ih.channel.nml"/>

    <Include file="CaDynamics.nml"/>

    <Include file="pas.channel.nml"/>

        <!--   Cell files-->
    <Include file="Soma_Test.cell.nml"/>
        <!--   Network file-->
    <Include file="Soma_Test.net.nml"/>

        <!--Note: this could be: Simulation id="sim1" ... , but Component type="Simulation" ...
        is used to allow validation of this file according to the LEMS schema specified above...-->
    <Component type="Simulation" id="sim1" length="600.0ms" step="0.0025ms" target="network_Soma">

        <Display id="CG_TestMod_v" title="Soma VOLTAGE" xmin="-60.0" xmax="660.0" ymin="-104.0" ymax="64.0" timeScale="1ms">
            <Line id="VOLTAGE" timeScale="1ms" quantity="TestSoma/0/Soma_Test/v" scale="1 mV" color="#000000"/>
        </Display>

        <Display id="GraphWin_1a" title="Soma channels: Na etc" xmin="-60.0" xmax="660.0" ymin="-0.1" ymax="1.1" timeScale="1ms">
            <Line id="m NaTs" timeScale="1ms" quantity="TestSoma/0/Soma_Test/biophys/membraneProperties/NaTs_all/NaTs/m/q" scale="1" color="#000000"/>
            <Line id="h NaTs" timeScale="1ms" quantity="TestSoma/0/Soma_Test/biophys/membraneProperties/NaTs_all/NaTs/h/q" scale="1" color="#FF0000"/>
            <Line id="m Nap" timeScale="1ms" quantity="TestSoma/0/Soma_Test/biophys/membraneProperties/Nap_all/Nap/m/q" scale="1" color="#00FF00"/>
            <Line id="h Nap" timeScale="1ms" quantity="TestSoma/0/Soma_Test/biophys/membraneProperties/Nap_all/Nap/h/q" scale="1" color="#FFFF00"/>
            <Line id="m Ih" timeScale="1ms" quantity="TestSoma/0/Soma_Test/biophys/membraneProperties/Ih_all/Ih/m/q" scale="1" color="#00ffff"/>
            <Line id="m Im" timeScale="1ms" quantity="TestSoma/0/Soma_Test/biophys/membraneProperties/Im_all/Im/m/q" scale="1" color="#ff00ff"/>
            <Line id="m Kv3_1" timeScale="1ms" quantity="TestSoma/0/Soma_Test/biophys/membraneProperties/Kv3_1_all/Kv3_1/m/q" scale="1" color="#7733ff"/>
            <Line id="z SK" timeScale="1ms" quantity="TestSoma/0/Soma_Test/biophys/membraneProperties/SK_all/SK/z/q" scale="1" color="#773777"/>
        </Display>

        <Display id="GraphWin_0" title="Soma channels: Ca" xmin="-60.0" xmax="660.0" ymin="-0.1" ymax="1.1" timeScale="1ms">
            <Line id="m Ca_LVA" timeScale="1ms" quantity="TestSoma/0/Soma_Test/biophys/membraneProperties/Ca_LVA_all/Ca_LVA/m/q" scale="1" color="#000000"/>
            <Line id="h Ca_LVA" timeScale="1ms" quantity="TestSoma/0/Soma_Test/biophys/membraneProperties/Ca_LVA_all/Ca_LVA/h/q" scale="1" color="#FF0000"/>
            <Line id="m Ca_HVA" timeScale="1ms" quantity="TestSoma/0/Soma_Test/biophys/membraneProperties/Ca_HVA_all/Ca_HVA/m/q" scale="1" color="#00FF00"/>
            <Line id="h Ca_HVA" timeScale="1ms" quantity="TestSoma/0/Soma_Test/biophys/membraneProperties/Ca_HVA_all/Ca_HVA/h/q" scale="1" color="#FFFF00"/>
        </Display>

        <Display id="GraphWin_5" title="Soma CaDynamics:CONC:ca" xmin="-60.0" xmax="660.0" ymin="0" ymax="0.005" timeScale="1ms">
            <Line id="CONC_ca" timeScale="1ms" quantity="TestSoma/0/Soma_Test/caConc" scale="1 mM" color="#000000"/>
        </Display>

        <Display id="GraphWin_4" title="Ca erev" xmin="-60.0" xmax="660.0" ymin="70" ymax="140" timeScale="1ms">
            <Line id="Ca_erev" timeScale="1ms" quantity="TestSoma/0/Soma_Test/biophys/membraneProperties/Ca_HVA_all/erev" scale="1mV" color="#000000"/>

        </Display> <!---->

        <OutputFile id="TestSoma_v_OF" fileName="TestSoma.v.dat">
            <OutputColumn id="v" quantity="TestSoma/0/Soma_Test/v"/>
        </OutputFile>

        <OutputFile id="TestSoma_ca_OF" fileName="TestSoma.ca.dat">
            <OutputColumn id="v" quantity="TestSoma/0/Soma_Test/caConc"/>
        </OutputFile>

    </Component>

</Lems>
