<neuroml xmlns="http://www.neuroml.org/schema/neuroml2"  xmlns:xs="http://www.w3.org/2001/XMLSchema" xmlns:xsi="http://www.w3.org/2001/XMLSchema-instance" xsi:schemaLocation="http://www.neuroml.org/schema/neuroml2 https://raw.github.com/NeuroML/NeuroML2/development/Schemas/NeuroML2/NeuroML_v2beta4.xsd" id="LargeNet">
    <include href="ROTATED_Cell_473862496.cell.nml"></include>
    <include href="ROTATED_Cell_472427533.cell.nml"></include>
    <include href="ROTATED_Cell_473871773.cell.nml"></include>
    <include href="ROTATED_Cell_473871592.cell.nml"></include>
    <network id="LargeNet">
        <population id="Pop_ROTATED_Cell_473862496" type="populationList" component="ROTATED_Cell_473862496">
            <instance id="0">
                <location y="-33.411897741491003" x="131.82945713108856" z="29.00028081817424"/>
            </instance>
            <instance id="1">
                <location y="-80.967529457088389" x="302.65370484461323" z="388.607910240924184"/>
            </instance>
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        </population>
        <population id="Pop_ROTATED_Cell_472427533" type="populationList" component="ROTATED_Cell_472427533">
            <instance id="0">
                <location y="-279.410013055365596" x="85.965381666080759" z="270.149016349518831"/>
            </instance>
            <instance id="1">
                <location y="-319.504241800608725" x="79.245950847040774" z="177.404324705101743"/>
            </instance>
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        </population>
        <population id="Pop_ROTATED_Cell_473871773" type="populationList" component="ROTATED_Cell_473871773">
            <instance id="0">
                <location y="-644.683138879965554" x="226.931798734325611" z="216.061416020241325"/>
            </instance>
            <instance id="1">
                <location y="-457.455410645215011" x="111.728903392256825" z="455.40341752723333"/>
            </instance>
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        </population>
        <population id="Pop_ROTATED_Cell_473871592" type="populationList" component="ROTATED_Cell_473871592">
            <instance id="0">
                <location y="-871.404831248424784" x="52.679444912647142" z="230.645297499601554"/>
            </instance>
            <instance id="1">
                <location y="-832.326867716349966" x="308.678419711981519" z="363.101924460005307"/>
            </instance>
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        </population>
    </network>
</neuroml>
