<neuroml xmlns="http://www.neuroml.org/schema/neuroml2"  xmlns:xs="http://www.w3.org/2001/XMLSchema" xmlns:xsi="http://www.w3.org/2001/XMLSchema-instance" xsi:schemaLocation="http://www.neuroml.org/schema/neuroml2 https://raw.github.com/NeuroML/NeuroML2/development/Schemas/NeuroML2/NeuroML_v2.3.1.xsd" id="NeuroML2_file_exported_from_NEURON">
    <notes>

Export of a cell model (478513411) obtained from the Allen Institute Cell Types Database into NeuroML2

Electrophysiology on which this model is based: http://celltypes.brain-map.org/mouse/experiment/electrophysiology/471077468

******************************************************
*  This export to NeuroML2 has not yet been fully validated!!
*  Use with caution!!
******************************************************

        </notes>
    <property tag="AIBS:aibs_dendrite_type" value="aspiny"/>
    <property tag="AIBS:aibs_cre_line" value="Pvalb-IRES-Cre"/>
    <property tag="AIBS:aibs_specimen_id" value="471077468"/>
    <property tag="AIBS:aibs_specimen_name" value="Pvalb-IRES-Cre;Ai14-180633.03.02.01"/>
    <property tag="AIBS:intracellular_ephys:Electrode 1:location" value="Primary visual area, layer 4"/>
    <property tag="AIBS:session_id" value="471077466"/>
    <property tag="AIBS:subject:age" value="P55"/>
    <property tag="AIBS:subject:description" value="Mus musculus In Vitro"/>
    <property tag="AIBS:subject:genotype" value="Ai14; Pvalb-IRES-Cre"/>
    <property tag="AIBS:subject:sex" value="M"/>
    <property tag="AIBS:subject:species" value="Mus musculus"/>
    <include href="Cell_478513411.cell.nml"/>
    <pulseGenerator id="stim" delay="1020ms" duration="1000ms" amplitude="200pA"/>
    <network id="network" type="networkWithTemperature" temperature="34 degC">
        <property tag="recommended_duration_ms" value="2500"/>
        <property tag="recommended_dt_ms" value="0.005"/>
        <population id="Pop_Cell_478513411" component="Cell_478513411" size="1" type="populationList">
            <instance id="0">
                <location x="0.0" y="0.0" z="0.0"/>
            </instance>
        </population>
        <inputList id="stim_input" population="Pop_Cell_478513411" component="stim">
            <input id="0" target="../Pop_Cell_478513411/0/Cell_478513411" destination="synapses"/>
        </inputList>
    </network>
</neuroml>
