<neuroml xmlns="http://www.neuroml.org/schema/neuroml2"  xmlns:xs="http://www.w3.org/2001/XMLSchema" xmlns:xsi="http://www.w3.org/2001/XMLSchema-instance" xsi:schemaLocation="http://www.neuroml.org/schema/neuroml2 https://raw.github.com/NeuroML/NeuroML2/development/Schemas/NeuroML2/NeuroML_v2beta4.xsd" id="NeuroML2_file_exported_from_NEURON">
    <include href="Im.channel.nml"></include>
    <include href="Ih.channel.nml"></include>
    <include href="NaTs.channel.nml"></include>
    <include href="Nap.channel.nml"></include>
    <include href="K_P.channel.nml"></include>
    <include href="K_T.channel.nml"></include>
    <include href="SK.channel.nml"></include>
    <include href="Kv3_1.channel.nml"></include>
    <include href="pas.channel.nml"></include>
    <include href="Ca_HVA.channel.nml"></include>
    <include href="Ca_LVA.channel.nml"></include>
    <include href="CaDynamics.nml"></include>
    <cell id="ROTATED_Cell_472427533">
        <notes>

Export of a cell model (472427533) obtained from the Allen Institute Cell Types Database into NeuroML2

******************************************************
*  This export to NeuroML2 has not yet been fully validated!!
*  Use with caution!!
******************************************************

</notes>
        <morphology id="morphology">
            <segment id="0" name="Seg0_soma_0">
                <proximal x="0.000000e+00" y="-0.000000e+00" z="2.968000e+01" diameter="1.562980e+01"/>
                <distal x="-7.591878e+00" y="-1.854078e+00" z="2.968000e+01" diameter="1.562980e+01"/>
            </segment>
            <segment id="2" name="Seg1_soma_0">
                <parent segment="0"/>
                <distal x="-1.518376e+01" y="-3.708156e+00" z="2.968000e+01" diameter="1.562980e+01"/>
            </segment>
            <segment id="2925" name="Seg0_axon_0">
                <parent segment="0"/>
                <proximal x="-7.591878e+00" y="-1.854078e+00" z="2.968000e+01" diameter="1.000000e+00"/>
                <distal x="-9.988323e+00" y="-1.666138e+01" z="2.968000e+01" diameter="1.000000e+00"/>
            </segment>
            <segment id="2926" name="Seg1_axon_0">
                <parent segment="2925"/>
                <distal x="-1.238574e+01" y="-3.146892e+01" z="2.968000e+01" diameter="1.000000e+00"/>
            </segment>
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            <segmentGroup neuroLexId="sao864921383" id="soma_0">
                <notes>This group contains an unbranched set of segments, and all of the segmentGroups marked with
             neuroLexId = sao864921383 form a non-overlapping set of all of the segments.
             These segmentGroups correspond to the 'cables' of NeuroML v1.8.1, and map to/from NEURON sections.</notes>
                <member segment="0"/>
                <member segment="2"/>
            </segmentGroup>
            <segmentGroup neuroLexId="sao864921383" id="axon_0">
                <notes>This group contains an unbranched set of segments, and all of the segmentGroups marked with
             neuroLexId = sao864921383 form a non-overlapping set of all of the segments.
             These segmentGroups correspond to the 'cables' of NeuroML v1.8.1, and map to/from NEURON sections.</notes>
                <member segment="2925"/>
                <member segment="2926"/>
            </segmentGroup>
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            <segmentGroup id="soma">
                <include segmentGroup="soma_0"/>
            </segmentGroup>
            <segmentGroup id="ModelViewParmSubset_506">
                <include segmentGroup="soma_0"/>
                <include segmentGroup="axon_0"/>
                <include segmentGroup="axon_1"/>
            </segmentGroup>
            <segmentGroup id="ModelViewParmSubset_507">
                <include segmentGroup="dend_37"/>
                <include segmentGroup="dend_32"/>
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            </segmentGroup>
            <segmentGroup id="dend">
                <include segmentGroup="dend_37"/>
                <include segmentGroup="dend_32"/>
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            </segmentGroup>
            <segmentGroup id="apic">
                <include segmentGroup="apic_0"/>
                <include segmentGroup="apic_26"/>
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            </segmentGroup>
            <segmentGroup id="axon">
                <include segmentGroup="axon_0"/>
                <include segmentGroup="axon_1"/>
            </segmentGroup>
            <segmentGroup id="OneSecGrp_SectionRef_23945">
                <include segmentGroup="soma_0"/>
            </segmentGroup>
        </morphology>
        <biophysicalProperties id="biophys">
            <membraneProperties>
                <channelDensity id="Im_soma" ionChannel="Im" condDensity="1.56341281471e-05 S_per_cm2" erev="-107.0 mV" segmentGroup="soma" ion="k"/>
                <channelDensity id="Ih_soma" ionChannel="Ih" condDensity="3.45384152074e-05 S_per_cm2" erev="-45 mV" segmentGroup="soma" ion="hcn"/>
                <channelDensity id="NaTs_soma" ionChannel="NaTs" condDensity="0.712819935597 S_per_cm2" erev="53.0 mV" segmentGroup="soma" ion="na"/>
                <channelDensity id="Nap_soma" ionChannel="Nap" condDensity="0.000247042577357 S_per_cm2" erev="53.0 mV" segmentGroup="soma" ion="na"/>
                <channelDensity id="K_P_soma" ionChannel="K_P" condDensity="0.024844441187 S_per_cm2" erev="-107.0 mV" segmentGroup="soma" ion="k"/>
                <channelDensity id="K_T_soma" ionChannel="K_T" condDensity="0.00296613183812 S_per_cm2" erev="-107.0 mV" segmentGroup="soma" ion="k"/>
                <channelDensity id="SK_soma" ionChannel="SK" condDensity="0.000151240701336 S_per_cm2" erev="-107.0 mV" segmentGroup="soma" ion="k"/>
                <channelDensity id="Kv3_1_soma" ionChannel="Kv3_1" condDensity="0.118104448026 S_per_cm2" erev="-107.0 mV" segmentGroup="soma" ion="k"/>
                <channelDensity id="pas_soma" ionChannel="pas" condDensity="1.66465518405e-05 S_per_cm2" erev="-92.7820739746 mV" segmentGroup="soma" ion="non_specific"/>
                <channelDensity id="pas_axon" ionChannel="pas" condDensity="0.000264805794444 S_per_cm2" erev="-92.7820739746 mV" segmentGroup="axon" ion="non_specific"/>
                <channelDensity id="pas_dend" ionChannel="pas" condDensity="9.78263312302e-06 S_per_cm2" erev="-92.7820739746 mV" segmentGroup="dend" ion="non_specific"/>
                <channelDensity id="pas_apic" ionChannel="pas" condDensity="3.18482838725e-05 S_per_cm2" erev="-92.7820739746 mV" segmentGroup="apic" ion="non_specific"/>
                <channelDensityNernst id="Ca_HVA_soma" ionChannel="Ca_HVA" condDensity="0.000197120535203 S_per_cm2" segmentGroup="soma" ion="ca"/>
                <channelDensityNernst id="Ca_LVA_soma" ionChannel="Ca_LVA" condDensity="0.00784186851392 S_per_cm2" segmentGroup="soma" ion="ca"/>
                <specificCapacitance value="1.0 uF_per_cm2" segmentGroup="soma"/>
                <specificCapacitance value="1.0 uF_per_cm2" segmentGroup="axon"/>
                <specificCapacitance value="2.22 uF_per_cm2" segmentGroup="apic"/>
                <specificCapacitance value="2.22 uF_per_cm2" segmentGroup="dend"/>
            </membraneProperties>
            <intracellularProperties>
                <species segmentGroup="soma" id="ca" concentrationModel="CaDynamics" ion="ca" initialConcentration="0.0001 mM" initialExtConcentration="2 mM"/>
                <resistivity value="26.95 ohm_cm"/>
            </intracellularProperties>
        </biophysicalProperties>
    </cell>
</neuroml>
