<neuroml xmlns="http://www.neuroml.org/schema/neuroml2"  xmlns:xs="http://www.w3.org/2001/XMLSchema" xmlns:xsi="http://www.w3.org/2001/XMLSchema-instance" xsi:schemaLocation="http://www.neuroml.org/schema/neuroml2 https://raw.github.com/NeuroML/NeuroML2/development/Schemas/NeuroML2/NeuroML_v2.3.1.xsd" id="NeuroML2_file_exported_from_NEURON">
    <include href="Ih.channel.nml"/>
    <include href="NaV.channel.nml"/>
    <include href="Kd.channel.nml"/>
    <include href="Kv2like.channel.nml"/>
    <include href="Kv3_1.channel.nml"/>
    <include href="K_T.channel.nml"/>
    <include href="Im_v2.channel.nml"/>
    <include href="SK.channel.nml"/>
    <include href="pas.channel.nml"/>
    <include href="Ca_HVA.channel.nml"/>
    <include href="Ca_LVA.channel.nml"/>
    <include href="CaDynamics_all.nml"/>
    <cell id="ROTATED_Cell_473871773">
        <notes>

Export of a cell model (473871773) obtained from the Allen Institute Cell Types Database into NeuroML2

Electrophysiology on which this model is based: http://celltypes.brain-map.org/mouse/experiment/electrophysiology/468120757

******************************************************
*  This export to NeuroML2 has not yet been fully validated!!
*  Use with caution!!
******************************************************

        </notes>
        <property tag="AIBS:aibs_dendrite_type" value="spiny"/>
        <property tag="AIBS:aibs_cre_line" value="Scnn1a-Tg3-Cre"/>
        <property tag="AIBS:aibs_specimen_id" value="468120757"/>
        <property tag="AIBS:aibs_specimen_name" value="Scnn1a-Tg3-Cre;Ai14-177297.05.02.01"/>
        <property tag="AIBS:intracellular_ephys:Electrode 1:location" value="Primary visual area, layer 5"/>
        <property tag="AIBS:session_id" value="468120755"/>
        <property tag="AIBS:subject:age" value="P52"/>
        <property tag="AIBS:subject:description" value="Mus musculus In Vitro"/>
        <property tag="AIBS:subject:genotype" value="Scnn1a-Tg3-Cre; Ai14(RCL-tdT)"/>
        <property tag="AIBS:subject:sex" value="F"/>
        <property tag="AIBS:subject:species" value="Mus musculus"/>
        <morphology id="morphology">
            <segment id="0" name="Seg0_soma_0">
                <proximal x="0.0" y="-0.0" z="34.16" diameter="17.8232"/>
                <distal x="-8.245125373846696" y="-3.3825510446331757" z="34.16" diameter="17.8232"/>
            </segment>
            <segment id="2" name="Seg1_soma_0">
                <parent segment="0"/>
                <distal x="-16.48932557653387" y="-6.764722539104261" z="34.16" diameter="17.8232"/>
            </segment>
            <segment id="3648" name="Seg0_axon_0">
                <parent segment="0"/>
                <proximal x="-8.245125373846696" y="-3.3825510446331757" z="34.16" diameter="1.0"/>
                <distal x="-8.405185077166552" y="-18.3816682817033" z="34.16" diameter="1.0"/>
            </segment>
            <segment id="3649" name="Seg1_axon_0">
                <parent segment="3648"/>
                <distal x="-8.5656243306485" y="-33.3798603476139" z="34.16" diameter="1.0"/>
            </segment>
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            <segmentGroup id="soma_0" neuroLexId="sao864921383">
                <notes>This group contains an unbranched set of segments, and all of the segmentGroups marked with
             neuroLexId = sao864921383 form a non-overlapping set of all of the segments.
             These segmentGroups correspond to the 'cables' of NeuroML v1.8.1, and map to/from NEURON sections.</notes>
                <member segment="0"/>
                <member segment="2"/>
            </segmentGroup>
            <segmentGroup id="axon_0" neuroLexId="sao864921383">
                <notes>This group contains an unbranched set of segments, and all of the segmentGroups marked with
             neuroLexId = sao864921383 form a non-overlapping set of all of the segments.
             These segmentGroups correspond to the 'cables' of NeuroML v1.8.1, and map to/from NEURON sections.</notes>
                <member segment="3648"/>
                <member segment="3649"/>
            </segmentGroup>
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            <segmentGroup id="dend">
                <include segmentGroup="dend_0"/>
                <include segmentGroup="dend_1"/>
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            </segmentGroup>
            <segmentGroup id="apic">
                <include segmentGroup="apic_0"/>
                <include segmentGroup="apic_1"/>
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            </segmentGroup>
            <segmentGroup id="axon">
                <include segmentGroup="axon_0"/>
                <include segmentGroup="axon_1"/>
            </segmentGroup>
            <segmentGroup id="soma">
                <include segmentGroup="soma_0"/>
            </segmentGroup>
            <segmentGroup id="soma_group" neuroLexId="GO:0043025">
                <notes>Default soma segment group for the cell</notes>
                <include segmentGroup="soma"/>
            </segmentGroup>
            <segmentGroup id="axon_group" neuroLexId="GO:0030424">
                <notes>Default axon segment group for the cell</notes>
                <include segmentGroup="axon"/>
            </segmentGroup>
            <segmentGroup id="dendrite_group" neuroLexId="GO:0030425">
                <notes>Default dendrite segment group for the cell</notes>
                <include segmentGroup="apic"/>
                <include segmentGroup="dend"/>
            </segmentGroup>
            <segmentGroup id="all">
                <include segmentGroup="apic_0"/>
                <include segmentGroup="apic_1"/>
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            </segmentGroup>
        </morphology>
        <biophysicalProperties id="biophys">
            <membraneProperties>
                <channelDensity id="Ih_soma" ionChannel="Ih" condDensity="4.958347920189371e-05 S_per_cm2" erev="-45 mV" segmentGroup="soma" ion="hcn"/>
                <channelDensity id="NaV_soma" ionChannel="NaV" condDensity="0.1797230411877216 S_per_cm2" erev="53.0 mV" segmentGroup="soma" ion="na"/>
                <channelDensity id="Kd_soma" ionChannel="Kd" condDensity="2.6176096246499636e-05 S_per_cm2" erev="-107.0 mV" segmentGroup="soma" ion="k"/>
                <channelDensity id="Kv2like_soma" ionChannel="Kv2like" condDensity="0.00020549047656814867 S_per_cm2" erev="-107.0 mV" segmentGroup="soma" ion="k"/>
                <channelDensity id="Kv3_1_soma" ionChannel="Kv3_1" condDensity="0.09026960737170614 S_per_cm2" erev="-107.0 mV" segmentGroup="soma" ion="k"/>
                <channelDensity id="K_T_soma" ionChannel="K_T" condDensity="0.034340098071842295 S_per_cm2" erev="-107.0 mV" segmentGroup="soma" ion="k"/>
                <channelDensity id="Im_v2_soma" ionChannel="Im_v2" condDensity="0.008323207207022749 S_per_cm2" erev="-107.0 mV" segmentGroup="soma" ion="k"/>
                <channelDensity id="SK_soma" ionChannel="SK" condDensity="0.0019007366857261287 S_per_cm2" erev="-107.0 mV" segmentGroup="soma" ion="k"/>
                <channelDensity id="pas_soma" ionChannel="pas" condDensity="0.0002773136198456328 S_per_cm2" erev="-83.62666320800781 mV" segmentGroup="soma" ion="non_specific"/>
                <channelDensity id="pas_axon" ionChannel="pas" condDensity="0.0007346653107942031 S_per_cm2" erev="-83.62666320800781 mV" segmentGroup="axon" ion="non_specific"/>
                <channelDensity id="pas_dend" ionChannel="pas" condDensity="3.6261955289365906e-05 S_per_cm2" erev="-83.62666320800781 mV" segmentGroup="dend" ion="non_specific"/>
                <channelDensity id="pas_apic" ionChannel="pas" condDensity="0.0003393780391671264 S_per_cm2" erev="-83.62666320800781 mV" segmentGroup="apic" ion="non_specific"/>
                <channelDensityNernst id="Ca_HVA_soma" ionChannel="Ca_HVA" condDensity="6.357679665915689e-05 S_per_cm2" segmentGroup="soma" ion="ca"/>
                <channelDensityNernst id="Ca_LVA_soma" ionChannel="Ca_LVA" condDensity="0.0011224163613820723 S_per_cm2" segmentGroup="soma" ion="ca"/>
                <spikeThresh value="10mV"/>
                <specificCapacitance value="1.0 uF_per_cm2" segmentGroup="soma"/>
                <specificCapacitance value="1.0 uF_per_cm2" segmentGroup="axon"/>
                <specificCapacitance value="2.550521599672039 uF_per_cm2" segmentGroup="dend"/>
                <specificCapacitance value="2.550521599672039 uF_per_cm2" segmentGroup="apic"/>
                <initMembPotential value="-80mV"/>
            </membraneProperties>
            <intracellularProperties>
                <species id="ca" concentrationModel="CaDynamics_473871773" ion="ca" initialConcentration="0.0001 mM" initialExtConcentration="2 mM" segmentGroup="soma"/>
                <resistivity value="12.3400315829 ohm_cm"/>
            </intracellularProperties>
        </biophysicalProperties>
    </cell>
</neuroml>
