<neuroml xmlns="http://www.neuroml.org/schema/neuroml2"  xmlns:xs="http://www.w3.org/2001/XMLSchema" xmlns:xsi="http://www.w3.org/2001/XMLSchema-instance" xsi:schemaLocation="http://www.neuroml.org/schema/neuroml2 https://raw.github.com/NeuroML/NeuroML2/development/Schemas/NeuroML2/NeuroML_v2.3.1.xsd" id="NeuroML2_file_exported_from_NEURON">
    <include href="Im.channel.nml"/>
    <include href="Ih.channel.nml"/>
    <include href="NaTs.channel.nml"/>
    <include href="Nap.channel.nml"/>
    <include href="K_P.channel.nml"/>
    <include href="K_T.channel.nml"/>
    <include href="SK.channel.nml"/>
    <include href="Kv3_1.channel.nml"/>
    <include href="pas.channel.nml"/>
    <include href="Ca_HVA.channel.nml"/>
    <include href="Ca_LVA.channel.nml"/>
    <include href="CaDynamics_all.nml"/>
    <cell id="ROTATED_Cell_479427443">
        <notes>

Export of a cell model (479427443) obtained from the Allen Institute Cell Types Database into NeuroML2

Electrophysiology on which this model is based: http://celltypes.brain-map.org/mouse/experiment/electrophysiology/478497530

******************************************************
*  This export to NeuroML2 has not yet been fully validated!!
*  Use with caution!!
******************************************************

        </notes>
        <property tag="AIBS:aibs_dendrite_type" value="spiny"/>
        <property tag="AIBS:aibs_cre_line" value="Rorb-IRES2-Cre"/>
        <property tag="AIBS:aibs_specimen_id" value="478497530"/>
        <property tag="AIBS:aibs_specimen_name" value="Rorb-IRES2-Cre-D;Ai14-192794.05.02.01"/>
        <property tag="AIBS:intracellular_ephys:Electrode 1:location" value="Primary visual area, layer 4"/>
        <property tag="AIBS:session_id" value="478497528"/>
        <property tag="AIBS:subject:age" value="unknown"/>
        <property tag="AIBS:subject:description" value="Mus musculus In Vitro"/>
        <property tag="AIBS:subject:genotype" value="Ai14(RCL-tdT); Rorb-IRES2-Cre"/>
        <property tag="AIBS:subject:sex" value="M"/>
        <property tag="AIBS:subject:species" value="Mus musculus"/>
        <morphology id="morphology">
            <segment id="0" name="Seg0_soma_0">
                <proximal x="0.0" y="-0.0" z="36.3787" diameter="16.2756"/>
                <distal x="-7.604930623832856" y="-2.894097304288371" z="36.3787" diameter="16.2756"/>
            </segment>
            <segment id="2" name="Seg1_soma_0">
                <parent segment="0"/>
                <distal x="-15.210795858778418" y="-5.788550279868911" z="36.3787" diameter="16.2756"/>
            </segment>
            <segment id="3294" name="Seg0_axon_0">
                <parent segment="0"/>
                <proximal x="-7.604930623832856" y="-2.894097304288371" z="36.3787" diameter="1.0"/>
                <distal x="-8.15097417162486" y="-17.884516125786064" z="36.3787" diameter="1.0"/>
            </segment>
            <segment id="3295" name="Seg1_axon_0">
                <parent segment="3294"/>
                <distal x="-8.69608310830417" y="-32.874579275991714" z="36.3787" diameter="1.0"/>
            </segment>
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            <segmentGroup id="soma_0" neuroLexId="sao864921383">
                <notes>This group contains an unbranched set of segments, and all of the segmentGroups marked with
             neuroLexId = sao864921383 form a non-overlapping set of all of the segments.
             These segmentGroups correspond to the 'cables' of NeuroML v1.8.1, and map to/from NEURON sections.</notes>
                <member segment="0"/>
                <member segment="2"/>
            </segmentGroup>
            <segmentGroup id="axon_0" neuroLexId="sao864921383">
                <notes>This group contains an unbranched set of segments, and all of the segmentGroups marked with
             neuroLexId = sao864921383 form a non-overlapping set of all of the segments.
             These segmentGroups correspond to the 'cables' of NeuroML v1.8.1, and map to/from NEURON sections.</notes>
                <member segment="3294"/>
                <member segment="3295"/>
            </segmentGroup>
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            <segmentGroup id="apic">
                <include segmentGroup="apic_0"/>
                <include segmentGroup="apic_1"/>
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            </segmentGroup>
            <segmentGroup id="dend">
                <include segmentGroup="dend_0"/>
                <include segmentGroup="dend_1"/>
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            </segmentGroup>
            <segmentGroup id="axon">
                <include segmentGroup="axon_0"/>
                <include segmentGroup="axon_1"/>
            </segmentGroup>
            <segmentGroup id="soma">
                <include segmentGroup="soma_0"/>
            </segmentGroup>
            <segmentGroup id="soma_group" neuroLexId="GO:0043025">
                <notes>Default soma segment group for the cell</notes>
                <include segmentGroup="soma"/>
            </segmentGroup>
            <segmentGroup id="axon_group" neuroLexId="GO:0030424">
                <notes>Default axon segment group for the cell</notes>
                <include segmentGroup="axon"/>
            </segmentGroup>
            <segmentGroup id="dendrite_group" neuroLexId="GO:0030425">
                <notes>Default dendrite segment group for the cell</notes>
                <include segmentGroup="apic"/>
                <include segmentGroup="dend"/>
            </segmentGroup>
            <segmentGroup id="all">
                <include segmentGroup="apic_0"/>
                <include segmentGroup="apic_1"/>
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            </segmentGroup>
        </morphology>
        <biophysicalProperties id="biophys">
            <membraneProperties>
                <channelDensity id="Im_soma" ionChannel="Im" condDensity="4.9315187350407186e-08 S_per_cm2" erev="-107.0 mV" segmentGroup="soma" ion="k"/>
                <channelDensity id="Ih_soma" ionChannel="Ih" condDensity="6.432339273848564e-06 S_per_cm2" erev="-45 mV" segmentGroup="soma" ion="hcn"/>
                <channelDensity id="NaTs_soma" ionChannel="NaTs" condDensity="0.4976473625583444 S_per_cm2" erev="53.0 mV" segmentGroup="soma" ion="na"/>
                <channelDensity id="Nap_soma" ionChannel="Nap" condDensity="0.00011832438014616788 S_per_cm2" erev="53.0 mV" segmentGroup="soma" ion="na"/>
                <channelDensity id="K_P_soma" ionChannel="K_P" condDensity="0.02093303323896091 S_per_cm2" erev="-107.0 mV" segmentGroup="soma" ion="k"/>
                <channelDensity id="K_T_soma" ionChannel="K_T" condDensity="1.0012606831018484e-05 S_per_cm2" erev="-107.0 mV" segmentGroup="soma" ion="k"/>
                <channelDensity id="SK_soma" ionChannel="SK" condDensity="0.0006622520549230404 S_per_cm2" erev="-107.0 mV" segmentGroup="soma" ion="k"/>
                <channelDensity id="Kv3_1_soma" ionChannel="Kv3_1" condDensity="0.08391475233389808 S_per_cm2" erev="-107.0 mV" segmentGroup="soma" ion="k"/>
                <channelDensity id="pas_soma" ionChannel="pas" condDensity="1.5748272938952603e-05 S_per_cm2" erev="-88.64778518676758 mV" segmentGroup="soma" ion="non_specific"/>
                <channelDensity id="pas_axon" ionChannel="pas" condDensity="0.00045495201789626835 S_per_cm2" erev="-88.64778518676758 mV" segmentGroup="axon" ion="non_specific"/>
                <channelDensity id="pas_dend" ionChannel="pas" condDensity="6.542840291708015e-05 S_per_cm2" erev="-88.64778518676758 mV" segmentGroup="dend" ion="non_specific"/>
                <channelDensity id="pas_apic" ionChannel="pas" condDensity="9.284633491238136e-06 S_per_cm2" erev="-88.64778518676758 mV" segmentGroup="apic" ion="non_specific"/>
                <channelDensityNernst id="Ca_HVA_soma" ionChannel="Ca_HVA" condDensity="0.00023722462878725503 S_per_cm2" segmentGroup="soma" ion="ca"/>
                <channelDensityNernst id="Ca_LVA_soma" ionChannel="Ca_LVA" condDensity="0.0008550454006859215 S_per_cm2" segmentGroup="soma" ion="ca"/>
                <spikeThresh value="10mV"/>
                <specificCapacitance value="1.0 uF_per_cm2" segmentGroup="soma"/>
                <specificCapacitance value="1.0 uF_per_cm2" segmentGroup="axon"/>
                <specificCapacitance value="4.321695548313468 uF_per_cm2" segmentGroup="dend"/>
                <specificCapacitance value="4.321695548313468 uF_per_cm2" segmentGroup="apic"/>
                <initMembPotential value="-80mV"/>
            </membraneProperties>
            <intracellularProperties>
                <species id="ca" concentrationModel="CaDynamics_479427443" ion="ca" initialConcentration="0.0001 mM" initialExtConcentration="2 mM" segmentGroup="soma"/>
                <resistivity value="43.0409564216 ohm_cm"/>
            </intracellularProperties>
        </biophysicalProperties>
    </cell>
</neuroml>
