<?xml version="1.0" encoding="UTF-8"?>
<neuroml xmlns="http://www.neuroml.org/schema/neuroml2"
         xmlns:xsi="http://www.w3.org/2001/XMLSchema-instance"
         xsi:schemaLocation="http://www.neuroml.org/schema/neuroml2  https://raw.githubusercontent.com/NeuroML/NeuroML2/development/Schemas/NeuroML2/NeuroML_v2beta4.xsd"
         id="AllenHH">

    <include href="Ca_HVA.channel.nml"/>
    <include href="Ca_LVA.channel.nml"/>

    <include href="NaTs.channel.nml"/>
    <!--<include href="NaV.channel.nml"/>-->
    <include href="Nap.channel.nml"/>

    <include href="K_P.channel.nml"/>
    <include href="K_T.channel.nml"/>
    <include href="Kv3_1.channel.nml"/>
    <include href="SK.channel.nml"/>

    <include href="Im.channel.nml"/>
    <include href="Ih.channel.nml"/>

    <include href="CaDynamics.nml"/>

    <include href="pas.channel.nml"/>

    <cell id="AllenHH">

        <notes>A single segment/compartment cell</notes>

        <morphology id="morphology">

            <segment id="0" name="Soma">
                <proximal x="0.0" y="0.0" z="0.0" diameter="30"/>
                <distal x="0.0" y="0" z="0.0" diameter="30"/>
            </segment>

            <segmentGroup id="Soma" neuroLexId="sao864921383">    <!--
                This group contains an unbranched set of segments, and all of the segmentGroups marked with
                neuroLexId = sao864921383 form a non-overlapping set of all of the segments.
                These segmentGroups correspond to the 'cables' of NeuroML v1.8.1. -->

                <member segment="0"/>
            </segmentGroup>

            <segmentGroup id="all">
                <include segmentGroup="Soma"/>
            </segmentGroup>

            <segmentGroup id="soma_group" neuroLexId="GO:0043025">    <!--Soma group-->

                <include segmentGroup="Soma"/>
            </segmentGroup>

        </morphology>

        <!--Adding the biophysical parameters-->

        <biophysicalProperties id="biophys">

            <membraneProperties>

                <channelDensity condDensity="0.000153169 S_per_cm2" id="pas_all" ionChannel="pas" ion="non_specific" erev="-99.7317 mV"/>

                <channelDensity condDensity="0.831809 S_per_cm2" id="NaTs_all" ionChannel="NaTs" ion="na" erev="53 mV"/>

                <!--<channelDensity condDensity="0.1 S_per_cm2" id="NaV_all" ionChannel="NaV" ion="na" erev="53 mV"/>-->

                <channelDensity condDensity="0.000115828 S_per_cm2" id="Nap_all" ionChannel="Nap" ion="na" erev="53 mV"/>

                <channelDensity condDensity="0.0198868 S_per_cm2" id="K_P_all" ionChannel="K_P" ion="k" erev="-107 mV"/>

                <channelDensity condDensity="6.5088e-05 S_per_cm2" id="K_T_all" ionChannel="K_T" ion="k" erev="-107 mV"/>

                <channelDensity condDensity="0.0281648 S_per_cm2" id="Kv3_1_all" ionChannel="Kv3_1" ion="k" erev="-107 mV"/>

                <channelDensity condDensity="0.0000797996 S_per_cm2" id="SK_all" ionChannel="SK" ion="k" erev="-107 mV"/>

                <channelDensity condDensity="0.0079231 S_per_cm2" id="Im_all" ionChannel="Im" ion="k" erev="-107 mV"/>

                <channelDensity condDensity="8.61267e-06 S_per_cm2" id="Ih_all" ionChannel="Ih" ion="hcn" erev="-45 mV"/>

                <channelDensityNernst condDensity="0.000783165 S_per_cm2" id="Ca_LVA_all" ionChannel="Ca_LVA" ion="ca"/>

                <channelDensityNernst condDensity="2.69146e-05 S_per_cm2" id="Ca_HVA_all" ionChannel="Ca_HVA" ion="ca"/>

                <spikeThresh value="0 mV"/>

                <specificCapacitance value="1.0 uF_per_cm2"/>

                <initMembPotential value="-90.0 mV"/>

            </membraneProperties>

            <intracellularProperties>

                <species id="ca" ion="ca" concentrationModel="CaDynamics" initialConcentration="1e-4 mM" initialExtConcentration="2 mM"/>

                <resistivity value="0.1 kohm_cm"/>

            </intracellularProperties>

        </biophysicalProperties>

    </cell>

</neuroml>
