<Lems>

    <!--

        This LEMS file has been automatically generated using PyNeuroML v0.3.0 (libNeuroML v0.2.32)

     -->

    <!-- Specify which component to run -->
    <Target component="AllenHHTest"/>

    <!-- Include core NeuroML2 ComponentType definitions -->
    <Include file="Cells.xml"/>
    <Include file="Networks.xml"/>
    <Include file="Simulation.xml"/>

    <Include file="AllenHH.net.nml"/>

    <Simulation id="AllenHHTest" length="1500ms" step="0.05ms" target="network_AllenHH" seed="12345">  <!-- Note seed: ensures same random numbers used every run -->

        <Display id="DispPop__Pop0" title="Membrane potentials of cells in Pop0" timeScale="1ms" xmin="-150.0" xmax="1650.0" ymin="-90" ymax="50">
            <Line id="Pop0[0]: v" quantity="Pop0/0/RS/v" scale="1mV" color="#563819" timeScale="1ms"/>
        </Display>

        <OutputFile id="Volts_file__Pop0" fileName="AllenHHTest.Pop0.v.dat">
            <OutputColumn id="v_Pop0_0_RS_v" quantity="Pop0/0/RS/v"/>
        </OutputFile>

    </Simulation>

</Lems>
