<neuroml xmlns="http://www.neuroml.org/schema/neuroml2"  xmlns:xs="http://www.w3.org/2001/XMLSchema" xmlns:xsi="http://www.w3.org/2001/XMLSchema-instance" xsi:schemaLocation="http://www.neuroml.org/schema/neuroml2 https://raw.github.com/NeuroML/NeuroML2/development/Schemas/NeuroML2/NeuroML_v2beta5.xsd" id="network_468120757_AllenHH">
    <include href="AllenHH.cell.nml"></include>
    <include href="CaDynamics.nml"></include>
    <pulseGenerator id="input_43" delay="270ms" duration="1000ms" amplitude="-110.0 pA"/>
    <pulseGenerator id="input_46" delay="270ms" duration="1000ms" amplitude="-50.0 pA"/>
    <pulseGenerator id="input_51" delay="270ms" duration="1000ms" amplitude="50.0 pA"/>
    <pulseGenerator id="input_54" delay="270ms" duration="1000ms" amplitude="110.0 pA"/>
    <pulseGenerator id="input_62" delay="270ms" duration="1000ms" amplitude="270.0 pA"/>
    <pulseGenerator id="input_63" delay="270ms" duration="1000ms" amplitude="290.0 pA"/>
    <pulseGenerator id="input_65" delay="270ms" duration="1000ms" amplitude="330.0 pA"/>
    <network id="network_468120757_AllenHH" type="networkWithTemperature" temperature="34 degC">
        <population id="Pop0" component="RS" size="7" type="populationList">
            <instance id="0">
                <location x="0." y="0." z="0."/>
            </instance>
            <instance id="1">
                <location x="100." y="0." z="0."/>
            </instance>
            <instance id="2">
                <location x="200." y="0." z="0."/>
            </instance>
            <instance id="3">
                <location x="300." y="0." z="0."/>
            </instance>
            <instance id="4">
                <location x="400." y="0." z="0."/>
            </instance>
            <instance id="5">
                <location x="500." y="0." z="0."/>
            </instance>
            <instance id="6">
                <location x="600." y="0." z="0."/>
            </instance>
        </population>
        <inputList id="input_43" population="Pop0" component="input_43">
            <input id="0" target="../Pop0/0/RS" destination="synapses"/>
        </inputList>
        <inputList id="input_46" population="Pop0" component="input_46">
            <input id="0" target="../Pop0/1/RS" destination="synapses"/>
        </inputList>
        <inputList id="input_51" population="Pop0" component="input_51">
            <input id="0" target="../Pop0/2/RS" destination="synapses"/>
        </inputList>
        <inputList id="input_54" population="Pop0" component="input_54">
            <input id="0" target="../Pop0/3/RS" destination="synapses"/>
        </inputList>
        <inputList id="input_62" population="Pop0" component="input_62">
            <input id="0" target="../Pop0/4/RS" destination="synapses"/>
        </inputList>
        <inputList id="input_63" population="Pop0" component="input_63">
            <input id="0" target="../Pop0/5/RS" destination="synapses"/>
        </inputList>
        <inputList id="input_65" population="Pop0" component="input_65">
            <input id="0" target="../Pop0/6/RS" destination="synapses"/>
        </inputList>
    </network>
</neuroml>
