<?xml version="1.0" encoding="UTF-8"?>
<neuroml xmlns="http://www.neuroml.org/schema/neuroml2"
         xmlns:xsi="http://www.w3.org/2001/XMLSchema-instance"
         xsi:schemaLocation="http://www.neuroml.org/schema/neuroml2  https://raw.githubusercontent.com/NeuroML/NeuroML2/development/Schemas/NeuroML2/NeuroML_v2beta5.xsd"
         id="RS">

    <include href="Kd.channel.nml"/>

    <include href="IM.channel.nml"/>

    <include href="Leak.channel.nml"/>

    <include href="Na.channel.nml"/>

    <include href="IL.channel.nml"/>

    <include href="Ca.nml"/>

    <!--<include href="IT.channel.nml"/>-->

    <cell id="RS">

        <notes>HH2 cell</notes>

        <morphology id="morphology_HH2">

            <segment id="0" name="Soma">
                <proximal x="0.0" y="0.0" z="0.0" diameter="30.0"/>
                <distal x="0.0" y="0.0" z="0.0" diameter="30.0"/>
            </segment>

            <segmentGroup id="Soma" neuroLexId="sao864921383">    <!--
                This group contains an unbranched set of segments, and all of the segmentGroups marked with
                neuroLexId = sao864921383 form a non-overlapping set of all of the segments.
                These segmentGroups correspond to the 'cables' of NeuroML v1.8.1. -->

                <member segment="0"/>
            </segmentGroup>

            <segmentGroup id="all">
                <include segmentGroup="Soma"/>
            </segmentGroup>

            <segmentGroup id="soma_group" neuroLexId="GO:0043025">    <!--Soma group-->

                <include segmentGroup="Soma"/>
            </segmentGroup>

        </morphology>

            <!--Adding the biophysical parameters-->

        <biophysicalProperties id="biophys">

            <membraneProperties>

                <channelDensity condDensity="0.1 mS_per_cm2" id="LeakConductance_all" ionChannel="LeakConductance" erev="-70.0 mV" ion="non_specific"/>

                <channelDensity condDensity="5.0 mS_per_cm2" id="Kd_all" ionChannel="Kd" ion="k" erev="-100.0 mV"/>

                <channelDensity condDensity="0.07 mS_per_cm2" id="IM_all" ionChannel="IM" ion="k" erev="-100.0 mV"/>

                <channelDensity condDensity="0.000 mS_per_cm2" id="IL_all" ionChannel="IL" ion="ca" erev="100mV"/>

                <channelDensityVShift condDensity="30.0 mS_per_cm2" id="Na_all" ionChannel="Na" ion="na" erev="50.0 mV" vShift="0mV"/>

                <spikeThresh value="0 mV"/>

                <specificCapacitance value="1.0 uF_per_cm2"/>

                <initMembPotential value="-80.0 mV"/>

            </membraneProperties>

            <intracellularProperties>

                <!--<species id="ca" ion="ca" concentrationModel="CaPoolModel" initialConcentration="2.4e-4 mM" initialExtConcentration="2.0 mM"/>-->

                <resistivity value="100 ohm_cm"/>

            </intracellularProperties>

        </biophysicalProperties>

    </cell>

</neuroml>
