<?xml version="1.0" encoding="UTF-8"?>
<neuroml xmlns="http://www.neuroml.org/schema/neuroml2" xmlns:xsi="http://www.w3.org/2001/XMLSchema-instance"
         xsi:schemaLocation="http://www.neuroml.org/schema/neuroml2  https://raw.github.com/NeuroML/NeuroML2/development/Schemas/NeuroML2/NeuroML_v2beta3.xsd"
         id="RS">

    <izhikevich2007Cell id="RS" v0 = "-79mV" C="100 pF" k = "0.7 nS_per_mV"
                            vr = "-80 mV" vt = "-40 mV" vpeak = "35 mV"
                            a = "0.03 per_ms" b = "-2 nS" c = "-50 mV" d = "100 pA"/>

</neuroml>
