<neuroml xmlns="http://www.neuroml.org/schema/neuroml2"  xmlns:xs="http://www.w3.org/2001/XMLSchema" xmlns:xsi="http://www.w3.org/2001/XMLSchema-instance" xsi:schemaLocation="http://www.neuroml.org/schema/neuroml2 https://raw.github.com/NeuroML/NeuroML2/development/Schemas/NeuroML2/NeuroML_v2beta5.xsd" id="network_479220013_Izh">
    <include href="Izh.cell.nml"></include>
    <pulseGenerator id="input_18" delay="270ms" duration="1000ms" amplitude="-110.0 pA"/>
    <pulseGenerator id="input_22" delay="270ms" duration="1000ms" amplitude="-30.000002 pA"/>
    <pulseGenerator id="input_28" delay="270ms" duration="1000ms" amplitude="90.0 pA"/>
    <pulseGenerator id="input_31" delay="270ms" duration="1000ms" amplitude="150.0 pA"/>
    <pulseGenerator id="input_40" delay="270ms" duration="1000ms" amplitude="170.0 pA"/>
    <pulseGenerator id="input_34" delay="270ms" duration="1000ms" amplitude="209.99998 pA"/>
    <pulseGenerator id="input_39" delay="270ms" duration="1000ms" amplitude="310.0 pA"/>
    <network id="network_479220013_Izh" type="networkWithTemperature" temperature="34 degC">
        <population id="Pop0" component="RS" size="7" type="populationList">
            <instance id="0">
                <location x="0." y="0." z="0."/>
            </instance>
            <instance id="1">
                <location x="100." y="0." z="0."/>
            </instance>
            <instance id="2">
                <location x="200." y="0." z="0."/>
            </instance>
            <instance id="3">
                <location x="300." y="0." z="0."/>
            </instance>
            <instance id="4">
                <location x="400." y="0." z="0."/>
            </instance>
            <instance id="5">
                <location x="500." y="0." z="0."/>
            </instance>
            <instance id="6">
                <location x="600." y="0." z="0."/>
            </instance>
        </population>
        <inputList id="input_18" population="Pop0" component="input_18">
            <input id="0" target="../Pop0/0/RS" destination="synapses"/>
        </inputList>
        <inputList id="input_22" population="Pop0" component="input_22">
            <input id="0" target="../Pop0/1/RS" destination="synapses"/>
        </inputList>
        <inputList id="input_28" population="Pop0" component="input_28">
            <input id="0" target="../Pop0/2/RS" destination="synapses"/>
        </inputList>
        <inputList id="input_31" population="Pop0" component="input_31">
            <input id="0" target="../Pop0/3/RS" destination="synapses"/>
        </inputList>
        <inputList id="input_40" population="Pop0" component="input_40">
            <input id="0" target="../Pop0/4/RS" destination="synapses"/>
        </inputList>
        <inputList id="input_34" population="Pop0" component="input_34">
            <input id="0" target="../Pop0/5/RS" destination="synapses"/>
        </inputList>
        <inputList id="input_39" population="Pop0" component="input_39">
            <input id="0" target="../Pop0/6/RS" destination="synapses"/>
        </inputList>
    </network>
</neuroml>
