<?xml version="1.0" encoding="ISO-8859-1"?>
<neuroml xmlns="http://www.neuroml.org/schema/neuroml2" xmlns:xsi="http://www.w3.org/2001/XMLSchema-instance" xsi:schemaLocation="http://www.neuroml.org/schema/neuroml2 https://raw.github.com/NeuroML/NeuroML2/development/Schemas/NeuroML2/NeuroML_v2beta4.xsd" id="IL">

    <notes>NeuroML file containing a single Channel description</notes>

    <ionChannel id="IL" conductance="10 pS" type="ionChannelHH" species="ca">

        <notes>High threshold calcium current

Comment from original mod file:

   - Ca++ current, L type channels
   - Differential equations

   - Model from:

   Reuveni I; Friedman A; Amitai Y; Gutnick MJ.
     Stepwise repolarization from Ca2+ plateaus in neocortical pyramidal cells:
     evidence for nonhomogeneous distribution of HVA Ca2+ channels in
     dendrites.
   Journal of Neuroscience, 1993 Nov, 13(11):4609-21.

   - Experimental data for voltage-dependent activation:

   Sayer RJ; Schwindt PC; Crill WE.
     High- and low-threshold calcium currents in neurons acutely isolated from
     rat sensorimotor cortex.
   Neuroscience Letters, 1990 Dec 11, 120(2):175-8.

   - Experimental data for voltage-dependent inactivation:

   Dichter MA; Zona C.
     Calcium currents in cultured rat cortical neurons.
   Brain Research, 1989 Jul 17, 492(1-2):219-29.

   - Calcium-dependent inactivation was not modeled; if interested, see:

   Kay AR.
     Inactivation kinetics of calcium current of acutely dissociated CA1
     pyramidal cells of the mature guinea-pig hippocampus.
   Journal of Physiology, 1991 Jun, 437:27-48.

   - m2h kinetics from:

   Kay AR; Wong RK.
     Calcium current activation kinetics in isolated pyramidal neurones of the
     Ca1 region of the mature guinea-pig hippocampus.
   Journal of Physiology, 1987 Nov, 392:603-16.

   - Reversal potential described by Nernst equation
   - no temperature dependence included (rates correspond to 36 degC)

   Alain Destexhe, Laval University, 1996</notes>

        <annotation>
            <rdf:RDF xmlns:rdf="http://www.w3.org/1999/02/22-rdf-syntax-ns#">
                <rdf:Description rdf:about="IL">

                    <bqmodel:isDescribedBy xmlns:bqmodel="http://biomodels.net/model-qualifiers/">
                        <rdf:Bag>
                            <rdf:li>Minimal Hodgkin-Huxley type models for different classes of cortical and thalamic neurons</rdf:li>
                            <rdf:li rdf:resource="19011929"/>
                        </rdf:Bag>
                    </bqmodel:isDescribedBy>

                    <bqbiol:isVersionOf xmlns:bqbiol="http://biomodels.net/biology-qualifiers/">
                        <rdf:Bag>
                            <rdf:li>Ca channels</rdf:li>
                            <rdf:li rdf:resource="http://senselab.med.yale.edu/NeuronDB/channelGene2.aspx#table1"/>
                        </rdf:Bag>
                    </bqbiol:isVersionOf>

                </rdf:Description>
            </rdf:RDF>
        </annotation>

        <gate id="q" type="gateHHrates" instances="2">
            <forwardRate type="IL_q_alpha_rate"/>
            <reverseRate type="IL_q_beta_rate"/>
        </gate>

        <gate id="r" type="gateHHrates" instances="1">
            <forwardRate type="IL_r_alpha_rate"/>
            <reverseRate type="IL_r_beta_rate"/>
        </gate>

    </ionChannel>

    <ComponentType name="IL_q_alpha_rate" extends="baseVoltageDepRate">
        <Constant name="TIME_SCALE" dimension="time" value="1 ms"/>
        <Constant name="VOLT_SCALE" dimension="voltage" value="1 mV"/>

        <Dynamics>
            <DerivedVariable name="V" dimension="none" value="v / VOLT_SCALE"/>
            <DerivedVariable name="r" exposure="r" dimension="per_time" value="0.055 * (-27-V) / (exp((-27-V)/3.8) - 1) / TIME_SCALE"/>
        </Dynamics>

    </ComponentType>

    <ComponentType name="IL_q_beta_rate" extends="baseVoltageDepRate">
        <Constant name="TIME_SCALE" dimension="time" value="1 ms"/>
        <Constant name="VOLT_SCALE" dimension="voltage" value="1 mV"/>

        <Dynamics>
            <DerivedVariable name="V" dimension="none" value="v / VOLT_SCALE"/>
            <DerivedVariable name="r" exposure="r" dimension="per_time" value="0.94 * exp((-75-V)/17) / TIME_SCALE"/>
        </Dynamics>

    </ComponentType>

    <ComponentType name="IL_r_alpha_rate" extends="baseVoltageDepRate">
        <Constant name="TIME_SCALE" dimension="time" value="1 ms"/>
        <Constant name="VOLT_SCALE" dimension="voltage" value="1 mV"/>

        <Dynamics>
            <DerivedVariable name="V" dimension="none" value="v / VOLT_SCALE"/>
            <DerivedVariable name="r" exposure="r" dimension="per_time" value="0.000457 * exp((-13-V)/50) / TIME_SCALE"/>
        </Dynamics>

    </ComponentType>

    <ComponentType name="IL_r_beta_rate" extends="baseVoltageDepRate">
        <Constant name="TIME_SCALE" dimension="time" value="1 ms"/>
        <Constant name="VOLT_SCALE" dimension="voltage" value="1 mV"/>

        <Dynamics>
            <DerivedVariable name="V" dimension="none" value="v / VOLT_SCALE"/>
            <DerivedVariable name="r" exposure="r" dimension="per_time" value="0.0065 / (exp((-15-V)/28) + 1) / TIME_SCALE"/>
        </Dynamics>

    </ComponentType>

</neuroml>
