<neuroml xmlns="http://www.neuroml.org/schema/neuroml2"  xmlns:xs="http://www.w3.org/2001/XMLSchema" xmlns:xsi="http://www.w3.org/2001/XMLSchema-instance" xsi:schemaLocation="http://www.neuroml.org/schema/neuroml2 https://raw.github.com/NeuroML/NeuroML2/development/Schemas/NeuroML2/NeuroML_v2beta5.xsd" id="Izh_370351753">
    <izhikevich2007Cell id="Izh_370351753" C="70.2488480029 pF" v0="-79mV" k="0.0946518464358 nS_per_mV" vr="-78.698436149 mV" vt="-49.326064217 mV" vpeak="34.8663815223 mV" a="0.0258459583834 per_ms" b="0.949799746526 nS" c="-42.1023003968 mV" d="202.892664736 pA">
        <notes>Cell model tuned to Allen Institute Cell Types Database, dataset: 370351753

Tuning procedure metadata:

{   'Prototype': 'Izhikevich',
    'analysis_start_time': 0,
    'analysis_var': {   'baseline': 0,
                        'dvdt_threshold': 0,
                        'peak_delta': 0,
                        'peak_threshold': 0},
    'best_cand_analysis': {   'Pop0/0/RS/v:average_1000_1200': -98.36981000000287,
                              'Pop0/0/RS/v:average_last_1percent': -78.70197616666667,
                              'Pop0/0/RS/v:value_280': -90.83828,
                              'Pop0/1/RS/v:average_1000_1200': -85.55012999999396,
                              'Pop0/2/RS/v:average_1000_1200': -66.08802128993747,
                              'Pop0/3/RS/v:average_1000_1200': -48.42329923721824,
                              'Pop0/5/RS/v:mean_spike_frequency': 14.292277065999693,
                              'Pop0/6/RS/v:average_maximum': 35.209041739130441,
                              'Pop0/6/RS/v:average_minimum': -48.852719545454541,
                              'Pop0/6/RS/v:mean_spike_frequency': 23.162771109707304},
    'best_cand_analysis_full': {   'Pop0/0/RS/v:average_last_1percent': -78.70197616666667,
                                   'Pop0/0/RS/v:max_peak_no': 0,
                                   'Pop0/0/RS/v:maximum': -77.06953,
                                   'Pop0/0/RS/v:min_peak_no': 0,
                                   'Pop0/0/RS/v:minimum': -99.46793,
                                   'Pop0/1/RS/v:average_last_1percent': -78.69898279999998,
                                   'Pop0/1/RS/v:max_peak_no': 0,
                                   'Pop0/1/RS/v:maximum': -78.15838,
                                   'Pop0/1/RS/v:min_peak_no': 0,
                                   'Pop0/1/RS/v:minimum': -86.01319000000001,
                                   'Pop0/2/RS/v:average_last_1percent': -78.7031527333333,
                                   'Pop0/2/RS/v:average_maximum': 35.388921666666668,
                                   'Pop0/2/RS/v:average_minimum': -86.617859999999993,
                                   'Pop0/2/RS/v:first_spike_time': 338.25,
                                   'Pop0/2/RS/v:interspike_time_covar': 0.0014689680499449002,
                                   'Pop0/2/RS/v:max_peak_no': 6,
                                   'Pop0/2/RS/v:maximum': 35.44655,
                                   'Pop0/2/RS/v:mean_spike_frequency': 6.1207002081038082,
                                   'Pop0/2/RS/v:min_peak_no': 5,
                                   'Pop0/2/RS/v:minimum': -86.77703000000001,
                                   'Pop0/2/RS/v:peak_decay_exponent': -0.00025465105670251594,
                                   'Pop0/2/RS/v:peak_linear_gradient': -2.8238771298310454e-05,
                                   'Pop0/2/RS/v:spike_broadening': 0.99129092721304335,
                                   'Pop0/2/RS/v:spike_frequency_adaptation': -0.020709745142119252,
                                   'Pop0/2/RS/v:spike_width_adaptation': 0.015251255294061154,
                                   'Pop0/2/RS/v:trough_decay_exponent': -0.0024070756802038462,
                                   'Pop0/2/RS/v:trough_phase_adaptation': -0.018734836004724493,
                                   'Pop0/3/RS/v:average_last_1percent': -78.89509276666664,
                                   'Pop0/3/RS/v:average_maximum': 35.270608333333335,
                                   'Pop0/3/RS/v:average_minimum': -67.011567272727291,
                                   'Pop0/3/RS/v:first_spike_time': 304.85,
                                   'Pop0/3/RS/v:interspike_time_covar': 0.079435331799243905,
                                   'Pop0/3/RS/v:max_peak_no': 12,
                                   'Pop0/3/RS/v:maximum': 35.55225,
                                   'Pop0/3/RS/v:mean_spike_frequency': 11.113356233582541,
                                   'Pop0/3/RS/v:min_peak_no': 11,
                                   'Pop0/3/RS/v:minimum': -101.61290000000001,
                                   'Pop0/3/RS/v:peak_decay_exponent': -0.0022510183882317606,
                                   'Pop0/3/RS/v:peak_linear_gradient': 0.00017261768454353979,
                                   'Pop0/3/RS/v:spike_broadening': 0.92124918753931972,
                                   'Pop0/3/RS/v:spike_frequency_adaptation': -0.011136433947021648,
                                   'Pop0/3/RS/v:spike_width_adaptation': 0.008689460129287941,
                                   'Pop0/3/RS/v:trough_decay_exponent': -0.06577798048368004,
                                   'Pop0/3/RS/v:trough_phase_adaptation': -0.0088869169668530281,
                                   'Pop0/4/RS/v:average_last_1percent': -78.75020189999995,
                                   'Pop0/4/RS/v:average_maximum': 35.29449727272727,
                                   'Pop0/4/RS/v:average_minimum': -70.022388000000007,
                                   'Pop0/4/RS/v:first_spike_time': 307.2,
                                   'Pop0/4/RS/v:interspike_time_covar': 0.038959675602305927,
                                   'Pop0/4/RS/v:max_peak_no': 11,
                                   'Pop0/4/RS/v:maximum': 35.47968,
                                   'Pop0/4/RS/v:mean_spike_frequency': 10.350895352447985,
                                   'Pop0/4/RS/v:min_peak_no': 10,
                                   'Pop0/4/RS/v:minimum': -101.1567,
                                   'Pop0/4/RS/v:peak_decay_exponent': 0.00031055857029234737,
                                   'Pop0/4/RS/v:peak_linear_gradient': -0.00023633303363818824,
                                   'Pop0/4/RS/v:spike_broadening': 0.94185261714492774,
                                   'Pop0/4/RS/v:spike_frequency_adaptation': 0.0069848610940470967,
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</notes>
    </izhikevich2007Cell>
</neuroml>
