<Lems>

    <!-- Initial ideas for expressing GLIF model in LEMS/NeuroML2 -->

    <Target component="sim1" />

    <!-- Include core NeuroML2 ComponentType definitions -->
    <Include file="Cells.xml" />
    <Include file="Networks.xml" />
    <Include file="Simulation.xml" />

    <Include file="GLIFs.xml" />

    <glifAscCell id="glif_480629471" leakReversal="0mV" thresh=" 0.01982398 V" tau1="1ms" tau2="1ms" amp1="0A" amp2="0A"
	     reset="0mV" C="4.946777501212259e-11 F" leakConductance="2.2833678368091756e-09 S"/>

    <glifAscCell id="glif_480629475" leakReversal="0mV" thresh="0.016535833531715175 V"  tau1="0.03333333333s" tau2="0.00333333333s"
     amp1="-3.847001287818176e-11A" amp2="2.058989164357654e-10A"
	     reset="0mV" C="4.946777501212259e-11 F" leakConductance="2.2833678368091756e-09 S"/>

    <glifRCell id="glif_473875489" leakReversal="0mV" thresh="0.0281669888956 V"
         bs="33.53480801319328 per_s" deltaThresh="0.002324619719665667 V"
	     reset="0mV" C="7.85512829824e-11 F" leakConductance="3.97749363581e-09 S"
         fv = "0.20256617295916096" deltaV="0.004175364052709396 V"/>

    <glifRAscCell id="GLIF_472308324"
            C="9.44719858879e-11 F"
            leakReversal="0.0 V"
            reset="0.0 V"
            thresh="0.04125733313 V"
            leakConductance="3.4347412258e-09 S"
            tau1="0.333333333333 s"
            tau2="0.01 s"
            amp1="-4.35022008595e-12 A"
            amp2="-4.6646109736e-11 A"
            bs="350.492848859 per_s"
            deltaThresh="0.00996374822775 V"
            fv="0.702263301567"
            deltaV="0.0014687975536 V"/>

      <glifRAscATCell  id="GLIF_472455459"
            C="7.7806857476e-11 F"
            leakReversal="0.0 V"
            reset="0.0 V"
            thresh="0.0216698452899 V"
            leakConductance="4.6942496176e-09 S"
            tau1="0.0333333333333 s"
            tau2="0.00333333333333 s"
            amp1="-5.32840737219e-11 A"
            amp2="5.97838489802e-11 A"
            bs="35.4365847213 per_s"
            deltaThresh="0.00180161838228 V"
            fv="0.983105247715"
            deltaV="-0.015394347765 V"
            a = "4.0434269749 per_s"
            bv="82.4195365203 per_s"/>

    <pulseGenerator id="pulseGen0" delay="100ms" duration="1000ms" amplitude="50 pA" />
    <pulseGenerator id="pulseGen1" delay="100ms" duration="1000ms" amplitude="150 pA" />
    <pulseGenerator id="pulseGen2" delay="100ms" duration="1000ms" amplitude="120 pA" />

    <network id="net1">
        <population id="pop1" component="glif_480629471" size="1" />
        <population id="pop2" component="glif_480629475" size="1" />
        <population id="pop3" component="glif_473875489" size="1" />
        <population id="pop4" component="GLIF_472308324" size="1" />
        <population id="pop5" component="GLIF_472455459" size="1" />
        <explicitInput target="pop1[0]" input="pulseGen0" destination="synapses"/>
        <explicitInput target="pop2[0]" input="pulseGen0" destination="synapses"/>
        <explicitInput target="pop3[0]" input="pulseGen2" destination="synapses"/>
        <explicitInput target="pop4[0]" input="pulseGen1" destination="synapses"/>
        <explicitInput target="pop5[0]" input="pulseGen2" destination="synapses"/>
    </network>

    <!-- End of NeuroML2 content -->

    <Simulation id="sim1" length="1200ms" step="0.05ms" target="net1">

        <Display id="d1" title="Ex GLIF 1" timeScale="1ms" xmin="-100" xmax="1300" ymin="-80" ymax="50">
            <Line id="v" quantity="pop1[0]/v" scale="1mV" color="#ffffff" timeScale="1ms" />
        </Display>
        <Display id="d2" title="Ex GLIF 2" timeScale="1ms" xmin="-100" xmax="1300" ymin="-80" ymax="50">
            <Line id="v" quantity="pop2[0]/v" scale="1mV" color="#ffffff" timeScale="1ms" />
        </Display>
        <Display id="d3" title="Ex GLIF 3" timeScale="1ms" xmin="-100" xmax="1300" ymin="-80" ymax="50">
            <Line id="v" quantity="pop3[0]/v" scale="1mV" color="#ffffff" timeScale="1ms" />
            <Line id="threshTotal" quantity="pop3[0]/threshTotal" scale="1mV" color="#fff000" timeScale="1ms" />
        </Display>
        <Display id="d4" title="Ex GLIF 2 currents" timeScale="1ms" xmin="-100" xmax="1300" ymin="-0.07" ymax=".22">
            <Line id="asc1" quantity="pop2[0]/asc1" scale="1nA" color="#ffffff" timeScale="1ms" />
            <Line id="asc2" quantity="pop2[0]/asc2" scale="1nA" color="#33ffff" timeScale="1ms" />
        </Display>

        <Display id="d5" title="Ex GLIF 4" timeScale="1ms" xmin="-100" xmax="1300" ymin="-80" ymax="50">
            <Line id="v" quantity="pop4[0]/v" scale="1mV" color="#ffffff" timeScale="1ms" />
            <Line id="threshTotal" quantity="pop4[0]/threshTotal" scale="1mV" color="#fff000" timeScale="1ms" />
        </Display>
        <Display id="d6" title="Ex GLIF 4 currents" timeScale="1ms" xmin="-100" xmax="1300" ymin="-0.07" ymax=".22">
            <Line id="asc1" quantity="pop4[0]/asc1" scale="1nA" color="#ffffff" timeScale="1ms" />
            <Line id="asc2" quantity="pop4[0]/asc2" scale="1nA" color="#33ffff" timeScale="1ms" />
        </Display>

        <Display id="d7" title="Ex GLIF 5" timeScale="1ms" xmin="-100" xmax="1300" ymin="-80" ymax="50">
            <Line id="v" quantity="pop5[0]/v" scale="1mV" color="#ffffff" timeScale="1ms" />
            <Line id="threshTotal" quantity="pop5[0]/threshTotal" scale="1mV" color="#fff000" timeScale="1ms" />
        </Display>
        <Display id="d8" title="Ex GLIF 5 currents" timeScale="1ms" xmin="-100" xmax="1300" ymin="-0.07" ymax=".22">
            <Line id="asc1" quantity="pop5[0]/asc1" scale="1nA" color="#ffffff" timeScale="1ms" />
            <Line id="asc2" quantity="pop5[0]/asc2" scale="1nA" color="#33ffff" timeScale="1ms" />
        </Display>

    </Simulation>

</Lems>
