<neuroml xmlns="http://www.neuroml.org/schema/neuroml2"  xmlns:xs="http://www.w3.org/2001/XMLSchema" xmlns:xsi="http://www.w3.org/2001/XMLSchema-instance" xsi:schemaLocation="http://www.neuroml.org/schema/neuroml2 https://raw.github.com/NeuroML/NeuroML2/development/Schemas/NeuroML2/NeuroML_v2beta4.xsd" id="simplenet">
    <network id="simplenet">
        <population id="Pop0" component="myComponent" size="5">
            <property tag="axes_to_plot_tuple" value="(1,1)"/>
        </population>
        <population id="Pop1" component="myComponent" size="5"/>
    </network>
</neuroml>
